f(x) := 12*x^2 + 2*x - 120
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x := 10
r := root(f(x), x)
r = 3.08004
f(y) := y^2 + y - 230
Given
f(y) == 0
Find(y) → [sqrt(921)/2 - 1/2, -sqrt(921)/2 - 1/2]
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r := root(f(y), y, 0, 20)
r = 14.674
r := root(f(y), y, 0, -20)
r = -15.674
