# 행열의 생성 (ctrl+M)
# 【 행열의 원점 】
ORIGIN := 1
# 【 행열의 덧셈 】
A := [1, 2, 3; 1, 2, 3]
B := [1, 1, 2; 1, 1, 2]
C := A + B = [2, 3, 5; 2, 3, 5]
# 【 행열의 곱셈 ( Dot Product ) 】
A := [1, 2, 3; 1, 2, 3]
B := [1, 2; 1, 2; 1, 2]
A*B = [6, 12; 6, 12]
C := 3*A = [3, 6, 9; 3, 6, 9]
[a, b, c; d, e, f; g, h, i]*[a2, b2, c2; d2, e2, f2; g2, h2, i2] → [
    a*a2 + b*d2 + c*g2, a*b2 + b*e2 + c*h2, a*c2 + b*f2 + c*i2;
    d2*e + a2*d + f*g2, e2*e + b2*d + f*h2, f2*e + c2*d + f*i2;
    a2*g + d2*h + g2*i, b2*g + e2*h + h2*i, c2*g + f2*h + i*i2
]
# 【 행열의 ( Cross Product ) 】
A := [2; 1; 1]
B := [1; 1; 1]
A×B = [0; -1; 1]
[a; b; c]×[d; e; f] → [b*f - c*e; c*d - a*f; a*e - b*d]
# 【 행열의 전치 】
transpose([a, b; c, d]) → [a, c; b, d]
# [component: inputs [1, 2, 3, 4, 5, 6, 7]]
