## 행 열  (Matrix)
# 【 목차 】
# 【 행열의 생성 】 | 행열의 생성 (ctrl+M)
# 【 행열의 원점 】
ORIGIN := 1
# 【 행열의 요소 】 | 행열의 요소  ( [ )
A := [1, 2, 3; 4, 5, 6; 7, 8, 9]
A[1, 1] = 1
# 【 행열의 행 】 | 행열의 행 선택 ( ctrl + 6 )
# 【 행열의 열 】 | 행열의 열 선택 ( ctrl + 6 )
A := [1, 2, 3; 4, 5, 6; 7, 8, 9]
A[:, 1] = [1; 4; 7]
# 【 행열의 행열식 】
# ( Determinant )
# 행열의 행열식  ( | )
A := [1, 2, 3; 4, 5, 6; 7, 8, 9]
|A| = 0
# 【 행열의 전치 】 | 행열의 전치  ( ctrl + 1 )
A := [1, 2, 3; 4, 5, 6; 7, 8, 9]
transpose(A) = [1, 4, 7; 2, 5, 8; 3, 6, 9]
# 【 행열의 합계 】 | 행열의 합계
C := [1, 2, 3]
A := [1, 2, 3; 4, 5, 6; 7, 8, 9]
sum(A) =  # error: This value must be a vector.
B := [1; 2; 3]
sum(B) = 6
sum(C) = 6
# 【 행열의 분류 】
# 1. 직사각형 매트릭스
# (3*6) 차의 매트릭수
[1, 2, 3, 4, 5, 6; 2, 3, 4, 5, 6, 7; 3, 4, 5, 6, 7, 8]
# 2. 행 매트릭스
[1, 2, 3, 4, 5, 6]
# 3. 열 매트릭스
[1; 2; 3]
# 4. 정사각형 매트릭스
# m == n 이면 이 배열은 정사각형 매트릭스를 만든다.
#
# 정사각형 매트릭스는 특별한 성질을 가지고 있고, 구조 이론에서는 매우 중요한 것이다.
[1, 2, 3; 1, 2, 3; 1, 2, 3]
# 5. 단위 매트릭스
# 정사각형 매트릭스의 요소 a_ij는 매트릭스의 주 대각선이라고 하는 것을 형성한다.
#
# 이 대각선은 왼쪽 상방의 모서리로부터 오른쪽 하방의 모서리로 달리고 있다.
#
# i == j 일때 a_ij == 1 이고 i ≠ j 일때 a_ij == 0 으로 되는 정사각형 매트릭스를 단위 매트릭스라고 하고, 기호 I 로 나타낸다.
#
# 단위 매트릭스는 흔히 I_n과 같이 하나의 첨미자로 명기하고, 이를테면 2차원 단위 매트릭스인 경우에는 다음과 같이 쓴다.
I_3 := [1, 0, 0; 0, 1, 0; 0, 0, 1]
# 단위 매트릭스는 어떤 차수라도 좋으나, 언제든지 정사각형 매트릭스로 된다.
#
# 그리고 그것은 보통 대수학에 있어서의 1에 상당한다.
# 6. 0 매트릭스
# 0 매트릭스는 모든 요소가 0 으로 되는 임의 차수의 매트릭스로서, 보통 대수학에 있어서의 0(zero)에 상당한다.
# 7. 대칭 매트릭스
# a_ij == a_ji와 같은 특성을 가지는 정사각형 매트릭스를 대칭 매트릭스 (symmetric matrix)라 한다.
#
# 다음에 표시하는 3*3의 매트릭스는 이 성질을 가지고 있다.
A := [1, 2, 4; 2, 3, 6; 4, 6, 8]
transpose(A) = [1, 2, 4; 2, 3, 6; 4, 6, 8]
# 주대칭선은 대칭 매트릭스의 대칭선이다.
# 또, 대칭성은 정사각형 매트릭스의 특수한 경우에 대해서만 정의 할 수 있다.
# 대칭매트릭스는 6개의 서로 다른 요소를 가지고 있다. 이것에 대응하는 3차의 비대칭인 매트릭스는 9개의 서로 다른 요소를 가지고 있다.
# 대칭 매트릭스는 구조 이론에서 중요한 역할을 하게 된다. 그러므로, 대칭 매트릭스는 이 책 전체를 통해서 자주 나타나게 된다.
# 【 역대칭 매트릭스 】
# 구조기술자에게
# a_ij == -a_ji
#
# 로 정의되는 정사각형 매트릭스는 별로 중요하지 않다.
#
# 위와 같이 정의 된 매트릭스를 역대칭 매트릭스이다
# ( skew-symmetric or antisymmetric matrix )
A := [0, 2, 4; -2, 0, 9; -4, -9, 0]
transpose(A) = [0, -2, -4; 2, 0, -9; 4, 9, 0]
# 【 대각 매트릭스 】
# 대각 매트릭스는 주대각선상의 요소가 1일 필요가 없다는 것을 제외하고는 단위 매트릭스와 비슷하다.
#
# 주대각선 밖의 모든 요소는 단위 매트릭스의 경우에서와 같이 0 (zero)이다
# 2. 매트릭스의 산법
# 【 행열의 등식 】
# 2개의 매트릭스는 대응하는 요소가 같으면 같다.
#
# 그러므로, 매트릭스의 등식은 같은 차수의 매트릭스 사이에서만 존재한다.
# 【 행열의 스칼라곱 】 | 어떤 스칼라를 어떤 매트릭스에 곱하는 데에는 매트릭스의 모든 요소에 그 스칼라를 곱할 필요가 있다.
# 【 행열의 덧셈 】
# 같은 차수의 매트릭스의 합은 단순히 대응하는 요소의 합으로서 정의 된다.
#
# 차수가 다른 매트릭스는 더하거나 빼기를 할 수 없다.
A := [1, 2, 3; 1, 2, 3]
B := [1, 1, 2; 1, 1, 2]
C := A + B = [2, 3, 5; 2, 3, 5]
# 【 행열의 뺄셈 】
A := [1, 2, 3; 1, 2, 3]
B := [1, 1, 2; 1, 1, 2]
C := A - B = [0, 1, 1; 0, 1, 1]
# 【 행열의 교환 법칙 】
A + B == B + A
A + B = [2, 3, 5; 2, 3, 5]
B + A = [2, 3, 5; 2, 3, 5]
# 【 행열의 결합 법칙 】
A + (B + C) == (A + B) + C
A + (B + C) = [2, 4, 6; 2, 4, 6]
(A + B) + C = [2, 4, 6; 2, 4, 6]
# 【 행열의 곱셈 ( Dot Product ) 】
# 매트릭스의 곱셈은 간단한 연산이 아니다.
#
# 먼저 A의 열의 수가 B의 행의 수가 같을 경우에만 A*B가 존재한다.
A := [1, 2, 3; 1, 2, 3]
B := [1, 2; 1, 2; 1, 2]
# A가 2개의 열을 가지고 있고, B는 2개의 행을 가지고 있으므로, 곱 A*B가 존재함을 안다.
A*B = [6, 12; 6, 12]
C := 3*A = [3, 6, 9; 3, 6, 9]
[a, b, c; d, e, f; g, h, i]*[a2, b2, c2; d2, e2, f2; g2, h2, i2] → [
    a*a2 + b*d2 + c*g2, a*b2 + b*e2 + c*h2, a*c2 + b*f2 + c*i2;
    d2*e + a2*d + f*g2, e2*e + b2*d + f*h2, f2*e + c2*d + f*i2;
    a2*g + d2*h + g2*i, b2*g + e2*h + h2*i, c2*g + f2*h + i*i2
]
# 매트릭스의 곱셈에서 일어나는 예기하지 못하는 결과는 다음과 곱셈에 사용되는 매트릭스의 어느 쪽도 그 자신 0 매트릭스가 아니라 할지라도, 곱의 결과가 0 매트릭스로 되는 일이 있다.
A := [1, 2; 3, 6]
B := [2, 2; -1, -1]
A*B = [0, 0; 0, 0]
# 【 행열의 곱셈의 교환법칙 】
# 곱셈에 있어서 순서에 따른 위치는 대단히 큰 중요성을 가진다. 일반적으로
#
# A*B ≠ B*A
#
# 즉, 교환법칙이 성립하지 않는다는 것을 명심하여야 한다.
# 【 행열의 곱셈의 분배 법칙 】
A*(B + C) == A*B + A*C
# 【 행열의 곱셈의 결합법칙) 】
A*(B*C) == (A*B)*C == A*B*C
# 이것은 ABC를 만드는데 있어서 먼저 BC를 만들고 난 다음에 A를 곱해도 좋고, 또는 AB를 먼저 만들고 그 다음에 C를 곱하여도 좋다는 것을 나타내고 있다.
# 【 행열의 ( Cross Product ) 】
A := [2; 1; 1]
B := [1; 1; 1]
A×B = [0; -1; 1]
[a; b; c]×[d; e; f] → [b*f - c*e; c*d - a*f; a*e - b*d]
# 【 행열의 전치 】
transpose([a, b; c, d]) → [a, c; b, d]
# 어떤 매트릭스 ( 열매트릭스, 행매트릭스, 직사각형매트릭스)도 전치할 수 있다.
#
# 이것은 대단히 중요한 연산이고, 전치 매트릭스는 보통  transpose(A)와 같이 쓴다.
# A를 A'로 전치하는 것은
# A의 모든 요소 a_ij를 a_ji에 의하여 바꾸어 놓는다.
A := [1, 2, -1; 4, -3, 5]
transpose(A) = [1, 4; 2, -3; -1, 5]
# A의 첫째 열이 A'의 첫째 행으로, A의 두번째 열이 A'의 두번재 행 등으로 된다.
#
# 그러므로 전치 매트릭스를 만드는것은 아주 간단하다.
#
# 어떤 매트릭스도 전치할 수 있다.
#
# 열매트릭스의 전치는 행매트릭스이고 이의 역도 성리한다. 그리고, 대칭 매트릭스의 전치는 원래의 매트릭스와 똑같다.
# 3. 연립 대수 방정식
# 다음과 같은 연립대수 방정식을 생각한다.
x + 2*y - z == -3
4*x - 3*y + 4*z == 1
2*x - y + z == 2
# 이것을 매트릭스로 쓰면
[1, 2, -1; 4, -3, 4; 2, -1, 1]*[x; y; z] == [-3; 1; 2]
A := [1, 2, -1; 4, -3, 4; 2, -1, 1]
B := [-3; 1; 2]
X := A^-1*B = [0.857143; -3.57143; -3.28571]
X = [0.857143; -3.57143; -3.28571]
# 4. 행열식
# 5. 역 매트릭스
# 6. 매트릭스의 분할
# 7. 매트릭스의 미분
# 8. 매트릭스의 적분
# [component: inputs [1, 2, 3, 4, 5, 6, 7]]
