# 동깅해 IC 1교 Slab 거푸집 및 동바리 구조검토
tonf := 1000 kgf
## 중앙부 슬래브 거푸집
# 1. 설계 조건
# 1) 하중 계산
# 타설 높이
T := 0.24 m
# 고정 하중
rd := 2.4*tonf*m^-3*0.24*m = 0.576 tonf/m^2
# 거푸집 하중
r2 := 0.04*tonf*m^-2
# 작업 하중
rw := 0.25*tonf*m^-2
총하중
W := rd + r2 + rw = 0.866 tonf/m^2
# 2. 합판 검토
# 【 검토 조건 】
# 합판 두께
t := 12 mm
# 합판의
# 허용 전단응력
τ_a := 10.5*kgf*cm^-2
# 합판 단면적
A := t*1.0*m = 0.012 m^2
# 합판의
# 허용휨응력
σ_a := 240*kgf*cm^-2
# 합판의
# 단면2차모멘트
I := 1.0 m*t^3/12 = 14.4 cm^4
# 합판의
# 탄성계수
E := 7.0*10^4*kgf*cm^-2
# 합판의
# 허용 처짐량
δ_a := 3 mm
# 합판
# 단면계수
Z := 1.0 m*t^2/6 = 24 cm^3  # 장선재 간격
L_장선간격 := 38 cm
# 【 전단력 검토 】
S := W*L_장선간격*1*m/2 = 0.16454 tonf
S = 164.54 kgf
τ := 1.5*S/A = 2.05675 kgf*cm^-2
Shear_check :=
    "O.K" if τ < τ_a
    "N.G" otherwise
    = "O.K"
# 【 휨에 대한 검토 】
M := W*L_장선간격^2*1*m/8 = 0.0156313 tonf*m
σ := M/Z = 65.1304 kgf*cm^-2
Bending_check :=
    "O.K" if σ < σ_a
    "N.G" otherwise
    = "O.K"
# 【 처짐에 대한 검토 】
δ_max := 5*W*L_장선간격^4*1.0*m/(384*E*I) = 2.33255 mm
Deflection_check :=
    "O.K" if δ_max < δ_a
    "N.G" otherwise
    = "O.K"
# 3. 장선 검토
# 【 검토 조건 】
# 사용 부재 | ㄷ형강 100×50×20×2.3t
# 장선의
# 허용 전단응력
τ_a := 1000*kgf*cm^-2
# 장선의
# 허용휨응력
σ_a := 1750*kgf*cm^-2
# 장선의
# 탄성계수
E_장선 := 2.1*10^6*kgf*cm^-2
# 장선의
# 단면적
A_장선 := 5.1720*10^2*mm^2 = 5.172 cm^2
# 장선의
# 단면2차모멘트
I_x.장선 := 8.07*10^5*mm^4 = 80.7 cm^4
I_y.장선 := 1.90*10^5*mm^4 = 19 cm^4
# 장선의
# 단면계수
Z_x.장선 := 1.61*10^4*mm^3 = 16.1 cm^3
Z_y.장선 := 6.06*10^3*mm^3 = 6.06 cm^3
# 장선의
# 허용 처짐량
δ_a.장선 := 3.33 mm
L_멍애간격 := 120 cm
# 【 하중 계산 】
W_장선 := W*L_장선간격 = 0.32908 tonf/m
W_장선 = 329.08 kgf/m
# 【 전단력 검토 】
S := W_장선*L_멍애간격/2 = 0.197448 tonf
S = 197.448 kgf
τ := 1.5*S/A_장선 = 57.2645 kgf*cm^-2
Shear_check :=
    "O.K" if τ < τ_a
    "N.G" otherwise
    = "O.K"
# 【 휨에 대한 검토 】
M := W_장선*L_멍애간격^2/8 = 0.0592344 tonf*m
M = 5923.44 kgf*cm
σ := M/Z_y.장선 = 977.465 kgf*cm^-2
Bending_check :=
    "O.K" if σ < σ_a
    "N.G" otherwise
    = "O.K"
# 【 처짐에 대한 검토 】
δ_max := 5*W_장선*L_멍애간격^4/(384*E_장선*I_y.장선) = 2.22686 mm
Deflection_check :=
    "O.K" if δ_max < δ_a.장선
    "N.G" otherwise
    = "O.K"
# 4. 멍에 검토
# 【 검토 조건 】
# 사용 부재 | 각형 강관 100×50×2.3t
# 멍애의
# 허용 전단응력
τ_a := 1000*kgf*cm^-2
# 멍애의
# 허용휨응력
σ_a := 1750*kgf*cm^-2
# 멍애의
# 탄성계수
E_멍애 := 2.1*10^6*kgf*cm^-2
# 멍애의
# 단면적
A_멍애 := 8.927 cm^2 = 8.927 cm^2
# 멍애의
# 단면2차모멘트
I_x.멍애 := 112 cm^4 = 112 cm^4
I_y.멍애 := 38. cm^4 = 38 cm^4
# 멍애의
# 단면계수
Z_x.멍애 := 22.5 cm^3
Z_y.멍애 := 15.2 cm^3
# 멍애의
# 허용 처짐량
δ_a.멍애 := 3.33 mm
L_지주 := 144 cm
# 【 하중 계산 】
W_멍애 := W*L_멍애간격 = 1.0392 tonf/m
W_멍애 = 10.392 kgf/cm
# 【 전단력 검토 】
S := W_멍애*L_지주/2 = 0.748224 tonf
S = 748.224 kgf
τ := 1.5*S/A_멍애 = 125.724 kgf*cm^-2
Shear_check :=
    "O.K" if τ < τ_a
    "N.G" otherwise
    = "O.K"
# 【 휨에 대한 검토 】
M := W_멍애*L_지주^2/8 = 0.269361 tonf*m
M = 26936.1 kgf*cm
σ := M/Z_x.멍애 = 1197.16 kgf*cm^-2
Bending_check :=
    "O.K" if σ < σ_a
    "N.G" otherwise
    = "O.K"
# 【 처짐에 대한 검토 】
δ_max := 5*W_멍애*L_지주^4/(384*E_멍애*I_x.멍애) = 2.47372 mm
Deflection_check :=
    "O.K" if δ_max < δ_a.멍애
    "N.G" otherwise
    = "O.K"
# 5. 연결 볼트 검토
# 【 검토 조건 】
# 연결 볼트는 거푸집의 중량을 양쪽에서 전체로 받아야 하므로 인장을 받는다.
2.4*tonf/m^3*0.24*m*(1.2 m)*(144 cm)*1/2 = 0.497664 tonf
# 볼트의
# 허용인장응력
σ_a := 1750*kgf*cm^-2
# 볼트의
# 직경
D := 16 mm
# 볼트의
# 단면적
A := π*D^2/4 = 2.01062 cm^2
# 【 하중 계산 】
W_볼트 := 1/2*W*L_멍애간격*L_지주 = 0.748224 tonf
W_볼트 = 748.224 kgf
# 【 응력 검토 】
σ := W_볼트/A = 372.136 kgf*cm^-2
Stress_check :=
    "O.K" if σ < σ_a
    "N.G" otherwise
    = "O.K"
# 6. 평철의 검토
# 【 검토 조건 】
# 평철은 볼트에서 발생하는 반력을 전단으로 저항한다.
# 평철의
# 허용전단응력
τ_a := 1000*kgf*cm^-2
# 평철의
# 폭
B := 4.5 mm
# 평철의
# 높이
H := 32 mm
# 평철의
# 단면적
A := B*H = 1.44 cm^2
# 【 전단력 검토 】
W_평철 := W_볼트
S := W_평철 = 748.224 kgf
τ := 1.5*S/A = 779.4 kgf*cm^-2
Shear_check :=
    "O.K" if τ < τ_a
    "N.G" otherwise
    = "O.K"
τ/τ_a = 77.94 %
# 7. 철근과 평철의 용접 검토
# 캔틸레버 브라켓 검토
# 1. 설계 조건
# 1) 사용 재료의 단위 중량 및 하중 강도
rc := 2.5*tonf/m^3
# 철근 콘크리트의
# 단위중량
rw := 0.25*tonf/m^2
# 작업하중의
# 크기
t_c := 24 cm
# 콘크리트 슬래브
# 두께
# 2) 작용 하중 계산
W_t := rc*t_c + rw = 0.85 tonf/m^2
# 2. 합판 검토
# 【 검토 조건 】
# 합판 두께
t := 12 mm
# 합판의
# 허용 전단응력
τ_a := 10.5*kgf*cm^-2
# 합판 단면적
A := t*1.0*m = 0.012 m^2
# 합판의
# 허용휨응력
σ_a := 240*kgf*cm^-2
# 합판의
# 단면2차모멘트
I := 1.0 m*t^3/12 = 14.4 cm^4
# 합판의
# 탄성계수
E := 7.0*10^4*kgf*cm^-2
# 합판
# 단면계수
Z := 1.0 m*t^2/6 = 24 cm^3
# 합판의
# 허용 처짐량
δ_a := 3 mm
# 장선재 간격
장선배치간격 := 30 cm
# 【 하중 계산 】
W := W_t = 8.5 kgf/(cm*m)
L := 장선배치간격 = 0.3 m
# 【 전단력 검토 】
S := W*L*1*m/2 = 0.1275 tonf
S = 127.5 kgf
τ := 1.5*S/A = 1.59375 kgf*cm^-2
Shear_check :=
    "O.K" if τ < τ_a
    "N.G" otherwise
    = "O.K"
# 【 휨에 대한 검토 】
τ/τ_a = 15.1786 %
M := W*L^2*1*m/8 = 0.0095625 tonf*m
σ := M/Z = 39.8437 kgf*cm^-2
Bending_check :=
    "O.K" if σ < σ_a
    "N.G" otherwise
    = "O.K"
# 【 처짐에 대한 검토 】
σ/σ_a = 16.6016 %
δ_max := 5*W*L^4*1.0*m/(384*E*I) = 0.889369 mm
Deflection_check :=
    "O.K" if δ_max < δ_a
    "N.G" otherwise
    = "O.K"
# 3. 장선 검토
# 【 검토 조건 】
# 사용 부재 | ㅁ형강 50×50×2.3t
# 장선의
# 단면적
# 장선의
# 허용 전단응력
τ_a := 1000*kgf*cm^-2
A := 4.252 cm^2
# 장선의
# 단면2차모멘트
I_x := 15.9 cm^4
# 장선의
# 허용휨응력
σ_a := 1750*kgf*cm^-2
I_y := 15.9 cm^4
# 장선의
# 탄성계수
E := 2.1*10^6*kgf*cm^-2
# 장선의
# 단면계수
Z_x := 6.34 cm^3
# 장선의
# 허용 처짐량
δ_a := 3.33 mm
Z_y := 6.34 cm^3
# Brack
# 설치 간격
멍애배치간격 := 120 cm
# 【 하중 계산 】
W := W_t*장선배치간격 = 0.255 tonf/m
W = 255 kgf/m
L := 멍애배치간격 = 1.2 m
# 【 전단력 검토 】
S := W*L/2 = 0.153 tonf
S = 153 kgf
τ := 1.5*S/A = 53.9746 kgf*cm^-2
Shear_check :=
    "O.K" if τ < τ_a
    "N.G" otherwise
    = "O.K"
# 【 휨에 대한 검토 】
τ/τ_a = 5.39746 %
M := W*L^2/8 = 0.0459 tonf*m
M = 4590 kgf*cm
σ := M/Z_y = 723.975 kgf*cm^-2
Bending_check :=
    "O.K" if σ < σ_a
    "N.G" otherwise
    = "O.K"
# 【 처짐에 대한 검토 】
σ/σ_a = 41.37 %
δ_max := 5*W*L^4/(384*E*I_y) = 2.06199 mm
Deflection_check :=
    "O.K" if δ_max < δ_a
    "N.G" otherwise
    = "O.K"
# 4. 연결 볼트 검토
# 【 검토 조건 】
# 연결 볼트는 거푸집의 중량을 양쪽에서 전체로 받아야 하므로 인장을 받는다.
2.5*tonf/m^3*0.24*m*(1.2 m)*(23 cm) = 0.1656 tonf
# 볼트의
# 직경
D := 16 mm
# 볼트의
# 허용인장응력
σ_a := 1750*kgf*cm^-2
# 볼트의
# 단면적
A := π*D^2/4 = 2.01062 cm^2
내민길이 := 23 cm
# 【 하중 계산 】
W := W_t*멍애배치간격*내민길이 = 0.2346 tonf
W = 234.6 kgf
# 【 응력 검토 】
σ := W/A = 116.68 kgf*cm^-2
Shear_check :=
    "O.K" if σ < σ_a
    "N.G" otherwise
    = "O.K"
# 5. Bracket의 검토
# 【 검토 조건 】
# 수평부재 일반부에
# 작용하는 하중
W1 := W_t*멍애배치간격 = 1.02 tonf/m
# 수평부재 내민부에
# 작용하는 하중
W2 := rw*멍애배치간격 = 0.3 tonf/m
# 6. Bracket : 수평재  검토
# 【 검토 조건 】
# 사용 부재 | ㄷ형강 75×40×5×7t
# 단면적
A := 8.818 cm^2
# 허용 전단응력
τ_a := 1000*kgf*cm^-2
# 단면2차모멘트
I_x := 75.3 cm^4
# 허용휨응력
σ_ba := 1750*kgf*cm^-2
# 단면계수
Z_x := 20.1 cm^3
L := 1.95 m
# 단면 2차 반경
r_x := 2.92 cm
# 【 전단력 검토 】
S := 0.56*tonf
τ := S/A = 63.5065 kgf*cm^-2
Shear_check :=
    "O.K" if τ < τ_a
    "N.G" otherwise
    = "O.K"
# 【 휨에 대한 검토 】
τ/τ_a = 6.35065 %
M := 0.11*tonf*m
σ_b := M/Z_x = 547.264 kgf*cm^-2
Bending_check :=
    "O.K" if σ_b < σ_ba
    "N.G" otherwise
    = "O.K"
# 【 축력에 대한 검토 】
σ_b/σ_ba = 31.2722 %
P := 0.47*tonf  # (+) 인장
σ_ca := (1400*kgf/cm^2 - (8.4*kgf/cm^2*L/r_x - 20*kgf/cm^2))*1.25 = 1073.8 kgf/cm^2
σ_c := P/A = 53.3001 kgf*cm^-2
Bending_check :=
    "O.K" if σ < σ_a
    "N.G" otherwise
    = "O.K"
# 【 휨과 축력의 조합응력에 대한 검토 】
Stress_check :=
    "O.K" if 1 > (σ_b/σ_ba + σ_c/σ_ca)
    "N.G" otherwise
    = "O.K"
σ_b/σ_ba + σ_c/σ_ca = 0.362359
