# 율하교 Slab 거푸집 및 동바리 구조검토
tonf := 1000 kgf
# 중앙부 슬래브 거푸집
# 1. 설계 조건
# 1) 하중 계산
# 타설 높이
T := 0.24*m
# 고정 하중
rd := 2.55*tonf*m^-3*T = 0.612 tonf*m^-2
# 거푸집 하중
r2 := 0.04*tonf*m^-2
# 작업 하중
rw := 0.25*tonf*m^-2
# 충격 하중
r_w2 := 0.15*tonf*m^-2
# 총 하중
W := rd + r2 + rw + r_w2 = 1.052 tonf*m^-2
W = 0.1052 kgf*cm^-2
# 2. 합판 검토
# 【 검토 조건 】
# 합판 두께
t := 12 mm
# 합판의
# 허용 전단응력
τ_a := 10.5*kgf*cm^-2
# 합판 단면적
A := t*1.0*m = 0.012 m^2
# 합판의
# 허용휨응력
σ_a := 240*kgf*cm^-2
# 합판의
# 단면2차모멘트
I := 1.0 m*t^3/12 = 14.4 cm^4
# 합판의
# 탄성계수
E := 7.0*10^4*kgf*cm^-2
# 합판의
# 허용 처짐량
δ_a := 3 mm
# 합판
# 단면계수
Z := 1.0 m*t^2/6 = 24 cm^3  # 장선재 간격
L_장선간격 := 30 cm
# 【 전단력 검토 】
S := W*L_장선간격*1*m/2 = 0.1578 tonf
S = 157.8 kgf
τ := 1.5*S/A = 1.9725 kgf*cm^-2
Shear_check :=
    "O.K" if τ < τ_a
    "N.G" otherwise
    = "O.K"
# 【 휨에 대한 검토 】
M := W*L_장선간격^2*1*m/8 = 0.011835 tonf*m
σ := M/Z = 49.3125 kgf*cm^-2
Bending_check :=
    "O.K" if σ < σ_a
    "N.G" otherwise
    = "O.K"
# 【 처짐에 대한 검토 】
δ_max := 5*W*L_장선간격^4*1.0*m/(384*E*I) = 1.10073 mm
Deflection_check :=
    "O.K" if δ_max < δ_a
    "N.G" otherwise
    = "O.K"
# 3. 장선 검토
# 【 검토 조건 】
# 사용 부재 | ㄷ형강 100×50×20×2.3t
# 장선의
# 허용 전단응력
τ_a := 1000*kgf*cm^-2
# 장선의
# 허용휨응력
σ_a := 1750*kgf*cm^-2
# 장선의
# 탄성계수
E_장선 := 2.1*10^6*kgf*cm^-2
A := π*(50 mm)^2/4 - π*(50 mm - 2.3 mm*2)^2/4 = 3.44664 cm^2
A_장선 := 50 mm*50*mm + (-(50 mm - 2.3 mm*2)*(50 mm - 2.3 mm*2)) = 4.3884 cm^2
I := 50 mm*(50 mm)^3/12 + (-(50 mm - 2.3 mm*2)*(50 mm - 2.3 mm*2)^3/12) = 16.6802 cm^4
Z := I/(50 mm/2) = 6.67206 cm^3
# 장선의
# 단면적
A_장선 := 5.1720*10^2*mm^2 = 5.172 cm^2
# 장선의
# 단면2차모멘트
I_x.장선 := 8.07*10^5*mm^4 = 80.7 cm^4
I_y.장선 := 1.90*10^5*mm^4 = 19 cm^4
# 장선의
# 단면계수
Z_x.장선 := 1.61*10^4*mm^3 = 16.1 cm^3
Z_y.장선 := Z = 6.67206 cm^3
# 장선의
# 허용 처짐량
δ_a.장선 := 3.33 mm
L_멍애간격 := 70 cm
# 【 하중 계산 】
W_장선 := W*L_장선간격 = 0.3156 tonf/m
W_장선 = 315.6 kgf/m
# 【 전단력 검토 】
S := W_장선*L_멍애간격/2 = 0.11046 tonf
S = 0.11046 tonf
S = 110.46 kgf
τ := 1.5*S/A_장선 = 32.036 kgf*cm^-2
Shear_check :=
    "O.K" if τ < τ_a
    "N.G" otherwise
    = "O.K"
# 【 휨에 대한 검토 】
M := W_장선*L_멍애간격^2/8 = 0.0193305 tonf*m
M = 1933.05 kgf*cm
σ := M/Z_y.장선 = 289.723 kgf*cm^-2
Bending_check :=
    "O.K" if σ < σ_a
    "N.G" otherwise
    = "O.K"
# 【 처짐에 대한 검토 】
δ_max := 5*W_장선*L_멍애간격^4/(384*E_장선*I_y.장선) = 0.247283 mm
Deflection_check :=
    "O.K" if δ_max < δ_a.장선
    "N.G" otherwise
    = "O.K"
# 4. 장선 검토  ( 목재 장선 )
# 【 검토 조건 】
# 사용 부재 | 각관 50×50
# 장선의
# 허용 전단응력
τ_a := 10.5*kgf*cm^-2
# 장선의
# 허용휨응력
σ_a := 105*kgf*cm^-2
# 장선의
# 탄성계수
E_장선 := 700000 kgf*cm^-2
# 장선의
# 단면적
A_장선 := 50 mm*50*mm = 25 cm^2
# 장선의
# 단면2차모멘트
I := 50 mm*(50 mm)^3/12 = 52.0833 cm^4
# 장선의
# 단면계수
Z := I/(50 mm/2) = 20.8333 cm^3
Z_y.장선 := Z = 20.8333 cm^3
# 장선의
# 허용 처짐량
δ_a.장선 := 3.33 mm
L_멍애간격 := 70 cm
# 【 하중 계산 】
W_장선 := W*L_장선간격 = 0.3156 tonf/m
W_장선 = 315.6 kgf/m
# 【 전단력 검토 】
S := W_장선*L_멍애간격/2 = 0.11046 tonf
S = 0.11046 tonf
S = 110.46 kgf
τ := 1.5*S/A_장선 = 6.6276 kgf*cm^-2
Shear_check :=
    "O.K" if τ < τ_a
    "N.G" otherwise
    = "O.K"
# 【 휨에 대한 검토 】
M := W_장선*L_멍애간격^2/8 = 0.0193305 tonf*m
M = 1933.05 kgf*cm
σ := M/Z_y.장선 = 92.7864 kgf*cm^-2
Bending_check :=
    "O.K" if σ < σ_a
    "N.G" otherwise
    = "O.K"
# 【 처짐에 대한 검토 】
δ_max := 5*W_장선*L_멍애간격^4/(384*E_장선*I_y.장선) = 0.74185 mm
Deflection_check :=
    "O.K" if δ_max < δ_a.장선
    "N.G" otherwise
    = "O.K"
# 4. 멍에 검토
# 【 검토 조건 】
# 사용 부재 | 각형 강관 100×50×3.2t
# 허용 전단응력
τ_a := 1000*kgf*cm^-2
# 허용휨응력
σ_a := 1750*kgf*cm^-2
# 탄성계수
E_멍애 := 2.1*10^6*kgf*cm^-2
# 단면적
A_멍애 := 8.927 cm^2 = 8.927 cm^2
A := (100 mm*50*mm) + (-((100 mm - 3.2 mm*2)*(50 mm - 3.2 mm*2))) = 9.1904 cm^2
# 단면2차모멘트
I_x.멍애 := 112 cm^4 = 112 cm^4
I_y.멍애 := 38. cm^4 = 38 cm^4
# 단면계수
Z_x.멍애 := 22.5 cm^3
Z_y.멍애 := 15.2 cm^3
# 허용 처짐량
δ_a.멍애 := 3.33 mm
L_지주 := 144 cm
# 【 하중 계산 】
W_멍애 := W*L_멍애간격 = 0.7364 tonf/m
W_멍애 = 7.364 kgf/cm
# 【 전단력 검토 】
S := W_멍애*L_지주/2 = 0.530208 tonf
S = 530.208 kgf
τ := 1.5*S/A_멍애 = 89.0906 kgf*cm^-2
Shear_check :=
    "O.K" if τ < τ_a
    "N.G" otherwise
    = "O.K"
# 【 휨에 대한 검토 】
M := W_멍애*L_지주^2/8 = 0.190875 tonf*m
M = 19087.5 kgf*cm
σ := M/Z_x.멍애 = 848.333 kgf*cm^-2
Bending_check :=
    "O.K" if σ < σ_a
    "N.G" otherwise
    = "O.K"
# 【 처짐에 대한 검토 】
δ_max := 5*W_멍애*L_지주^4/(384*E_멍애*I_x.멍애) = 1.75293 mm
Deflection_check :=
    "O.K" if δ_max < δ_a.멍애
    "N.G" otherwise
    = "O.K"
# 5. 연결 볼트 검토
# 【 검토 조건 】
# 연결 볼트는 거푸집의 중량을 양쪽에서 전체로 받아야 하므로 인장을 받는다.
2.4*tonf/m^3*0.24*m*(1.2 m)*(144 cm)*1/2 = 0.497664 tonf
# 볼트의
# 허용인장응력
σ_a := 1750*kgf*cm^-2
# 볼트의
# 직경
D := 16 mm
# 볼트의
# 단면적
A := π*D^2/4 = 2.01062 cm^2
# 【 하중 계산 】
W_볼트 := 1/2*W*L_멍애간격*L_지주 = 0.530208 tonf
W_볼트 = 530.208 kgf
# 【 응력 검토 】
σ := W_볼트/A = 263.704 kgf*cm^-2
Stress_check :=
    "O.K" if σ < σ_a
    "N.G" otherwise
    = "O.K"
# 6. 평철의 검토
# 【 검토 조건 】
# 평철은 볼트에서 발생하는 반력을 전단으로 저항한다.
# 평철의
# 허용전단응력
τ_a := 1000*kgf*cm^-2
# 평철의
# 폭
B := 4.5 mm
# 평철의
# 높이
H := 32 mm
# 평철의
# 단면적
A := B*H = 1.44 cm^2
# 【 전단력 검토 】
W_평철 := W_볼트
S := W_평철 = 530.208 kgf
τ := 1.5*S/A = 552.3 kgf*cm^-2
Shear_check :=
    "O.K" if τ < τ_a
    "N.G" otherwise
    = "O.K"
τ/τ_a = 55.23 %
# 7. 철근과 평철의 용접 검토
# 캔틸레버 브라켓 검토
# 1. 설계 조건
# 1) 사용 재료의 단위 중량 및 하중 강도
rc := 2.50*tonf/m^3
# 철근 콘크리트의
# 단위중량
t_c := 24 cm
# 콘크리트 슬래브
# 두께
rw := 0.25*tonf/m^2
# 작업하중의
# 크기
rg := 40*kgf/m^2
2.5*tonf/m^3*t_c*1.2*m = 0.72 tonf/m
# 2) 작용 하중 계산
W_t := rc*t_c + rw + rg = 0.89 tonf/m^2
W_t = 0.089 kgf/cm^2
# 2. 합판 검토
# 【 검토 조건 】
# 합판 두께
t := 12 mm
# 합판의
# 허용 전단응력
τ_a := 10.5*kgf*cm^-2
# 합판 단면적
A := t*1.0*m = 0.012 m^2
# 합판의
# 허용휨응력
σ_a := 240*kgf*cm^-2
# 합판의
# 단면2차모멘트
I := 1.0 m*t^3/12 = 14.4 cm^4
# 합판의
# 탄성계수
E := 7.0*10^4*kgf*cm^-2
# 합판
# 단면계수
Z := 1.0 m*t^2/6 = 24 cm^3
# 합판의
# 허용 처짐량
δ_a := 3 mm
# 장선재 간격
장선배치간격 := 30 cm
# 【 하중 계산 】
W := W_t = 8.9 kgf/(cm*m)
L := 장선배치간격 = 0.3 m
# 【 전단력 검토 】
S := W*L*1*m/2 = 0.1335 tonf
S = 133.5 kgf
τ := 1.5*S/A = 1.66875 kgf*cm^-2
Shear_check :=
    "O.K" if τ < τ_a
    "N.G" otherwise
    = "O.K"
# 【 휨에 대한 검토 】
τ/τ_a = 15.8929 %
M := W*L^2*1*m/8 = 0.0100125 tonf*m
σ := M/Z = 41.7187 kgf*cm^-2
Bending_check :=
    "O.K" if σ < σ_a
    "N.G" otherwise
    = "O.K"
# 【 처짐에 대한 검토 】
σ/σ_a = 17.3828 %
δ_max := 5*W*L^4*1.0*m/(384*E*I) = 0.931222 mm
Deflection_check :=
    "O.K" if δ_max < δ_a
    "N.G" otherwise
    = "O.K"
# 3. 장선 검토
# 【 검토 조건 】
# 사용 부재 | ㅁ형강 50×50×2.3t
# 장선의
# 단면적
# 장선의
# 허용 전단응력
τ_a := 1000*kgf*cm^-2
A := 5.17 cm^2
# 장선의
# 단면2차모멘트
I_x := 19. cm^4
# 장선의
# 허용휨응력
σ_a := 1750*kgf*cm^-2
I_y := 19 cm^4
# 장선의
# 탄성계수
E := 2.1*10^6*kgf*cm^-2
# 장선의
# 단면계수
Z_x := 6.34 cm^3
# 장선의
# 허용 처짐량
δ_a := 3.33 mm
Z_y := 6.06 cm^3
# Brack
# 설치 간격
멍애배치간격 := 120 cm
# 【 하중 계산 】
W := W_t*장선배치간격 = 0.267 tonf/m
W = 267 kgf/m
L := 멍애배치간격 = 1.2 m
# 【 전단력 검토 】
S := W*L/2 = 0.1602 tonf
S = 160.2 kgf
τ := 1.5*S/A = 46.4797 kgf*cm^-2
Shear_check :=
    "O.K" if τ < τ_a
    "N.G" otherwise
    = "O.K"
# 【 휨에 대한 검토 】
τ/τ_a = 4.64797 %
M := W*L^2/8 = 0.04806 tonf*m
M = 4806 kgf*cm
σ := M/Z_y = 793.069 kgf*cm^-2
Bending_check :=
    "O.K" if σ < σ_a
    "N.G" otherwise
    = "O.K"
# 【 처짐에 대한 검토 】
σ/σ_a = 45.3182 %
δ_max := 5*W*L^4/(384*E*I_y) = 1.80677 mm
Deflection_check :=
    "O.K" if δ_max < δ_a
    "N.G" otherwise
    = "O.K"
# 4. 연결 볼트 검토
# 【 검토 조건 】
# 연결 볼트는 거푸집의 중량을 양쪽에서 전체로 받아야 하므로 인장을 받는다.
2.5*tonf/m^3*0.24*m*(1.2 m)*(70 cm) = 0.504 tonf
# 볼트의
# 직경
D := 16 mm
# 볼트의
# 허용인장응력
σ_a := 1750*kgf*cm^-2
# 볼트의
# 단면적
A := π*D^2/4 = 2.01062 cm^2
내민길이 := 70 cm
멍애배치간격 = 1.2 m
# 【 하중 계산 】
W := W_t*멍애배치간격*내민길이 = 0.7476 tonf
W = 747.6 kgf
# 【 응력 검토 】
σ := W/A = 371.826 kgf*cm^-2
Shear_check :=
    "O.K" if σ < σ_a
    "N.G" otherwise
    = "O.K"
# 5. Bracket의 검토
# 【 검토 조건 】
# 수평부재 일반부에
# 작용하는 하중
W1 := W_t*멍애배치간격 = 1.068 tonf/m
# 수평부재 내민부에
# 작용하는 하중
W2 := rw*멍애배치간격 = 0.3 tonf/m
# 6. Bracket : 수평재  검토
# 【 검토 조건 】
# 사용 부재 | ㄷ형강 75×40×5×7t
# 단면적
A := 8.818 cm^2
# 허용 전단응력
τ_a := 1000*kgf*cm^-2
# 단면2차모멘트
I_x := 75.3 cm^4
# 허용휨응력
σ_ba := 1750*kgf*cm^-2
# 단면계수
Z_x := 20.1 cm^3
L := 1.0 m
# 단면 2차 반경
r_x := 2.92 cm
# 【 전단력 검토 】
S := 0.58*tonf
τ := S/A = 65.7746 kgf*cm^-2
Shear_check :=
    "O.K" if τ < τ_a
    "N.G" otherwise
    = "O.K"
# 【 휨에 대한 검토 】
τ/τ_a = 6.57746 %
M := 0.12*tonf*m
σ_b := M/Z_x = 597.015 kgf*cm^-2
Bending_check :=
    "O.K" if σ_b < σ_ba
    "N.G" otherwise
    = "O.K"
# 【 축력에 대한 검토 】
σ_b/σ_ba = 34.1151 %
P := 0.48*tonf  # (+) 인장
σ_ca := (1400*kgf/cm^2 - (8.4*kgf/cm^2*L/r_x - 20*kgf/cm^2))*1.25 = 1415.41 kgf/cm^2
σ_c := P/A = 54.4341 kgf*cm^-2
Bending_check :=
    "O.K" if σ < σ_a
    "N.G" otherwise
    = "O.K"
# 【 휨과 축력의 조합응력에 대한 검토 】
Stress_check :=
    "O.K" if 1 > (σ_b/σ_ba + σ_c/σ_ca)
    "N.G" otherwise
    = "O.K"
σ_b/σ_ba + σ_c/σ_ca = 0.37961
# 7. Bracket : 수직재  검토
# 【 검토 조건 】
# 사용 부재 | BOX 40×40×3.2t
# 단면적
A := 4.710*10^-4*m^2
# 허용 전단응력
τ_a := 1000*kgf*cm^-2
# 단면2차모멘트
I_x := 1.071*10^-7*m^4
# 허용휨응력
σ_ba := 1750*kgf*cm^-2
# 단면계수
Z_x := 5.356*10^-6*m^3
L := sqrt(1.54^2 + 1.0^2)*m = 1.83619 m
# 단면 2차 반경
r_x := 0.0151 m
# 【 전단력 검토 】
S := 0.*tonf
τ := S/A = 0 kgf*cm^-2
Shear_check :=
    "O.K" if τ < τ_a
    "N.G" otherwise
    = "O.K"
# 【 휨에 대한 검토 】
τ/τ_a = 0 %
M := 0.*tonf*m
σ_b := M/Z_x = 0 kgf*cm^-2
Bending_check :=
    "O.K" if σ_b < σ_ba
    "N.G" otherwise
    = "O.K"
# 【 축력에 대한 검토 】
σ_b/σ_ba = 0 %
P := 0.76*tonf  # (+) 인장
σ_ca := 1400*kgf/cm^2*1.25 = 1750 kgf/cm^2
σ_c := P/A = 161.359 kgf*cm^-2
Bending_check :=
    "O.K" if σ < σ_a
    "N.G" otherwise
    = "O.K"
# 【 휨과 축력의 조합응력에 대한 검토 】
Stress_check :=
    "O.K" if 1 > (σ_b/σ_ba + σ_c/σ_ca)
    "N.G" otherwise
    = "O.K"
σ_b/σ_ba + σ_c/σ_ca = 0.092205
# 8. Bracket : 경사재  검토
# 【 검토 조건 】
# 사용 부재 | PIPE 48.6×3t
# 단면적
A := 4.298*10^-4*m^2
# 허용 전단응력
τ_a := 1000*kgf*cm^-2
# 단면2차모멘트
I_x := 1.122*10^-7*m^4
# 허용휨응력
σ_ba := 1750*kgf*cm^-2
# 단면계수
Z_x := 4.617*10^-6*m^3
L := 1.54 m
# 단면 2차 반경
r_x := 0.0162 m
# 【 전단력 검토 】
S := 0.*tonf
τ := S/A = 0 kgf*cm^-2
Shear_check :=
    "O.K" if τ < τ_a
    "N.G" otherwise
    = "O.K"
# 【 휨에 대한 검토 】
τ/τ_a = 0 %
M := 1.545*10^-3*tonf*m
σ_b := M/Z_x = 33.4633 kgf*cm^-2
Bending_check :=
    "O.K" if σ_b < σ_ba
    "N.G" otherwise
    = "O.K"
# 【 축력에 대한 검토 】
σ_b/σ_ba = 1.91219 %
P := -0.89*tonf  # (+) 인장
σ_ca := (1400*kgf/cm^2 - (8.4*kgf/cm^2*L/r_x - 20*kgf/cm^2))*1.25 = 776.852 kgf/cm^2
σ_c := |P|/A = 207.073 kgf*cm^-2
Bending_check :=
    "O.K" if σ < σ_a
    "N.G" otherwise
    = "O.K"
# 【 휨과 축력의 조합응력에 대한 검토 】
Stress_check :=
    "O.K" if 1 > (σ_b/σ_ba + σ_c/σ_ca)
    "N.G" otherwise
    = "O.K"
σ_b/σ_ba + σ_c/σ_ca = 0.285676
