1000 kg = 1 tonne
g = 9.80665 m/s^2
1000 kg = 1.10231 ton
1000/0.98 = 1020.41
1 tonne = 1000 kg
1 ton = 907.185 kg
1000 kgf = 1 tonne_force
1000 kgf = 1.10231 tonf
## 섬유 돌망태
# 1. 수리 설계 조건
V_d := 4.0*m/s
H_d := 4.54 m
# 2. 섬유 돌망태 설계 조건
B := 2.0 m  # 섬유 돌망태의 길이 (지름)
I := 1.60 m
R := 0.40 m
A_D := 0.73 m^2  # 섬유돌망태의 투영면적 ( 단면적 )
A_G := 3.00 m^2  # 섬유돌망태의 저명면적 ( 평면적 )
ρ_b := 2.650*tonne/m^3  # 섬유돌망태의 속 채움 골재의 밀도
ρ_w := 1.000*tonne/m^3  # 물의 밀도
g := 9.8*m/s^2  # 중력 가속도
K := 0.094  # 체적 보정 계수
π*(2 m)^2/4*0.4*m*2.65*tonnef/m^3 = 3.33009 tonne_force
# 3. 유동 안정성 검토
# 공중 중량의 게산
0.094*2.65*9.8*2^3 = 19.5294
0.094*2.65*tonne/m^3*9.8*m/s^2*(2 m)^3 = 1.99145 tonne_force
W := 0.094*ρ_b*g*B^3 = 1.99145 tonne_force
# 투영면적게수
C_1 := A_D/B^2 = 0.1825
# 정면면적게수
C_2 := A_G/B^2 = 0.75
# 섬유 돌망태의 수중중량
W_W := (1 - ρ_w/ρ_b)*W = 1.23996 tonne_force
# 항력계수의 산정
C_D := 0.5
# 양력게수의 산정
C_L := 0.15
# 항력 산정
D := 1/2*ρ_w*A_D*C_D*V_d^2 = 297.757 kgf
# 양력 산정
L := 1/2*ρ_w*A_G*C_L*V_d^2 = 367.098 kgf
# 마찰계수
μ := 0.8
D = 297.757 kgf
μ*(W_W - L) = 698.289 kgf
Stable_check :=
    "O.K" if D < μ*(W_W - L)
    "N.G" otherwise
    = "O.K"
# 4. 소류력 검토
# 마찰계수
f := 0.3
# 수심
H_d = 4.54 m
# 수중 단위 중량
ρ_b = 2.65 tonne/m^3
ρ_w = 1 tonne/m^3
0.4 m*3.0*m^2*(ρ_b - ρ_w)*g = 1.97866 tonne_force
0.3*0.491*5 = 0.7365
W_W := (1 - ρ_w/ρ_b)*(2 tonnef/1.31) = 0.950598 tonne_force
W_s := □  # error: This placeholder is empty.
1.99/(0.4*3.1) = 1.60484
0.3*0.491*2 = 0.2946
0.483*0.4*0.3 = 0.05796
0.4*3 = 1.2
0.3*5*0.491 = 0.7365
0.3*5*0.943 = 1.4145
2 tonnef/(1.31 m^3) - 1 tonnef/(1.0 m^3) = 5165.33 kg/(m^2*s^2)
1.99/1.31 = 1.51908
3.99/2.5 = 1.596
3.99/(0.55*4.52) = 1.60499
2.65*1.3 = 3.445
