tonf := 1000 kgf
g = 9.80665 m/s^2
## 교량용 방호울타리 구조 계산서
## 2012.6.20
# 3. 충돌 시 최대 충격력
# 3.1 Olsen Model ( NCHRP Report 86 )
# 【 설계 입력 변수값 】
A
# 차량 앞면으로부터
# 차량의 무게
# 중심 까지의 거리
A := 14.2*ft = 4.32816 m
B
# 차량의 폭
B := 8*ft = 2.4384 m
θ
# 충돌각
θ := 15*deg = 0.261799 rad
D
# 방호울타리의
# 횡방향 변위
D := 0.0*mm
V_o
# 충돌전 차량의 속도
V_o := 80*km/hr = 22.2222 m/s
# 1) 감가속도
avgG_lat := V_o^2*sin(θ)^2/(2*g*(A*sin(θ) - 0.5*B*(1 - cos(θ)) + D)) = 1.56361
maxG_lat := π/2*avgG_lat = 2.45612
# 2) 횡방향 충격력
W := 14*tonf  # 차량의 중량  # 종별  # 차량 중량 (tonf)
# SB5 | 14*tonf
25*tonf
maxF_lat := maxG_lat*W = 34.3857 tonf  # SB6
# SB7 | 36*tonf
# 3.2 AASHTO LRFD Bridge Design Specifications
# 1) 적용기준
# TL - 4
# 2) 황방향 충격력
# 종별 | 충격력
maxF_AASHTO := 240000 N = 24.4732 tonf  # SB5
# TL-4
240000 N
# SB6 | TL-5 | 550000 N
