# 2.12 전단 설계 및 전단연결재 산정  ( 내측거더 지점부 )
tonf := 1000 kgf
# 1) 극한 전단력 계산
# 【 검토 조건 】
V_D := 739.87 kN = 75.4457 tonf
V_L := 416.04 kN = 42.4243 tonf
# 【 극한 전단력 계산 】
V_u := 1.3*V_D + 2.15*V_L = 1856.32 kN
V_u = 189.292 tonf
# 2) 휨전단균열이 발생할때의 콘크리트의 공칭전단강도
# 【 검토 조건 】
f_ck := 40 MPa
# 거더 하단에서 강연선 까지의 높이
y1 := 0.294 m
y2 := 0.700 m
y3 := 1.086 m
y4 := 1.500 m
H := 2.000 m
d := H - (y1 + y2 + y3 + y4)/4 = 1.105 m
0.8*H = 1.6 m
d :=
    d if d > 0.8*H
    (0.8*H) otherwise
    = 1.6 m
# 3) 복부전단균열이 발생할때의 콘크리트의 공칭전단강도
A_p
A_p := 1184.52 mm^2*4 = 4.73808 m*mm
A_3 := 702149 mm^2  # : PS 강연선 환산단면의 단면적
A_c
A_c := A_3 = 0.702149 m^2
α
f_pe
f_pe := □  # error: This placeholder is empty.
# 4) 콘크리트의 공칭전단강도 결정
# 5) 전단 철근이 부담하여야할 전단강도
# 6) 스트럽의 배치간격 결정
# 7) 전단연결재의 설계
