tonf := 1000 kgf
# 3.3  고정하중 및 활하중 해석
# 3.2.1 고정하중 산정 및 고정하중에 의한 단면력 산정
# 1) 고정하중 산정
# (1) 거더 중량
# 표준 구간
w_girder := 0.6741 m^2*25*kN/m^3 = 16.8525 kN/m
# 단부
w_Girder_End := 16.785*kN/m + (1.590 m + 1.270 m)/2*0.23*m*25*kN/m^3*2 = 33.23 kN/m
# 가로보 구간 헌치부
h := (0.52 m + 0.42 m)*1/2 = 0.47 m
W_CrossBeam_Hunch := (0.3 m*0.25*m*0.47*m*25*kN/m^3)*2 + (0.23 m*0.25*m)/2*0.47*m*25*kN/m^3*4 = 3.11375 kN
# (2) 가로보 중량
# 내측 가로보 (중앙부)
h := 0.7 m
b := 0.3 m
L := 2.090 m
W_CrossBeam_In := h*b*L*25*kN/m^3 = 10.9725 kN
# 외측 가로보 (중앙부)
h := 0.7 m
b := 0.3 m
L := 2.090/2*m
W_CrossBeam_Out := h*b*L*25*kN/m^3 = 5.48625 kN
# (3) 방호벽 중량
Section_1 := 0.23 m*1.08*m = 0.2484 m^2
Section_2 := 1/2*((80 mm + 125 mm + 175 mm) + 1080 mm)*70*mm = 0.0511 m^2
Section_3 := 1/2*((80 mm + 125 mm + 175 mm) + (80 mm + 125 mm))*120*mm = 0.0351 m^2
A := Section_1 + Section_2 + Section_3 = 0.3346 m^2
w := A*25*kN/m^3 = 8.365 kN/m
# 2) 고정하중에 의한 단면력
# (1) 거더 자중
# 【 작용력 】
w_girder = 16.8525 kN/m
w_Girder_End = 33.23 kN/m
W_CrossBeam_Hunch = 3.11375 kN
W_CrossBeam_In = 10.9725 kN
W_CrossBeam_Out = 5.48625 kN
# 【 전단력 】
L := 29.1 m
V1 := 1/2*w_girder*L + (w_Girder_End - w_girder)*0.2*m + (1/2*(w_Girder_End - w_girder)*3.4*m) + (W_CrossBeam_Hunch*1/2) = 277.878 kN
V2 := V1 - w_girder*3.638*m = 216.569 kN
# 【 단면적 】
b1 := 700 mm
h1 := 180 mm
A1 := b1*h1 = 126000 mm^2
b2 := 250 mm
h2 := 100 mm
A2 := (1/2*b2*h2)*2 = 25000 mm^2
b3 := 200 mm
h3 =  # error: This variable is undefined.
A3 := b3*h3
b4 := 230 mm
h4 := 220 mm
A4 := (1/2*b4*h4)*2 = 50600 mm^2
b5 := 660 mm
h5 := 230 mm
A5 := b5*h5 = 151800 mm^2
ΣA := A1 + A2 + A3 + A4 + A5
A_1 := ΣA
# 【 단면 도심 거리 】
b1 = 0.7 m
h1 = 0.18 m
y1 := h1/2 = 90 mm
b2 = 0.25 m
h2 = 0.1 m
y2 := h1 + h2*1/3 = 213.333 mm
b3 = 0.2 m
h3 =  # error
y3 := h1 + h3/2
b4 = 0.23 m
h4 = 0.22 m
y4 := h1 + h3 - h4*1/3
b5 = 0.66 m
h5 = 0.23 m
y5 := h1 + h3 + h5/2
# 【 단면 1차모멘트 】
b1 = 0.7 m
h1 := 180 mm
Ay1 := A1*y1 = 11340000 mm^3
b2 = 0.25 m
h2 := 100 mm
Ay2 := A2*y2 = 5333333 mm^3
b3 = 0.2 m
h3 =  # error
Ay3 := A3*y3
b4 = 0.23 m
h4 := 220 mm
Ay4 := A4*y4
b5 = 0.66 m
h5 := 230 mm
Ay5 := A5*y5
Q_1 := Ay1 + Ay2 + Ay3 + Ay4 + Ay5
# 【 단면 도심 계산 】
# BEAM 상단에서 도심 까지의 거리
y_t1 := (Ay1 + Ay2 + Ay3 + Ay4 + Ay5)/(A1 + A2 + A3 + A4 + A5)  # : 빔 도심에서 빔 상연까지 거리
y_b1 := y_t1 - 2000 mm  # : 빔 도심에서 빔 하연까지 거리
yy1 := y_t1 - h1/2
yy2 := y_t1 - (h1 + h2*1/3)
yy3 := y_t1 - (h1 + h3/2)
yy4 := y_b1 + (h5 + 1/3*h4)
yy5 := y_b1 + (1/2*h5)
# 【 단면 2차 모멘트 계산 】
Ayy1 := A1*yy1^2
Ayy2 := A2*yy2^2
Ayy3 := A3*yy3^2
Ayy4 := A4*yy4^2
Ayy5 := A5*yy5^2
ΣAyy := Ayy1 + Ayy2 + Ayy3 + Ayy4 + Ayy5
I1 := b1*h1^3/12 = 340200000 mm^4
I2 := (1/36*b2*h2^3)*2 = 13888889 mm^4
I3 := 1/12*b3*h3^3
I4 := (1/36*b4*h4^3)*2 = 136057778 mm^4
I5 := (1/12*b5*h5^3) = 0.000669185 m^4
I_o := I1 + I2 + I3 + I4 + I5
I_x1 := ΣAyy + I_o
I_x1 =  # error
# 【 단면 계수 계산 】
Z_t1 := I_x1/y_t1
Z_b1 := I_x1/y_b1
r_1 := sqrt(I_x1/ΣA)
A_1 =  # error
y_t1 =  # error
y_b1 =  # error
Q_1 =  # error
I_x1 =  # error
# 3.1.2 순단면에 대한 단면 제계수의 계산
e := 0.110 m
# 【 단면적 】
A_1 =  # error
D_sheth := 66 mm
A_sheth_unit := π*D_sheth^2/4 = 0.00342119 m^2
n_sheth := 4
A_sheth := -A_sheth_unit*n_sheth = -0.0136848 m^2
ΣA := A_1 + A_sheth
# 【 단면 도심 계산 】
y1 := y_t1
y2 := h - e = 0.59 m
# BEAM 상단에서 도심 까지의 거리
y_t2 := (A_1*y1 + A_sheth*y2)/(A_1 + A_sheth)  # : 빔 도심에서 빔 상연까지 거리
y_b2 := y_t1 - h  # : 빔 도심에서 빔 하연까지 거리
# 【 단면 2차 모멘트 계산 】
