tonf := 1000 kgf
# 3.1 단면 제계수의 산정
# 3.1.1 총단면에 대한 단면 제계수의 계산
b1 := 700 mm
h1 := 180 mm
b2 := 250 mm
h2 := 100 mm
b3 := 200 mm
h3 := 1590 mm
b4 := 230 mm
h4 := 220 mm
b5 := 660 mm
h5 := 230 mm
h := h1 + h3 + h5 = 2 m
# 【 단면적 】
b1 := 700 mm
h1 := 180 mm
A1 := b1*h1 = 126000 mm^2
b2 := 250 mm
h2 := 100 mm
A2 := (1/2*b2*h2)*2 = 25000 mm^2
b3 := 200 mm
h3 = 1.59 m
A3 := b3*h3 = 318000 mm^2
b4 := 230 mm
h4 := 220 mm
A4 := (1/2*b4*h4)*2 = 50600 mm^2
b5 := 660 mm
h5 := 230 mm
A5 := b5*h5 = 151800 mm^2
ΣA := A1 + A2 + A3 + A4 + A5 = 0.6714 m^2
A_1 := ΣA = 0.6714 m^2
# 【 단면 도심 거리 】
b1 = 0.7 m
h1 = 0.18 m
y1 := h1/2 = 90 mm
b2 = 0.25 m
h2 = 0.1 m
y2 := h1 + h2*1/3 = 213.333 mm
b3 = 0.2 m
h3 = 1.59 m
y3 := h1 + h3/2 = 975 mm
b4 = 0.23 m
h4 = 0.22 m
y4 := h1 + h3 - h4*1/3 = 1696.67 mm
b5 = 0.66 m
h5 = 0.23 m
y5 := h1 + h3 + h5/2 = 1885 mm
# 【 단면 1차모멘트 】
b1 = 0.7 m
h1 := 180 mm
Ay1 := A1*y1 = 11340000 mm^3
b2 = 0.25 m
h2 := 100 mm
Ay2 := A2*y2 = 5333333 mm^3
b3 = 0.2 m
h3 = 1.59 m
Ay3 := A3*y3 = 310050000 mm^3
b4 = 0.23 m
h4 := 220 mm
Ay4 := A4*y4 = 85851333 mm^3
b5 = 0.66 m
h5 := 230 mm
Ay5 := A5*y5 = 286143000 mm^3
Q_1 := Ay1 + Ay2 + Ay3 + Ay4 + Ay5 = 0.698718 m^3
# 【 단면 도심 계산 】
# BEAM 상단에서 도심 까지의 거리
y_t1 := (Ay1 + Ay2 + Ay3 + Ay4 + Ay5)/(A1 + A2 + A3 + A4 + A5) = 1040.69 mm  # : 빔 도심에서 빔 상연까지 거리
y_b1 := y_t1 - 2000 mm = -959.312 mm  # : 빔 도심에서 빔 하연까지 거리
yy1 := y_t1 - h1/2 = 950.688 mm
yy2 := y_t1 - (h1 + h2*1/3) = 827.354 mm
yy3 := y_t1 - (h1 + h3/2) = 65.6876 mm
yy4 := y_b1 + (h5 + 1/3*h4) = -655.979 mm
yy5 := y_b1 + (1/2*h5) = -844.312 mm
# 【 단면 2차 모멘트 계산 】
Ayy1 := A1*yy1^2 = 1.1388e11 mm^4
Ayy2 := A2*yy2^2 = 1.71129e10 mm^4
Ayy3 := A3*yy3^2 = 1.37213e9 mm^4
Ayy4 := A4*yy4^2 = 2.17736e10 mm^4
Ayy5 := A5*yy5^2 = 1.08213e11 mm^4
ΣAyy := Ayy1 + Ayy2 + Ayy3 + Ayy4 + Ayy5 = 2.62351e11 mm^4
I1 := b1*h1^3/12 = 340200000 mm^4
I2 := (1/36*b2*h2^3)*2 = 13888889 mm^4
I3 := 1/12*b3*h3^3 = 6.69947e10 mm^4
I4 := (1/36*b4*h4^3)*2 = 136057778 mm^4
I5 := (1/12*b5*h5^3) = 0.000669185 m^4
I_o := I1 + I2 + I3 + I4 + I5 = 6.8154e10 mm^4
I_x1 := ΣAyy + I_o = 3.30505e11 mm^4
I_x1 = 0.330505 m^4
# 【 단면 계수 계산 】
Z_t1 := I_x1/y_t1 = 317583231 mm^3
Z_b1 := I_x1/y_b1 = -344522746 mm^3
r_1 := sqrt(I_x1/ΣA) = 0.701614 m
A_1 = 0.6714 m^2
y_t1 = 1.04069 m
y_b1 = -0.959312 m
Q_1 = 0.698718 m^3
I_x1 = 0.330505 m^4
# 3.1.2 순단면에 대한 단면 제계수의 계산
e := 0.110 m
# 【 단면적 】
A_1 = 0.6714 m^2
D_sheth := 66 mm
A_sheth_unit := π*D_sheth^2/4 = 0.00342119 m^2
n_sheth := 4
A_sheth := -A_sheth_unit*n_sheth = -0.0136848 m^2
ΣA := A_1 + A_sheth = 0.657715 m^2
# 【 단면 도심 계산 】
y1 := y_t1 = 1.04069 m
y2 := h - e = 1.89 m
# BEAM 상단에서 도심 까지의 거리
y_t2 := (A_1*y1 + A_sheth*y2)/(A_1 + A_sheth) = 1023.02 mm  # : 빔 도심에서 빔 상연까지 거리
y_b2 := y_t1 - h = -959.312 mm  # : 빔 도심에서 빔 하연까지 거리
# 【 단면 2차 모멘트 계산 】
