tonf := 1000 kgf
# 3.1 단면 제계수의 산정
# 3.1.1 총단면에 대한 단면 제계수의 계산
b1 := 700 mm
h1 := 180 mm
b2 := 250 mm
h2 := 100 mm
b3 := 200 mm
h3 := 1590 mm
b4 := 230 mm
h4 := 220 mm
b5 := 660 mm
h5 := 230 mm
h := h1 + h3 + h5 = 2 m
# 【 단면적 】
b1 := 700 mm
h1 := 180 mm
A1 := b1*h1 = 126000 mm^2
b2 := 250 mm
h2 := 100 mm
A2 := (1/2*b2*h2)*2 = 25000 mm^2
b3 := 200 mm
h3 = 1.59 m
A3 := b3*h3 = 318000 mm^2
b4 := 230 mm
h4 := 220 mm
A4 := (1/2*b4*h4)*2 = 50600 mm^2
b5 := 660 mm
h5 := 230 mm
A5 := b5*h5 = 151800 mm^2
ΣA := A1 + A2 + A3 + A4 + A5 = 0.6714 m^2
A_1 := ΣA = 0.6714 m^2
# 【 단면 도심 거리 】
b1 = 0.7 m
h1 = 0.18 m
y1 := h1/2 = 90 mm
b2 = 0.25 m
h2 = 0.1 m
y2 := h1 + h2*1/3 = 213.333 mm
b3 = 0.2 m
h3 = 1.59 m
y3 := h1 + h3/2 = 975 mm
b4 = 0.23 m
h4 = 0.22 m
y4 := h1 + h3 - h4*1/3 = 1696.67 mm
b5 = 0.66 m
h5 = 0.23 m
y5 := h1 + h3 + h5/2 = 1885 mm
# 【 단면 1차모멘트 】
b1 = 0.7 m
h1 := 180 mm
Ay1 := A1*y1 = 11340000 mm^3
b2 = 0.25 m
h2 := 100 mm
Ay2 := A2*y2 = 5333333 mm^3
b3 = 0.2 m
h3 = 1.59 m
Ay3 := A3*y3 = 310050000 mm^3
b4 = 0.23 m
h4 := 220 mm
Ay4 := A4*y4 = 85851333 mm^3
b5 = 0.66 m
h5 := 230 mm
Ay5 := A5*y5 = 286143000 mm^3
Q_1 := Ay1 + Ay2 + Ay3 + Ay4 + Ay5 = 0.698718 m^3
# 【 단면 도심 계산 】
# BEAM 상단에서 도심 까지의 거리
y_t1 := (Ay1 + Ay2 + Ay3 + Ay4 + Ay5)/(A1 + A2 + A3 + A4 + A5) = 1040.69 mm  # : 빔 도심에서 빔 상연까지 거리
y_b1 := y_t1 - 2000 mm = -959.312 mm  # : 빔 도심에서 빔 하연까지 거리
yy1 := y_t1 - h1/2 = 950.688 mm
yy2 := y_t1 - (h1 + h2*1/3) = 827.354 mm
yy3 := y_t1 - (h1 + h3/2) = 65.6876 mm
yy4 := y_b1 + (h5 + 1/3*h4) = -655.979 mm
yy5 := y_b1 + (1/2*h5) = -844.312 mm
# 【 단면 2차 모멘트 계산 】
Ayy1 := A1*yy1^2 = 1.1388e11 mm^4
Ayy2 := A2*yy2^2 = 1.71129e10 mm^4
Ayy3 := A3*yy3^2 = 1.37213e9 mm^4
Ayy4 := A4*yy4^2 = 2.17736e10 mm^4
Ayy5 := A5*yy5^2 = 1.08213e11 mm^4
ΣAyy := Ayy1 + Ayy2 + Ayy3 + Ayy4 + Ayy5 = 2.62351e11 mm^4
I1 := b1*h1^3/12 = 340200000 mm^4
I2 := (1/36*b2*h2^3)*2 = 13888889 mm^4
I3 := 1/12*b3*h3^3 = 6.69947e10 mm^4
I4 := (1/36*b4*h4^3)*2 = 136057778 mm^4
I5 := (1/12*b5*h5^3) = 0.000669185 m^4
I_o := I1 + I2 + I3 + I4 + I5 = 6.8154e10 mm^4
I_x1 := ΣAyy + I_o = 3.30505e11 mm^4
I_x1 = 0.330505 m^4
# 【 단면 계수 계산 】
Z_t1 := I_x1/y_t1 = 317583231 mm^3
Z_b1 := I_x1/y_b1 = -344522746 mm^3
r_1 := sqrt(I_x1/ΣA) = 0.701614 m
A_1 = 0.6714 m^2
y_t1 = 1.04069 m
y_b1 = -0.959312 m
Q_1 = 0.698718 m^3
I_x1 = 0.330505 m^4
# 3.1.2 순단면에 대한 단면 제계수의 계산
# 【  사용 기호 】
H_beam
# PSC Beam 전체 높이
H_beam := 2000 mm
D_sheta
# 쉬스관의 직경
D_sheth := 66 mm
# A_sheth | 쉬스관의 단면적
N_sheth
# 쉬스관의 설치 개수
N_sheth := 4
# e_sheth_bottom | 쉬스관의 거더하단에서의 편심거리
# y_t2 | 도심에서 PSC Beam 상연까지의 거리
# y_b2 | 도심에서 PSC Beam 하연까지의 거리
# I_x1 | 순단면에개한 단면2차모멘트
# Z_t2 | 순단면에서 상연에 대한 단면계수
# Z_b2 | 순단면에서 하연에 대한 단면계수
# e_p2 | 순단면 도심에서 PS 강연선 까지의 편심거리
# Z_p2 | 순단면에서 PS강연선에 대한 단면계수
# 【 쉬스관의 단면적 】
A_sheth := π*D_sheth^2/4 = 0.00342119 m^2
A_sheth := A_sheth*N_sheth = 0.0136848 m^2
# 【 쉬스관의 도심 】
# 쉬스관의 도심계산근거 추가
e_sheth_bottom := 0.11 m
# 【 PSC Beam 전체단면 】
A_1 := 0.6714 m^2
y_1 := 1.041 m
A_1*y_1 = 0.698927 m^3
I_1 := 0.330509 m^4
# 【 쉬스관 】
A_sheth = 0.0136848 m^2
y_sheth_top := H_beam - e_sheth_bottom = 1.89 m
A_sheth*y_sheth_top = 0.0258642 m^3
# 【 PSC Beam 순단면적 】
A_2 := A_1 - A_sheth = 0.657715 m^2
# 【 순단면의 도심에서 거더 상하연 거리 】
y_t2 := (A_1*y_1 - A_sheth*y_sheth_top)/(A_1 - A_sheth) = 1.02334 m
# 거더 상단에서
# 도심축까지의 거리
y_b2 := y_t2 - H_beam = -0.976665 m
# 도심축에서
# 거더 하단 까지의 거리
# 【 각 부재의 순단면 도심에 대한 편심거리 계산 】
y_c := y_t2 - y_1 = -0.0176648 m
# 순단면의 도심에 대한
# PSC Beam 도심 까지의 거리
y_sheth := y_t2 - y_sheth_top = -0.866665 m
# 순단면의 도심에 대한
# 쉬스관 도심 까지의 거리
# 【 순단면에 대한 단면2차모멘트 】
A_1 = 0.6714 m^2
y_c = -0.0176648 m
I_c2 := A_1*y_c^2 = 0.000209506 m^4
I_sheth := A_sheth*y_sheth^2 = 0.0102787 m^4
I_x2 := I_1 + I_c2 - I_sheth = 0.32044 m^4
# 【 단면계수 】
Z_t2 := I_x2/y_t2 = 0.313133 m^3
Z_b2 := I_x2/y_b2 = -0.328096 m^3
# 【 쉬스관 】
e_p2 := y_b2 + e_sheth_bottom = -0.866665 m
Z_p2 := I_x2/e_p2 = -0.369739 m^3
# 3.1.3 PS강연선 환산단면에 대한 단면 제계수 계산
# 【  사용 기호 】
H_beam
# PSC Beam 전체 높이
H_beam = 2000 mm
D_ps
# PS강연선의 직경
D_ps := 12.7 mm
A_ps
# PS강연선의 단면적
A_ps := 98.7 mm^2
n_ps
# 한 정착구당 배치되는 PS강연선수
n_ps := 12
N_ps
# PS강연선의 설치 개수
N_ps := 4
# E_c | PSC Beam의 탄성계수
E_c := 8500*MPa^(2/3)*nthroot(40 MPa + 8 MPa, 3) = 3.08911e10 Pa
E_c = 30891.1 MPa
E_s
# PS강연선의 탄성계수
E_s := 200000 MPa
# n_p | 탄성계수비
# e_ps_top | PS강연선의 거더 상단에서의 편심거리
# e_ps_bottom | PS강연선의 거더 하단에서의 편심거리
# y_t3 | 환산단면의 도심에서 PSC Beam 상연까지의 거리
# y_b3 | 환산단면의 도심에서 PSC Beam 하연까지의 거리
# I_x3 | 환산단면에 대한 단면2차모멘트
# Z_t3 | 환산단면에서 PSC Beam 상연에 대한 단면계수
# Z_b3 | 환산단면에서 PSC Beam 하연에 대한 단면계수
e_c3
# 환산단면에서 도심에서 순단면 도심까지의 거리
# ( PSC Beam의 편심거리 )
e_p3
# 환산단면 도심에서 PS 강연선 까지의 거리
# ( PS강연선의 편심거리 )
# Z_p3 | 환산단면에서 PS강연선에 대한 단면계수
# 【 PS강연선의 단면적 】
A_ps = 9.87e-5 m^2
A_ps := A_ps*n_ps = 0.0011844 m^2
A_ps := A_ps*N_ps = 0.0047376 m^2
n_p := E_s/E_c = 6.47437
A_ps := A_ps*n_p = 0.030673 m^2
# 【 PS강연선의 도심 】
# PS 강연선의 도심계산근거 추가
A_ps_1 := 3
y_ps_1 := 80 mm
A_ps_2 := 1
y_ps_2 := 120 mm + 80 mm = 0.2 m
y_ps.bottom := (A_ps_1*y_ps_1 + A_ps_2*y_ps_2)/(A_ps_1 + A_ps_2) = 0.11 m
y_ps.top := H_beam - y_ps.bottom = 1.89 m
# 【 PSC Beam 순단면 】
A_2 = 0.657715 m^2
y_t2 = 1.02334 m
y_b2 = -0.976665 m
I_x2 = 0.32044 m^4
Z_t2 = 0.313133 m^3
Z_b2 = -0.328096 m^3
# 【 PS강연선 환산단면의 도심에서 거더 상하연 거리 】
y_t3 := (A_2*y_t2 + A_ps*y_ps.top)/(A_2 + A_ps) = 1.06195 m
# 거더 상단에서
# PS강연선 환산단면
# 도심축까지의 거리
y_b3 := y_t3 - H_beam = -0.938048 m
# PS강연선 환산단면
# 도심축에서
# 거더 하단 까지의 거리
# 【 PS강연선 환산단면의 도심에서 각부재 도심까지의 편심거리 계산 】
e_c3 := y_t3 - y_t2 = 0.0386165 m
# PS강연선 환산단면의
# 도심에 대한
# 순단면의 도심까지의 거리
e_ps3 := y_t3 - y_ps.top = -0.828048 m
# PS강연선 환산단면의
# 도심에 대한
# PS강연선 도심 까지의 거리
# 【 PS강연선 환산단면에 대한 단면2차모멘트 】
A_2 = 0.657715 m^2
e_c3 = 0.0386165 m
I_c3 := A_2*e_c3^2 = 0.00098081 m^4
I_x2 = 0.32044 m^4
I_ps := A_ps*e_ps3^2 = 0.0210313 m^4
I_x3 := I_x2 + I_c3 + I_ps = 0.342452 m^4
# 【 단면계수 】
Z_t3 := I_x3/y_t3 = 0.322474 m^3
Z_b3 := I_x3/y_b3 = -0.365069 m^3
# 【 PS강연선 】
Z_p3 := I_x3/e_ps3 = -0.413565 m^3
