# 3.4 프리스트레스에 의한 응력 계산
tonf := 1000 kgf
L := 14.835 m*2 = 29.67 m
E_p := 200000 MPa  # : PS강연선의 탄성계수
A_p := 0.001185 m^2  # : PS강연선의 단면적
n_p := 4  # : PS강연선의 설치 개수
f_ci := 32 MPa
# 【 순단면에 대한 단면특성 】
A_c2 := 0.6577 m^2
e_p2 := 0.867 m
Z_p2 := 0.369583 m^3
M_d := 1837 kN*m = 187.322 tonf*m
# 3.4.1 단면내에서의 긴장재의 위치 결정
# 1) PS강연선의 배치
# 2) 거더 하단에서 강연선까지의 높이 산출
# 3.4.2 긴장재의 긴장응력 가정
# 3.4.3 프리스트레스의 즉시손실 및 긴장재의 초기응력 결정
# 1) PS강연선과 쉬스 사이의 마찰에 의한 손실량
# PS강연선의 평균길이
L := 29.670 m
# 정착단에서 거더 중심까지의 강연선의 평균길이
x := L/2 = 14.835 m
# 곡률 마찰 계수
μ := 0.25
# 파상 마찰 계수
k := 0.005*1/m
# 경사각
α := 0.10538
f_pt1 := 1299.16 MPa  # : PS강연성의 긴장응력 (가정치)
f_pf := f_pt1*(1 - e^(-(k*x + μ*α))) = 124.243 MPa
# 2) 정착장치의 활동량에 의한 손실
n_p = 4  # : PS강연선의 배치 개수
A_p = 0.001185 m^2  # : PS강연선의 단면적
E_p = 200000000000 Pa  # : PS강연선의 탄성계수
ΔL := 0.006 m  # : PS강연선의 정착장치에서의 활동량
A_EP := ΔL*A_p*n_p*E_p = 5688 kN*m
P_j := 1299.16 MPa  # : PS강연선의 Jacking Force
P_t := P_j*(A_p*n_p) = 6158.02 kN
f_pf = 124.243 MPa  # : PS강연선과 쉬스 사이의 마찰에 의한 손실량
P_B := (P_j - f_pf)*(A_p*n_p) = 5569.11 kN
ΔP_t := P_t - P_B = 588.91 kN
# 【 PS강연선의 정착 활동에 의한 손실 적용 범위 】
l_1 := sqrt(2*A_EP*L/2/(2*ΔP_t)) = 11.9701 m
# 정착장치의 활동에 의한 손실의 작용 범뉘는 중앙단면에는 영향을 미치지 않는다.
# 3) 콘크리트 탄성수축에 의한 손실
# 【 긴장재의 마찰손실을 고려한 긴장력 】
f_pt1 := 1299.16 MPa  # : 긴장재의 긴장응력의 가정치
f_pf = 124.243 MPa  # : PS강연선과 쉬스 사이의 마찰에 의한 손실량
f_ps := 0 MPa  # : 건조수축에 의한 손실량
# f_pt | : 긴장재의 마찰손실을 고려한 긴장응력
f_pt := f_pt1 - (f_pf + f_ps) = 1174.92 MPa
# P'_t | : 긴장재의 마찰손실을 고려한 긴장력
A_p = 0.001185 m^2  # : PS강연선의 단면적
n_p = 4  # : PS강연선의 배치 개수
P'_t := f_pt*(A_p*n_p) = 5569.11 kN
# 【 PS강연선 도심위치에서의 응력 】
f'_ctg
# : 순단면에서
# 프리스트레스에 의한 PS강연선 도심위치에서의 응력
A_c2 = 0.6577 m^2  # : 순단면에 대한 단면적
e_p2 = 0.867 m  # : 순단면에 대한 편심거리
Z_p2 = 0.369583 m^3  # : 순단면에 대한 PS강연선 위치의 단면계수
P'_t = 5569.11 kN  # : 긴장재의 마찰손실을 고려한 긴장력
f'_ctg := P'_t/A_c2 + P'_t*e_p2/Z_p2 = 21.5321 MPa
# 【 거더 자중에 의한 PS강연선 도심 위치에서의 응력 】
# f_dog | : 거더 자중에 의한 PS강연선 도심위치에서의 응력
# M_d | : 거더 자중에의한 절점5의 모멘트
Z_p2 = 0.369583 m^3  # : 순단면에 대한 PS강연선 위치의 단면계수
f_dog := -M_d/Z_p2 = -4.97047 MPa
# 【 프리스트레스 도입 직후 긴장재 도심에서 콘크리트 평균 압축응력 】
f_cir
# : 프리스트레스 도입 직후
# 거더의 고정하중과 프리스트레스 힘에 의해 발생하는
# 긴장재 도심에서의 콘크리트의 평균압축응력
N := n_p = 4  # : 긴장재 배치 갯수
f'_ctg = 21.5321 MPa
# : 순단면에서
# 프리스트레스에 의한 PS강연선 도심위치에서의 응력
f_dog = -4.97047 MPa
# : 거더 자중에 의한
# PS강연선 도심위치에서의 응력
f_cir := (N - 1)/N*f'_ctg + f_dog = 11.1786 MPa
# 【 콘크리트 탄성수축에 의한 손실량 】
# f_pel | : 콘크리트 탄성수축에 의한 손실량
f_ci = 32 MPa
E_p = 200000 MPa  # : PS강연선의 탄성계수
# E_ci | : 프리스트레스 도입 시의 콘크리트 압축강도
E_ci := 8500 MPa^(2/3)*nthroot(f_ci + 8 MPa, 3) = 29069.6 MPa
8500*nthroot(32 + 8, 3) = 29069.6
f_cir = 11.1786 MPa
# : 순단면에서
# 프리스트레스에 의한 PS강연선 도심위치에서의 응력
f_pel := 0.5*E_p/E_ci*f_cir = 38.4545 MPa
f_pel = 392.127 kgf/cm^2
# 4) PS강연선의 초기 긴장응력
f_pt := f_pt1 - f_pf - f_ps - f_pel = 1136.46 MPa
# 3.4.4 프리스트레스의 시간적 손실 및 긴장재의 유효응력 결정
# 1) 콘크리트 크리프에 의한 손실량
# 2) 콘크리트의 건조수축에 의한 손실량
# 3) PS강연선의 릴렉세이션에 의한 손실량
# 4) PS강연선의 유효응력
# 3.4.5 긴장재의 신축량 계산
# 3.4.6 프리스트레스의 영향을 고려한 재하단계별 응력 계산
# 1) 프리스트레스 도입 직후의 콘크리트 응력
# 2) 유효 프리스트레스
# 3) 설계 하중 작용시의 휨응력
