# 3.4 프리스트레스에 의한 응력 계산
tonf := 1000 kgf
L := 14.835 m*2 = 29.67 m
# 【 설계 입력 변수값 】
# PS강연선의
# 항복강도
f_py := 1440 MPa
# PS강연선의
# 탄성계수
E_p := 200000 MPa
# PS강연선의
# 단면적
A_p := 0.001185 m^2
# PS강연선의
# 설치 개수
n_p := 4
f_ci := 32 MPa
# 【 순단면에 대한 단면특성 】
A_c2 := 0.6577 m^2
e_p2 := 0.867 m
Z_p2 := 0.369583 m^3
# 【 PS강연선 환산단면에 대한 단면특성 】
Z_p3 := 0.413618 m^3
# 【 합성단면에 대한 단면특성 】
Z_p4_외측 := 0.572382 m^3
Z_p4_내측 := 0.575141 m^3
# 【 설계 단면력 】
# 거더 자중에 의한
# 설계단면력
M_d1 := 1837 kN*m = 187.322 tonf*m
# 합성 전 고정하중
# (바닥판 하중)
M_d2_외측 := 2072.9 kN*m
M_d2_내측 := 2001 kN*m
# 합성 후 고정하중
# (포장 및 방호벽 하중)
M_d3_외측 := 742.6 kN*m
M_d3_내측 := 742.6 kN*m
# 3.4.1 단면내에서의 긴장재의 위치 결정
# 1) PS강연선의 배치
# 【 PS강연선의 포물선 배치 제원 계산 】
# 【 PS강연선  No. 1 】
H_end := 1.5 m
H_middle := 0.2 m
H := H_end - H_middle = 1.3 m
l := 29.6 m
a := H/(l/2)^2 = 0.00593499 1/m
α := atan(l*a) = 0.173901
L := l + (8/3)*(H^2/l - 32/5*H^4/l^3) = 29.7504 m
L_1 := L = 29.7504 m
# 2) 거더 하단에서 강연선까지의 높이 산출
# 3.4.2 긴장재의 긴장응력 가정
A_p = 1185 mm^2
n_p = 4
P_jacking1 := 1606 kN
f_j1 := P_jacking1/A_p = 1355.27 MPa
P_jacking2 := 1564 kN
f_j2 := P_jacking2/A_p = 1319.83 MPa
P_jacking3 := 1518 kN
f_j3 := P_jacking3/A_p = 1281.01 MPa
P_jacking4 := 1470 kN
f_j4 := P_jacking4/A_p = 1240.51 MPa
f_jacking_avg := (f_j1 + f_j2 + f_j3 + f_j4)/4 = 1299.16 MPa
f_pt1 := 0.9*f_py = 1296 MPa
# 3.4.3 프리스트레스의 즉시손실 및 긴장재의 초기응력 결정
# 1) PS강연선과 쉬스 사이의 마찰에 의한 손실량
# PS강연선의
# 평균길이
L := 29.670 m
# 정착단에서 거더 중심까지의
# 강연선의 평균길이
x := L/2 = 14.835 m
# 곡률 마찰 계수
μ := 0.25
# 파상 마찰 계수
k := 0.005*1/m
# 경사각
α := 0.10538
# PS강연선의
# 긴장응력 (가정치)
f_pt1 := 1299.16 MPa
f_pf := f_pt1*(1 - e^(-(k*x + μ*α))) = 124.243 MPa
# 2) 정착장치의 활동량에 의한 손실
# PS강연선의
# 배치 개수
n_p = 4
# PS강연선의
# 단면적
A_p = 0.001185 m^2
# PS강연선의
# 탄성계수
E_p = 200000000000 Pa
# PS강연선의
# 정착장치에서의 활동량
ΔL := 0.006 m
A_EP := ΔL*A_p*n_p*E_p = 5688 kN*m
# PS강연선의
# Jacking Force
P_j := 1299.16 MPa
P_t := P_j*(A_p*n_p) = 6158.02 kN
# PS강연선과 쉬스 사이의
# 마찰에 의한 손실량
f_pf = 124.243 MPa
P_B := (P_j - f_pf)*(A_p*n_p) = 5569.11 kN
ΔP_t := P_t - P_B = 588.91 kN
# 【 PS강연선의 정착 활동에 의한 손실 적용 범위 】
l_1 := sqrt(2*A_EP*L/2/(2*ΔP_t)) = 11.9701 m
# 정착장치의 활동에 의한 손실의 작용 범뉘는 중앙단면에는 영향을 미치지 않는다.
# 3) 콘크리트 탄성수축에 의한 손실
# 【 긴장재의 마찰손실을 고려한 긴장력 】
# 긴장재의
# 긴장응력의 가정치
f_pt1 := 1299.16 MPa
# PS강연선과 쉬스 사이의
# 마찰에 의한 손실량
f_pf = 124.243 MPa
# 건조수축에 의한
# 손실량
f_ps := 0 MPa
# 긴장재의 마찰손실을 고려한
# 긴장응력
f_pt
f_pt := f_pt1 - (f_pf + f_ps) = 1174.92 MPa
# 긴장재의
# 마찰손실을 고려한 긴장력
P'_t
# PS강연선의
# 단면적
A_p = 0.001185 m^2
# PS강연선의
# 배치 개수
n_p = 4
P'_t := f_pt*(A_p*n_p) = 5569.11 kN
P'_t = 567.891 tonf
# 【 PS강연선 도심위치에서의 응력 】
# 순단면에서
# 프리스트레스에 의한
# PS강연선 도심위치에서의 응력
f'_ctg
# 순단면에 대한
# 단면적
A_c2 = 0.6577 m^2
# 순단면에 대한
# 편심거리
e_p2 = 0.867 m
# 순단면에 대한
# PS강연선 위치의 단면계수
Z_p2 = 0.369583 m^3
# 긴장재의 마찰손실을 고려한
# 긴장력
P'_t = 5569.11 kN
f'_ctg := P'_t/A_c2 + P'_t*e_p2/Z_p2 = 21.5321 MPa
f'_ctg = 219.566 kgf/cm^2
# 【 거더 자중에 의한 PS강연선 도심 위치에서의 응력 】
# 거더 자중에 의한
# PS강연선 도심위치에서의 응력
f_dog
# 거더 자중에의한
# 절점5의 모멘트
M_d1 = 1837 kN*m
# 순단면에 대한
# PS강연선 위치의 단면계수
Z_p2 = 0.369583 m^3
f_dog := -M_d1/Z_p2 = -4.97047 MPa
# 【 프리스트레스 도입 직후 긴장재 도심에서 콘크리트 평균 압축응력 】
# 프리스트레스 도입 직후
# 거더의 고정하중과
# 프리스트레스 힘에 의해 발생하는
# 긴장재 도심에서의
# 콘크리트의 평균압축응력
f_cir
# 긴장재
# 배치 갯수
N := n_p = 4
# 순단면에서
# 프리스트레스에 의한
# PS강연선 도심위치에서의 응력
f'_ctg = 21.5321 MPa
# 거더 자중에 의한
# PS강연선 도심위치에서의 응력
f_dog = -4.97047 MPa
f_cir := (N - 1)/N*f'_ctg + f_dog = 11.1786 MPa
# 【 콘크리트 탄성수축에 의한 손실량 】
# 콘크리트 탄성수축에 의한
# 손실량
f_pel
f_ci = 32 MPa
# PS강연선의
# 탄성계수
E_p = 200000 MPa
# 프리스트레스 도입 시의
# 콘크리트 압축강도
E_ci
E_ci := 8500 MPa^(2/3)*nthroot(f_ci + 8 MPa, 3) = 29069.6 MPa
8500*nthroot(32 + 8, 3) = 29069.6
# 순단면에서
# 프리스트레스에 의한
# PS강연선 도심위치에서의 응력
f_cir = 11.1786 MPa
f_pel := 0.5*E_p/E_ci*f_cir = 38.4545 MPa
f_pel = 392.127 kgf/cm^2
# 4) PS강연선의 초기 긴장응력
f_pt := f_pt1 - f_pf - f_ps - f_pel = 1136.46 MPa
# 3.4.4 프리스트레스의 시간적 손실 및 긴장재의 유효응력 결정
# 1) 콘크리트 크리프에 의한 손실량
# 2) 콘크리트의 건조수축에 의한 손실량
# 3) PS강연선의 릴렉세이션에 의한 손실량
# 4) PS강연선의 유효응력
# 1) 콘크리트의 크리프에 의한 손실량
# (1) 외측 거더
# PS강연선의 초기 긴장응력
f_pt = 1136.46 MPa
A_p = 0.001185 m^2
n_p = 4
P_t := f_pt*(A_p*n_p) = 5386.83 kN
P_t = 5386.83 kN
A_c2 = 0.6577 m^2
e_p2 = 0.867 m
Z_p2 = 0.369583 m^3
M_d1 = 1837 kN*m
P_t/A_c2 = 8.19041 MPa
P_t*e_p2/Z_p2 = 12.6369 MPa
M_d1/Z_p2 = 4.97047 MPa
f_cir1 := P_t/A_c2 + P_t*e_p2/Z_p2 - M_d1/Z_p2 = 15.8569 MPa
M_d2_외측 = 2072.9 kN*m
M_d3_외측 = 742.6 kN*m
Z_p3 = 0.413618 m^3
Z_p4_외측 = 0.572382 m^3
f_cds := M_d2_외측/Z_p3 + M_d3_외측/Z_p4_외측 = 6.30901 MPa
f_cir1 = 15.8569 MPa
f_cds = 6.30901 MPa
12*15.86 - 7*6.31 = 146.15
Δf_pcr := 12*f_cir1 - 7*f_cds = 146.119 MPa
Δf_pcr_외측 := Δf_pcr = 146.119 MPa
# (2) 내측거더
Δf_pcr_내측 := 12*f_cir1 - 7*f_cds = 146.119 MPa
# 2) 콘크리트 건조수축에 의한 손실량
H_r := 70
Δf_psh := 0.8 MPa*(119 - 1.05*H_r) = 36.4 MPa
# 3) PS강연선의 릴렉세이션에 의한 손실량
# 저질렉세이션 강연선 사용
Δf_pr := 35 - 0.07*Δf_pf - 0.1*Δf_pel - 0.05*(Δf_pcr + Δf_psh)  # disabled
# PS강연선의 릴렉세이션에
# 의한 손실량
# (1) 외측 거더
# 마찰손실에 의한
# 응력감소량
Δf_pf := f_pf = 124.243 MPa
# 콘크리트의
# 탄성수축에의한 손실량
Δf_pel := f_pel = 38.4545 MPa
# 콘크리트의
# 크리프에 의한 손실량
Δf_pcr := Δf_pcr_외측 = 146.119 MPa
# 콘크리트의
# 건조수축에 의한 손실량
Δf_psh = 36.4 MPa
Δf_pr := 35 MPa - 0.07*Δf_pf - 0.1*Δf_pel - 0.05*(Δf_pcr + Δf_psh) = 13.3316 MPa
Δf_pr_외측 := Δf_pr = 13.3316 MPa
# (2) 내측 거더
# 마찰손실에 의한
# 응력감소량
Δf_pf := f_pf = 124.243 MPa
# 콘크리트의
# 탄성수축에의한 손실량
Δf_pel := f_pel = 38.4545 MPa
# 콘크리트의
# 크리프에 의한 손실량
Δf_pcr := Δf_pcr_내측 = 146.119 MPa
# 콘크리트의
# 건조수축에 의한 손실량
Δf_psh = 36.4 MPa
Δf_pr := 35 MPa - 0.07*Δf_pf - 0.1*Δf_pel - 0.05*(Δf_pcr + Δf_psh) = 13.3316 MPa
Δf_pr_내측 := Δf_pr = 13.3316 MPa
# 4) PS강연선의 유효응력
f_pe := f_pt - (Δf_pcr + Δf_psh + Δf_pr)  # disabled
# PS강연선의
# 유효인장응력
f_pe
# (1) 외측 거더
# PS강연선의
# 초기 긴장응력
f_pt = 1136.46 MPa
# 콘크리트의
# 크리프에 의한 손실량
Δf_pcr = 146.119 MPa
# 콘크리트의
# 건조수축에 의한 손실량
Δf_psh = 36.4 MPa
# PS강연선의
# 릴렉세이션에 의한 손실량
Δf_pr := Δf_pr_외측 = 13.3316 MPa
f_pe := f_pt - (Δf_pcr + Δf_psh + Δf_pr) = 940.612 MPa
f_pt = 1136.46 MPa
f_pe_외측 := f_pe = 940.612 MPa
η := f_pe/f_pt = 0.827666
η_외측 := η = 0.827666
# (2) 내측 거더
# PS강연선의
# 초기 긴장응력
f_pt = 1136.46 MPa
# 콘크리트의
# 크리프에 의한 손실량
Δf_pcr = 146.119 MPa
# 콘크리트의
# 건조수축에 의한 손실량
Δf_psh = 36.4 MPa
# PS강연선의
# 릴렉세이션에 의한 손실량
Δf_pr := Δf_pr_내측 = 13.3316 MPa
f_pe := f_pt - (Δf_pcr + Δf_psh + Δf_pr) = 940.612 MPa
f_pt = 1136.46 MPa
f_pe_내측 := f_pe = 940.612 MPa
η := f_pe/f_pt = 0.827666
η_내측 := η = 0.827666
# 3.4.5 긴장재의 신축량 계산
# 3.4.6 프리스트레스의 영향을 고려한 재하단계별 응력 계산
# 1) 프리스트레스 도입 직후의 콘크리트 응력
# 2) 유효 프리스트레스
# 3) 설계 하중 작용시의 휨응력
