# 3.4 프리스트레스에 의한 응력 계산
tonf := 1000 kgf
L := 14.835 m*2 = 29.67 m
# 【 설계 입력 변수값 】
# PS강연선의
# 항복강도
f_py := 1440 MPa
# PS강연선의
# 탄성계수
E_p := 200000 MPa
# PS강연선의
# 단면적
A_p := 0.001185 m^2
# PS강연선의
# 설치 개수
n_p := 4
f_ci := 32 MPa
# 【 순단면에 대한 단면특성 】
# 순단면의
# 콘크리트 단면적
A_c2 := 0.6577 m^2
# 순단면 도심에서
# 상연까지의 거리
y_t2 := 1.023 m
# 순단면 도심에서
# 하면까지의 거리
y_b2 := -0.977 m
y_t2 - y_b2 = 2 m
# 순단면의 도심에 대한
# 단면2차모네트
I_x2 := 0.320428 m^4
# 순단면의
# 상면에 대한 단면계수
Z_t2 := I_x2/y_t2 = 0.313224 m^3
# 순단면의
# 하면에 대한 단면계수
Z_b2 := I_x2/(-y_b2) = 0.327971 m^3
# 순단면 도심에서
# PS강연선의 편심거리
e_p2 := 0.867 m
# 순단면의 도신에 대한
# PS강연의 단면계수
Z_p2 := I_x2/e_p2 = 0.369582 m^3
# 【 PS강연선 환산단면에 대한 단면특성 】
# PS강연선 환산단면의
# 콘크리트 단면적
A_c3 := 0.6884*m^2
# PS강연선 환산단면 도심에서
# 상연까지의 거리
y_t3 := 1.062*m
# PS강연선 환산단면 도심에서
# 하면까지의 거리
y_b3 := -0.938*m
y_t3 - y_b3 = 2 m
# PS강연선 환산단면 도심에서
# 단면2차모네트
I_x3 := 0.342476*m^4
# PS강연선 환산단면 도심에서
# 상면에 대한 단면계수
Z_t3 := I_x3/y_t3 = 0.322482 m^3
# PS강연선 환산단면 도심에서
# 하면에 대한 단면계수
Z_b3 := I_x3/(-y_b3) = 0.365113 m^3
A_p = 0.001185 m^2
# PS강연선 환산단면 도심에서
# PS강연선의 편심거리
e_p3 := 0.828*m
# PS강연선 환산단면 도심에서
# PS강연의 단면계수
Z_p3 := I_x3/e_p3 = 0.413618 m^3
# 【 합성단면에 대한 단면특성 】 ( 외측 거더 )
# 바닥판 합성단면의
# 콘크리트 단면적
A_c4.out := 0.6884*m^2
# 바닥판 합성단면의 도심에서
# 상연까지의 거리
y_t4.out := 1.062*m
# 바닥판 합성단면의 도심에서
# 하면까지의 거리
y_b4.out := -0.938*m
y_t4.out - y_b4.out = 2 m
# 바닥판 합성단면의 도심에서
# 단면2차모네트
I_x4.out := 0.342476*m^4
# 바닥판 합성단면의 도심에서
# 상면에 대한 단면계수
Z_t4.out := I_x4.out/y_t4.out = 0.322482 m^3
# 바닥판 합성단면의 도심에서
# 하면에 대한 단면계수
Z_b4.out := I_x4.out/(-y_b4.out) = 0.365113 m^3
A_slab.out := 0.567*m^2
# 바닥판 합성단면의 도심에서
# PS강연선의 편심거리
e_p4.out := 0.828*m
# 바닥판 합성단면의 도심에서
# PS강연의 단면계수
Z_p4.out := I_x4.out/e_p4.out = 0.413618 m^3
# 【 합성단면에 대한 단면특성 】 ( 내측 거더 )
# 바닥판 합성단면의
# 콘크리트 단면적
A_c4.in := 0.6884*m^2
# 바닥판 합성단면의 도심에서
# 상연까지의 거리
y_t4.in := 1.062*m
# 바닥판 합성단면의 도심에서
# 하면까지의 거리
y_b4.in := -0.938*m
y_t4.in - y_b4.in = 2 m
# 바닥판 합성단면의 도심에서
# 단면2차모네트
I_x4.in := 0.342476*m^4
# 바닥판 합성단면의 도심에서
# 상면에 대한 단면계수
Z_t4.in := I_x4.in/y_t4.in = 0.322482 m^3
# 바닥판 합성단면의 도심에서
# 하면에 대한 단면계수
Z_b4.in := I_x4.in/(-y_b4.in) = 0.365113 m^3
A_slab.in := 0.567 m^2
# 바닥판 합성단면의 도심에서
# PS강연선의 편심거리
e_p4.in := 0.828*m
# 바닥판 합성단면의 도심에서
# PS강연의 단면계수
Z_p4.in := I_x4.in/e_p4.in = 0.413618 m^3
# 【 설계 단면력 】
# 거더 자중에 의한
# 설계단면력
M_d1 := 1837 kN*m = 187.322 tonf*m
# 합성 전 고정하중
# (바닥판 하중)
M_d2.out := 2072.9*kN*m
M_d2.in := 2001*kN*m
# 합성 후 고정하중
# (포장 및 방호벽 하중)
M_d3.out := 742.6*kN*m
M_d3.in := 742.6*kN*m
# 활하중
M_L.out := 2394.1*kN*m
M_L.in := 2676.7*kN*m
# 3.4.1 단면내에서의 긴장재의 위치 결정
# 1) PS강연선의 배치
# 2) PS강연선을 포물선 형상으로 배치
# 3) 거더 하단에서 강연선까지의 높이 산출
# 1) PS강연선의 배치
# 2) PS강연선을 포물선 형상으로 배치
# 【 PS강연선의 포물선 배치 제원 계산 】
# 【 입력 변수 】
# 【 PS Strand  No. 1 】
# 【 입력 변수 】
# 지간 시점부 높이
H_end := 1.5 m
# 지간 중간부 높이
H_middle := 0.2 m
# 높이 차
H := H_end - H_middle = 1.3 m
# 지간의 수평 거리
l := 29.6 m
# 포물선의 계수
a := H/(l/2)^2 = 0.00593499 1/m
# 시점부 경사각
α := atan(l*a) = 0.173901 rad
# 포물선 길이
L := l + (8/3)*(H^2/l - 32/5*H^4/l^3) = 29.7504 m
# 포물선 배치로 인한
# 길이의 증분
ΔL := L - l = 0.150373 m
ΔL/l = 0.508016 %
# 【 계산 결과 】
a_strand1 := a = 0.00593499 m^-1
α_strand1 := α = 0.173901 rad
L_strand1 := L = 29.7504 m
# 【 PS강연선의 포물선 배치 제원 계산 결과 】
# 【 PS강연선의 포물선 배치 】
a_strand1 = 0.00593499 1/m
α_strand1 = 0.173901 rad
L_strand1 = 29.7504 m
# 【 PS강연선 포물선 배치 시 경사각 및 길이의 평균 】
Σα := α_strand1 = 0.173901
α_avg := Σα/n_p = 0.0434753
ΣL := L_strand1 = 29.7504 m
L_avg := ΣL/n_p = 7.43759 m
# 2) 거더 하단에서 강연선까지의 높이 산출
# 3.4.2 긴장재의 긴장응력 가정
# 【 입력 변수 】
A_p = 1185 mm^2
n_p = 4
# 【 긴장 응력 】
P_jacking1 := 1606 kN
f_j1 := P_jacking1/A_p = 1355.27 MPa
P_jacking2 := 1564 kN
f_j2 := P_jacking2/A_p = 1319.83 MPa
P_jacking3 := 1518 kN
f_j3 := P_jacking3/A_p = 1281.01 MPa
P_jacking4 := 1470 kN
f_j4 := P_jacking4/A_p = 1240.51 MPa
# 【 평균 긴장 응력 】
f_jacking_avg := (f_j1 + f_j2 + f_j3 + f_j4)/4 = 1299.16 MPa
f_pt1 := 0.9*f_py = 1296 MPa
# 3.4.3 프리스트레스의 즉시손실 및 긴장재의 초기응력 결정
# 1) PS강연선과 쉬스 사이의 마찰에 의한 손실량
# 2) 정착장치의 활동량에 의한 손실
# 3) 콘크리트의 탄성수축에 의한 손실
# 4) PS강연선의 초기 긴장응력
# 1) PS강연선과 쉬스 사이의 마찰에 의한 손실량
# 【 입력 변수 】
# PS강연선의
# 평균길이
L := 29.670 m  # PS강연선의 평균길이 이므로 수정할 것
# 정착단에서 거더 중심까지의
# 강연선의 평균길이
x := L/2 = 14.835 m
# 곡률 마찰 계수
μ := 0.25
# 파상 마찰 계수
k := 0.005*1/m
# 경사각
α := 0.10538
# PS강연선의
# 평균 긴장응력 (가정치)
f_jacking_avg = 1299.16 MPa
# 【출력 변수 】
# PS강연선과 쉬스 사이의
# 마찰에 의한 손실량
f_pf
f_pf := f_jacking_avg*(1 - e^(-(k*x + μ*α))) = 124.242 MPa
f_pf/f_jacking_avg = 9.5633 %
# 2) 정착장치의 활동량에 의한 손실
# 【 입력 변수 】
# PS강연선의
# 배치 개수
n_p = 4
# PS강연선의
# 단면적
A_p = 1185 mm^2
# PS강연선의
# 탄성계수
E_p = 200000 MPa
# PS강연선의
# 정착장치에서의 활동량
ΔL := 0.006 m
A_EP := ΔL*A_p*n_p*E_p = 5688 kN*m
# 그림 정착장치의 활동량에 의한 손실량
# PS강연선의
# 평균 긴장응력 (가정치)
f_jacking_avg = 1299.16 MPa
# PS강연선과 쉬스 사이의
# 마찰에 의한 손실량
f_pf = 124.242 MPa
# 마찰에 의한 손실은 직선으로 변한다고 가정한다
P_t := f_jacking_avg*(A_p*n_p) = 6158 kN
# SPAN 중앙부에서의 유효 프리스트레스힘
P_B := (f_jacking_avg - f_pf)*(A_p*n_p) = 5569.09 kN
ΔP_t := P_t - P_B = 588.908 kN
# 【 PS강연선의 정착 활동에 의한 손실 적용 범위 】
l_1 := sqrt(2*A_EP*L/2/(2*ΔP_t)) = 11.9702 m
# 정착장치의 활동에 의한 손실의 작용 범위는 중앙단면에는 영향을 미치지 않는다.
# 3) 콘크리트 탄성수축에 의한 손실
# 【 긴장재의 마찰손실을 고려한 긴장력 】
# 【 입력 변수 】
# PS강연선의
# 단면적
A_p = 1185 mm^2
# PS강연선의
# Strand 개수
n_p = 4
# 긴장재의
# 긴장응력의 가정치
f_jacking_avg := 1299.16 MPa
# PS강연선과 쉬스 사이의
# 마찰에 의한 손실량
f_pf = 124.242 MPa
# 건조수축에 의한
# 손실량
f_ps := 0 MPa
# 【 긴장재의 마찰손실을 고려한 긴장응력 및 긴장력 】
# 긴장재의 마찰손실을 고려한
# 긴장응력
f_pt
f_pt := f_jacking_avg - (f_pf + f_ps) = 1174.92 MPa
# 긴장재의
# 마찰손실을 고려한 긴장력
P'_t
P'_t := f_pt*(A_p*n_p) = 5569.11 kN
f_pt = 1174.92 MPa
P'_t = 567.891 tonf
# 【 순단면에서 PS강연선 도심위치에서의 콘크리트의 응력 】
# 【 입력 변수 】
# 순단면에 대한
# 단면적
A_c2 = 0.6577 m^2
# 순단면에 대한
# 편심거리
e_p2 = 0.867 m
# 순단면에 대한
# PS강연선 위치의 단면계수
Z_p2 = 0.369582 m^3
# 긴장재의 마찰손실을 고려한
# 긴장력
P'_t = 5569.11 kN
# 【 순단면에서 PS강연선 도심위치에서의 콘크리트 응력 】
# 순단면에서
# 프리스트레스에 의한
# PS강연선 도심위치에서의 응력
f'_ctg
f'_ctg := P'_t/A_c2 + P'_t*e_p2/Z_p2 = 21.5321 MPa
f'_ctg = 219.566 kgf/cm^2
# 【 거더 자중에 의한 PS강연선 도심 위치에서의 응력 】
# 【 입력 변수 】
# 거더 자중에의한
# 절점5의 모멘트
M_d1 = 1837 kN*m
# 순단면에 대한
# PS강연선 위치의 단면계수
Z_p2 = 0.369582 m^3
# 【 거더 자중에 의한 PS강연선 도심위치에서의 응력 】
# 거더 자중에 의한
# PS강연선 도심위치에서의 응력
f_dog
f_dog := -M_d1/Z_p2 = -4.97047 MPa  # [ (+) 압축  (-) 인장 ]
# 【 프리스트레스 도입 직후 긴장재 도심에서 콘크리트 평균 압축응력 】
# 【 입력 변수 】
# 긴장재
# 배치 갯수
N := n_p = 4
# 순단면에서
# 프리스트레스에 의한
# PS강연선 도심위치에서의 응력
f'_ctg = 21.5321 MPa
# 거더 자중에 의한
# PS강연선 도심위치에서의 응력
f_dog = -4.97047 MPa
# 【 프리스트레스 도입 직후 긴장재 도심위치에서 콘크리트의 평균 응력 】
# 프리스트레스 도입 직후
# 거더의 고정하중과
# 프리스트레스 힘에 의해 발생하는
# 긴장재 도심에서의
# 콘크리트의 평균압축응력
f_cir
f_cir := (N - 1)/N*f'_ctg + f_dog = 11.1786 MPa
# 【 콘크리트 탄성수축에 의한 손실량 】
# 【 입력 변수 】
# PS강연선의
# 탄성계수
E_p = 200000 MPa
# 프리스트레스 도입 시의
# 콘크리트 압축강도
f_ci = 32 MPa
# 프리스트레스 도입 시의
# 콘크리트 탄성계수
E_ci
E_ci := 8500 MPa^(2/3)*nthroot(f_ci + 8 MPa, 3) = 29069.6 MPa
# 순단면에서
# 프리스트레스에 의한
# PS강연선 도심위치에서의 응력
f_cir = 11.1786 MPa
# 【 콘크리트 탄성수축에 의한 PS강연선의 프리스트레스 도입 손실량 】
# 콘크리트 탄성수축에 의한
# 손실량
f_pel
f_pel := 0.5*E_p/E_ci*f_cir = 38.4546 MPa
f_pel = 392.127 kgf/cm^2
# 4) PS강연선의 초기 긴장응력
f_pt1 = 1296 MPa
# PS강연선과 쉬스 사이의
# 마찰에 의한 손실량
f_pf = 124.242 MPa
# 건조수축에 의한
# 손실량
f_ps = 0 MPa
# 콘크리트 탄성수축에 의한
# 손실량
f_pel = 38.4546 MPa
f_pt := f_pt1 - f_pf - f_ps - f_pel = 1133.3 MPa
# 3.4.4 프리스트레스의 시간적 손실 및 긴장재의 유효응력 결정
# 1) 콘크리트 크리프에 의한 손실량
# 2) 콘크리트의 건조수축에 의한 손실량
# 3) PS강연선의 릴렉세이션에 의한 손실량
# 4) PS강연선의 유효응력
# 1) 콘크리트의 크리프에 의한 손실량
# (1) 외측 거더
M_d1 = 1837 kN*m
M_d2.out = 2072.9 kN*m
M_d3.out = 742.6 kN*m
A_c2 = 0.6577 m^2
e_p2 = 0.867 m
Z_p2 = 0.369582 m^3
Z_p3 = 0.413618 m^3
Z_p4.out = 0.413618 m^3
# 【 PS 강연선 초기 긴장력 】
# PS강연선의 초기 긴장응력
f_pt = 1133.3 MPa
A_p = 0.001185 m^2
n_p = 4
P_t := f_pt*(A_p*n_p) = 5371.86 kN
f_cir1 := P_t/A_c2 + P_t*e_p2/Z_p2 - M_d1/Z_p2 = 15.799 MPa
f_cds := M_d2.out/Z_p3 + M_d3.out/Z_p4.out = 6.807 MPa
Δf_pcr := 12*f_cir1 - 7*f_cds = 141.938 MPa
f_cir1 = 15.799 MPa
f_cds = 6.807 MPa
Δf_pcr_외측 := Δf_pcr = 141.938 MPa
# (2) 내측거더
Δf_pcr_내측 := 12*f_cir1 - 7*f_cds = 141.938 MPa
# 2) 콘크리트 건조수축에 의한 손실량
H_r := 70
Δf_psh := 0.8 MPa*(119 - 1.05*H_r) = 36.4 MPa
# 3) PS강연선의 릴렉세이션에 의한 손실량
# 저질렉세이션 강연선 사용
Δf_pr == 35 - 0.07*Δf_pf - 0.1*Δf_pel - 0.05*(Δf_pcr + Δf_psh)
# PS강연선의 릴렉세이션에
# 의한 손실량
# (1) 외측 거더
# 마찰손실에 의한
# 응력감소량
Δf_pf := f_pf = 124.242 MPa
# 콘크리트의
# 탄성수축에의한 손실량
Δf_pel := f_pel = 38.4546 MPa
# 콘크리트의
# 크리프에 의한 손실량
Δf_pcr := Δf_pcr_외측 = 141.938 MPa
# 콘크리트의
# 건조수축에 의한 손실량
Δf_psh = 36.4 MPa
Δf_pr := 35 MPa - 0.07*Δf_pf - 0.1*Δf_pel - 0.05*(Δf_pcr + Δf_psh) = 13.5407 MPa
Δf_pr_외측 := Δf_pr = 13.5407 MPa
# (2) 내측 거더
# 마찰손실에 의한
# 응력감소량
Δf_pf := f_pf = 124.242 MPa
# 콘크리트의
# 탄성수축에의한 손실량
Δf_pel := f_pel = 38.4546 MPa
# 콘크리트의
# 크리프에 의한 손실량
Δf_pcr := Δf_pcr_내측 = 141.938 MPa
# 콘크리트의
# 건조수축에 의한 손실량
Δf_psh = 36.4 MPa
Δf_pr := 35 MPa - 0.07*Δf_pf - 0.1*Δf_pel - 0.05*(Δf_pcr + Δf_psh) = 13.5407 MPa
Δf_pr_내측 := Δf_pr = 13.5407 MPa
# 4) PS강연선의 유효응력
f_pe == f_pt - (Δf_pcr + Δf_psh + Δf_pr)
# PS강연선의
# 유효인장응력
f_pe
# (1) 외측 거더
# PS강연선의
# 초기 긴장응력
f_pt = 1133.3 MPa
# 콘크리트의
# 크리프에 의한 손실량
Δf_pcr = 141.938 MPa
# 콘크리트의
# 건조수축에 의한 손실량
Δf_psh = 36.4 MPa
# PS강연선의
# 릴렉세이션에 의한 손실량
Δf_pr := Δf_pr_외측 = 13.5407 MPa
f_pe := f_pt - (Δf_pcr + Δf_psh + Δf_pr) = 941.424 MPa
f_pt = 1133.3 MPa
f_pe_외측 := f_pe = 941.424 MPa
η := f_pe/f_pt = 0.83069
η_외측 := η = 0.83069
# (2) 내측 거더
# PS강연선의
# 초기 긴장응력
f_pt = 1133.3 MPa
# 콘크리트의
# 크리프에 의한 손실량
Δf_pcr = 141.938 MPa
# 콘크리트의
# 건조수축에 의한 손실량
Δf_psh = 36.4 MPa
# PS강연선의
# 릴렉세이션에 의한 손실량
Δf_pr := Δf_pr_내측 = 13.5407 MPa
f_pe := f_pt - (Δf_pcr + Δf_psh + Δf_pr) = 941.424 MPa
f_pt = 1133.3 MPa
f_pe_내측 := f_pe = 941.424 MPa
η := f_pe/f_pt = 0.83069
η_내측 := η = 0.83069
# 3.4.5 긴장재의 신축량 계산
ΔL == (P_t + P_t1)/(A_p*E_p)
# ΔL | 긴장재의 신축량
# P_t | 긴장력
P_t1
# PS강연선과 쉬스 사이의
# 마찰에 의한 손실량을 고려한 긴장력
P_t1 == P_t*e^(-(μ*α + k*x))
# 【 입력 변수 】
L_strand1 := 29.751 m
α_strand1 := 0.17390 rad
P_t_strand1 := 1606 kN
L_strand2 := 29.691 m
α_strand2 := 0.13512 rad
P_t_strand2 := 1564 kN
L_strand3 := 29.635 m
α_strand3 := 0.08359 rad
P_t_strand3 := 1518 kN
L_strand4 := 29.604 m
α_strand4 := 0.02891 rad
P_t_strand4 := 1470 kN
# 【 Strand No. 1 】
# 【 입력 변수 】
A_p = 11.85 cm^2  # PS강연선 단면적
E_p = 200000 MPa  # PS강연선 탄성계수
P_t := P_t_strand1 = 1606000 N  # 긴장력
L := L_strand1 = 29.751 m  # PS강연선의 길이
α := α_strand1 = 0.1739
μ := 0.25  # 곡률 마찰 계수
k := 0.005*1/m  # 파상 마찰 계수
x := L/2 = 14.8755 m
# 정착단에서
# 거더 중심까지의 강연선 평균길이
# ---------------------------------------------------------------------------------------------
P_t1 := P_t*e^(-(μ*α + k*x)) = 1427.46 kN
ΔL := (P_t + P_t1)/(A_p*E_p)*L/2 = 0.190397 m
# ---------------------------------------------------------------------------------------------
ΔL_strand1 := ΔL = 0.190397 m
# 【 Strand No. 2 】
# 【 입력 변수 】
A_p = 11.85 cm^2  # PS강연선 단면적
E_p = 200000 MPa  # PS강연선 탄성계수
P_t := P_t_strand2 = 1564000 N  # 긴장력
L := L_strand2 = 29.691 m  # PS강연선의 길이
α := α_strand2 = 0.13512
μ := 0.25  # 곡률 마찰 계수
k := 0.005*1/m  # 파상 마찰 계수
x := L/2 = 14.8455 m
# 정착단에서
# 거더 중심까지의 강연선 평균길이
# ---------------------------------------------------------------------------------------------
P_t1 := P_t*e^(-(μ*α + k*x)) = 1403.88 kN
ΔL := (P_t + P_t1)/(A_p*E_p)*L/2 = 0.185906 m
# ---------------------------------------------------------------------------------------------
ΔL_strand2 := ΔL = 0.185906 m
# 【 Strand No. 3 】
# 【 입력 변수 】
A_p = 11.85 cm^2  # PS강연선 단면적
E_p = 200000 MPa  # PS강연선 탄성계수
P_t := P_t_strand3 = 1518000 N  # 긴장력
L := L_strand3 = 29.635 m  # PS강연선의 길이
α := α_strand3 = 0.08359
μ := 0.25  # 곡률 마찰 계수
k := 0.005*1/m  # 파상 마찰 계수
x := L/2 = 14.8175 m
# 정착단에서
# 거더 중심까지의 강연선 평균길이
# ---------------------------------------------------------------------------------------------
P_t1 := P_t*e^(-(μ*α + k*x)) = 1380.45 kN
ΔL := (P_t + P_t1)/(A_p*E_p)*L/2 = 0.181214 m
# ---------------------------------------------------------------------------------------------
ΔL_strand3 := ΔL = 0.181214 m
# 【 Strand No. 4 】
# 【 입력 변수 】
A_p = 11.85 cm^2  # PS강연선 단면적
E_p = 200000 MPa  # PS강연선 탄성계수
P_t := P_t_strand4 = 1470000 N  # 긴장력
L := L_strand4 = 29.604 m  # PS강연선의 길이
α := α_strand4 = 0.02891
μ := 0.25  # 곡률 마찰 계수
k := 0.005*1/m  # 파상 마찰 계수
x := L/2 = 14.802 m
# 정착단에서
# 거더 중심까지의 강연선 평균길이
# ---------------------------------------------------------------------------------------------
P_t1 := P_t*e^(-(μ*α + k*x)) = 1355.3 kN
ΔL := (P_t + P_t1)/(A_p*E_p)*L/2 = 0.176456 m
# ---------------------------------------------------------------------------------------------
ΔL_strand4 := ΔL = 0.176456 m
ΔL_strand1 = 190.397 mm
ΔL_strand2 = 185.906 mm
ΔL_strand3 = 181.214 mm
ΔL_strand4 = 176.456 mm
# 3.4.6 프리스트레스의 영향을 고려한 재하단계별 응력 계산
# 1) 프리스트레스 도입 직후의 콘크리트 응력
# 2) 유효 프리스트레스
# 3) 설계 하중 작용시의 휨응력
# 【 설계 입력 자료 】
A_p
# PS강연선의 1정착구당의 단면적
A_p = 1185 mm^2
n_p
# PS강연선의 정착구 개소
n_p = 4
f_pt
# PS강연선의
# 초기 긴장응력
f_pt = 1133.3 MPa
A_c2
# 순단면에 대한 단면적
A_c2 = 0.6577 m^2
Z_t2
# 순단면에 대한 상연의 단면계수
Z_t2 = 0.313224 m^3
Z_b2
# 순단면에 대한 하연의 단면계수
Z_b2 = 0.327971 m^3
e_p2
# 순단면의 도심에 대한
# PS강연선의 편심거리
e_p2 = 0.867 m
M_d
# 거더 자중에 의한 모멘트
# ( 내측거더 동일 )
M_d1 = 1837 kN*m
# 【 설계 출력 자료 】
P_t
# PS강연선의 초기 긴장력
# ( 긴장력 - ( 마찰 + 건조수축 + 탄성수축 )
f_ct1
# 프리스트레스에 의한
# 거더 상연에서의 콘크리트 응력
f_cb1
# 프리스트레스에 의한
# 거더 하단에서의 콘크리트 응력
f_ct1
# 거더 자중에 의한
# 거더 상단에서의 콘크리트 응력
f_cb2
# 거더 자중에 의한
# 거더 하연에서의 콘크리트 응력
f_ct
# 프리스트레스 도입 직후
# 거더 상연애서의 콘크리트 응력
f_cb
# 프리스트레스 도입 직후
# 거더 하연에서의 콘크리트 응력
# 1) 프리스트레스 도입 직후의 콘크리트 응력
# 【 입력 자료 】
f_pt = 1133.3 MPa
A_c2 = 0.6577 m^2
A_p = 0.001185 m^2
Z_t2 = 0.313224 m^3
n_p = 4
Z_b2 = 0.327971 m^3
P_t := f_pt*A_p*n_p = 5371.86 kN
e_p2 = 0.867 m
# (1) 프리스트레스에 의한 콘크리트 응력
# 【 상연응력 】
f_ct1 := P_t/A_c2 - P_t*e_p2/Z_t2 = -6.7016 MPa
# 【 하연응력 】
f_cb1 := P_t/A_c2 + P_t*e_p2/Z_b2 = 22.3683 MPa
# (2) 거더 자중에 의한 콘크리트 응력
# 【 상연응력 】
f_ct2 := M_d1/Z_t2 = 5.86482 MPa
# 【 하연응력 】
f_cb2 := -M_d1/Z_b2 = -5.6011 MPa
# (3) 프리스트레스 도입 직후의 콘크리트 응력
# 【 상연응력 】
f_ct := f_ct1 + f_ct2 = -0.836783 MPa
# 【 하연응력 】
f_cb := f_cb1 + f_cb2 = 16.7672 MPa
# 2) 유효 프리스트레스
# 【 입력 자료 】
η_in
# (내측거더)
# 프리스트레스 도입의
# 유효계수
η_in := 0.827
f_ct.in
# (내측거더)
# 프리스트레스 도입 직 후
# 거더 상연에서의 콘크리트 응력
f_ct.in := f_ct1 = -6.7016 MPa
f_cb.in
# (내측거더)
# 프리스트레스 도입직 후
# 거더 하연에서의 콘크리트 응력
f_cb.in := f_cb1 = 22.3683 MPa
η_out
# (내측거더)
# 프리스트레스 도입의
# 유효계수
η_out := 0.827
f_ct.out
# (내측거더)
# 프리스트레스 도입 직 후
# 거더 상연에서의 콘크리트 응력
f_ct.out := f_ct1 = -6.7016 MPa
f_cb.out
# (내측거더)
# 프리스트레스 도입직 후
# 거더 하연에서의 콘크리트 응력
f_cb.out := f_cb1 = 22.3683 MPa
# 【 출력 자료 】
f_ct.in
# (내측 거더)
# 유효프리스트레스 작용 시
# 거더 상연에서의 콘크리트 응력
f_cb.in
# (내측 거더)
# 유효프리스트레스 작용 시
# 거더 하연에서의 콘크리트 응력
f_ct.out
# (외측 거더)
# 유효프리스트레스 작용 시
# 거더 상연에서의 콘크리트 응력
f_cb.out
# (외측 거더)
# 유효프리스트레스 작용 시
# 거더 하연에서의 콘크리트 응력
# (1) 외측거더
f_ct3.out := η_out*f_ct.out = -5.54222 MPa
f_cb3.out := η_out*f_cb.out = 18.4986 MPa
# (2) 내외측거더
f_ct3.in := η_in*f_ct.in = -5.54222 MPa
f_cb3.in := η_in*f_cb.in = 18.4986 MPa
# 3) 설계 하중 작용시의 휨응력
# 【 입력 자료 】
f_ct1
# 프리스트레스
# 상연의 응력
f_ct1 = -6.7016 MPa
f_ct2
# 거더 자중 작용 시
# 상연의 응력
f_ct2 = 5.86482 MPa
f_ct3
# 유효프리스트레스 작용 시
# 상연의 응력
f_ct3.in = -5.54222 MPa
f_ct4
# 총하중 작용시
# 상연의 응력
f_ct4
f_cb1
# 프리스트레스
# 하연의 응력
f_cb1 = 22.3683 MPa
f_cb2
# 거더 자중 작용 시
# 하연의 응력
f_cb2 = -5.6011 MPa
f_cb3
# 유효프리스트레스 작용 시
# 하연의 응력
f_cb3.in = 18.4986 MPa
f_cb4
# 총하중 작용시
# 하연의 응력
f_cb4
f_bca.prestress
# 프리스트레스 도입 직후
# 콘크리트의 허용휨압축응력
f_bta.prestress
# 프리스트레스 도입 직후
# 콘크리트의 허용 휨인장응력
f_bca.DesignLoad
# 설계하중 작용시
# 콘크리트 허용 휨압축응력
f_bta.DesignLoad
# 설계하중 작용시
# 콘크리트 허용 휨인장응력
# 【 출력 자료 】
f_ct12
f_cb12
f_ct34
f_cb34
# (1) 외측 거더
