# 3.5 2차 응력의 계산
tonf := 1000 kgf
L := 14.835*m*2 = 29.67 m
# 【 설계 입력 변수값 】
# 【 PSC거더 】
# PSC거더 상연에서
# 도심축까지의 거리
y_t3 := 1.062*m
y'_1 := y_t3
# PS강연선 환산단면의
# PSC거더의 2차회전반경
r_c1 := sqrt(0.343476*m^4/(0.6884*m^2)) = 0.706363 m
# PS강연선 환산단면의
# PSC거더의 단면2차모멘트
I_c1 := 0.342476
# PS강연선 환산단면의
# 편심거리
e_p3 := 0.828*m
e_p1 := e_p3
# PSC거더 탄성계수
E_c1 := 30891 MPa
# 【 바닥판 슬래브 】
# 거더상연에서
# 바닥판 도심까지  거리
y_2 := 0.24*m/2 = 0.12 m
r_c2 := sqrt(0.004800)*m
I_c2 := 0.003024
# 바닥판 탄성계수
E_c2 := 27804 MPa
# 【 PS강연선 】
# PS강연선의 초기 긴장응력
f_pt := 1136.46 MPa
# PS강연선의 유효인장응력
f_pe := 940.18 MPa
# PS강연선의 단면적
A_p := 0.0011845*m^2
ϕ := 3.8
ϕ_t := 2.4
# 【 작용 하중 】
# 거더 자중
M_d1 := 1837 kN*m
# 합성전 고정하중
M_d2 := 2072.9 kN*m
m := E_c1*I_c1/(E_c2*I_c2) = 125.827
B := 1 + m = 126.827
C := y'_1 - m*y_2 = -14.0372 m
F := y'_1^2 + r_c1^2 + m*y_2^2 + m*r_c2^2 = 4.04267 m^2
P := (f_pt + f_pe)/2*A_p*4 = 4919.56 kN
K := ϕ/(1 + ϕ) = 5.0003e-5 m^2
K' := ϕ_t/(1 + ϕ) = 3.15809e-5 m^2
K = 0.791667
K' = 0.5
B = 126.827
C = -14.0372 m
P = 4919.56 kN
N_c1 := -K'/(C^2 - B*F)*P*(B*(y'_1*e_p1 - r_c1^2) - C*e_p1) = 466.485 kN
N_c2 := -K'/(C^2 - B*F)*M_d1*(C - B*y'_1) = -432.742 kN
N_c3 := -K/(C^2 - B*F)*M_d2*(C - B*y'_1) = -773.163 kN
N_c1 + N_c2 + N_c3 = -739.421 kN
N_c := -K'/(C^2 - B*F)*P*(B*(y'_1*e_p1 - r_c1^2) - C*e_p1) + (-K'/(C^2 - B*F)*M_d1*(C - B*y'_1)) + (-K/(C^2 - B*F)*M_d2*(C - B*y'_1)) = -739.421 kN
M_c := -K'/(B*F - C^2)*P*(C*(y'_1*e_p1 - r_c1^2) - F*e_p1) + (-K'/(B*F - C^2)*M_d1*(F - C*y'_1)) + (-K/(B*F - C^2)*M_d2*(F - C*y'_1)) = -85.9618 kN*m
