tonf := 1000 kgf
0.547/2 = 0.2735
M_d := 2.639 kN*m
h := (0.205 m + 0.175 m + 0.97 m) - 0.08 m = 1.27 m
h1 := 0.36 m
h2 := 0.205 m
h3 := 0.175 m
h4 := 0.97 m
h5 := 0.08 m  # : 포장 두께
방호벽높이 := (h2 + h3 + h4) - h5 = 1.27 m
h := h1/2 + h5 + 1.0 m = 1.26 m
Mco := 23.333 kN*h = 2.99792 tonf*m
h := 9 m - h5 = 8.92 m
풍하중강도 := 3*kN/m
Pw := (풍하중강도*h) = 26.76 kN
hw := h/2 + h5 + h1/2 = 4.72 m
Mw := Pw*hw = 126.307 kN*m
Mu4 := 1.2*M_d + 1.2*Mw + 1.2*Mco = 190.015 kN*m
Mu := 75.8 kN*m
fck := 27 MPa = 275.323 kgf/cm^2
fy := 400 MPa = 4078.86 kgf/cm^2
ϕ := 0.85
B := 1000 mm
H := 360 mm
d := H - 60 mm = 300 mm
1000/8 = 125
fy^2/(2*0.85*fck*B)*As^2 - fy*d*As + Mu/ϕ = 0  # error: This variable is undefined.
520 mm - 300 mm = 220 mm
((fy*d) + sqrt((fy*d)^2 - 4*(fy^2/(2*0.85*fck*B))*Mu/ϕ))/(2*(fy^2/(2*0.85*fck*B))) = 33665.1 mm^2
((fy*d) - sqrt((fy*d)^2 - 4*(fy^2/(2*0.85*fck*B))*Mu/ϕ))/(2*(fy^2/(2*0.85*fck*B))) = 759.912 mm^2
f(As) := fy^2/(2*0.85*fck*B)*As^2 - fy*d*As + Mu/ϕ
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As := 100 mm^2
As1 := root(f(As), As, 1 mm^2, 10000 mm^2)
As1 = 759.912 mm^2
As1 = 7.59912 cm^2
As1 = 0.000759912 m^2
