tonf := 1000 kgf
Wsc := 25*kN/m^3 = 2.54929 tonf/m^3
# 2. BEAM 검토
# 2.1 단면의 제원
# 1) 총단면
b1 := 700 mm
h1 := 180 mm
A1 := b1*h1 = 126000 mm^2
y1 := h1/2 = 90 mm
Ay1 := A1*y1 = 11340000 mm^3
b2 := 250 mm
h2 := 100 mm
A2 := 1/2*b2*h2*2 = 25000 mm^2
y2 := h1 + h2*1/3 = 213.333 mm
Ay2 := A2*y2 = 5333333 mm^3
b3 := 200 mm
h3 := 100 mm + 1270 mm + 220 mm = 1590 mm
A3 := b3*h3 = 318000 mm^2
y3 := h1 + h3/2 = 975 mm
Ay3 := A3*y3 = 310050000 mm^3
b4 := 230 mm
h4 := 220 mm
A4 := (1/2*b4*h4)*2 = 50600 mm^2
y4 := h1 + h3 - h4*1/3 = 1696.67 mm
Ay4 := A4*y4 = 85851333 mm^3
b5 := 660 mm
h5 := 230 mm
A5 := b5*h5 = 151800 mm^2
y5 := h1 + h3 + h5/2 = 1885 mm
Ay5 := A5*y5 = 286143000 mm^3
# BEAM 상단에서 도심 까지의 거리
y_t1 := (Ay1 + Ay2 + Ay3 + Ay4 + Ay5)/(A1 + A2 + A3 + A4 + A5) = 1040.69 mm
y_b1 := y_t1 - 2000 mm = -959.312 mm
yy1 := y_t1 - h1/2 = 950.688 mm
Ayy1 := A1*yy1^2 = 1.1388e11 mm^4
I1 := b1*h1^3/12 = 340200000 mm^4
yy2 := y_t1 - (h1 + h2*1/3) = 827.354 mm
Ayy2 := A2*yy2^2 = 1.71129e10 mm^4
I2 := (1/36*b2*h2^3)*2 = 13888889 mm^4
yy3 := y_t1 - (h1 + h3/2) = 65.6876 mm
Ayy3 := A3*yy3^2 = 1.37213e9 mm^4
I3 := 1/12*b3*h3^3 = 6.69947e10 mm^4
yy4 := y_b1 + (h5 + 1/3*h4) = -655.979 mm
Ayy4 := A4*yy4^2 = 2.17736e10 mm^4
I4 := (1/36*b4*h4^3)*2 = 136057778 mm^4
yy5 := y_b1 + (1/2*h5) = -844.312 mm
Ayy5 := A5*yy5^2 = 1.08213e11 mm^4
I5 := (1/12*b5*h5^3) = 0.000669185 m^4
ΣAyy := Ayy1 + Ayy2 + Ayy3 + Ayy4 + Ayy5 = 2.62351e11 mm^4
ΣI := I1 + I2 + I3 + I4 + I5 = 6.8154e10 mm^4
I_x1 := ΣAyy + ΣI = 3.30505e11 mm^4
I_x1 = 0.330505 m^4
Z_t1 := I_x1/y_t1 = 317583231 mm^3
Z_b1 := I_x1/y_b1 = -344522746 mm^3
# 2.2 고정하중
# 1) PSC BEAM 중량
# (1) 가로보 부근 PSC BEAM 콘크리트 BLOCK 중량
w1 := (700 mm*(100 mm + 180 mm))*Wsc = 4.9 kN/m
w2 := (1/2*250*mm*100*mm)*2*Wsc = 0.625 kN/m
w3 := (200 mm*1270*mm)*Wsc = 6.35 kN/m
w4 := (1/2*230*mm*220*mm)*2*Wsc = 1.265 kN/m
w5 := (660 mm*(230 mm + 220 mm))*Wsc = 7.425 kN/m
W_PSC_Beam := w1 - w2 + w3 - w4 + w5 = 16.785 kN/m
W_PSC_Beam = 1.71159 tonf/m
# 2 ) 횡 BEAM 중량
# (1) 외측 BEAM
# ① 중앙부
Pc := 12.879 kN = 1.31329 tonf
# ② 단부
Pe := 5.602 kN = 0.571245 tonf
# (2) 내측 BEAM
# ① 중앙부
Pc := 25.757 kN = 2.62648 tonf
# ② 단부
Pe := 11.204 kN = 1.14249 tonf
# (3) BEAM 중량
W_PSC_Beam = 1.71159 tonf/m
2000 mm*700*mm*25*kN/m^3 = 3.56901 tonf/m
# 2.3 고정하중에 의한 모멘트 및 전단력
# 1) PSC BEAM 해석
# (1) 해석 모델링 및 작용하중
# (2) 해석 결과
M := W_PSC_Beam*(30 m)^2/8 = 1888.31 kN*m
M = 192.554 tonf*m
# 2) 슬래브 및 횡 BEAM (합성전)
# (1) 외측 BEAM
# 슬래브 중량
# 횡빔 중량
# (2) 내측 BEAM
# 3) 포장 및 방호벽 (합성후)
# 2.4 활하중에 의한 모멘트 및 전단력
# 1) 충격게수
# 2) 횡분배계수
# 3) 외측 BEAM
M_L := 1487.127 kN*m = 151.645 tonf*m
# 4) 내측 BEAM
M_L := 2977.397 kN*m = 303.61 tonf*m
# 2.5 탱크하중에 의한 모멘트 및 전단력
# 1) 충격계수
# 2) 횡분배 계수
# 3) 외측 Beam
# 4) 내측 Beam
# 2.6 트레일러 하중에 의한 모멘트 및 전단력
# 1) 충격계수
# 2) 횡분배계수
# 3) 외측 Beam
# 4) 내측 Beam
# 2.7 단면력 집계표
# 1) 관용적 해석 결과
# 2.8 고정하중 및 활하중에 의한 응력 계산
# 1) 외측 Beam
# Beam 자중
f_상연 := 2157.59 kN*m/(317092974.256*mm^3) = 6.80428 MPa
f_하연 := 2157.59*kN*m/(342616400.12*mm^3) = 6.29739 MPa
f_강선도심 := 2157.59 kN*m/(386886707.102*mm^3) = 5.5768 MPa
# 합성 전 고정하중
M := 2310.38 kN*m = 235.593 tonf*m
Z_t3 := 326297147.53*mm^3
Z_b3 := 381414732.864*mm^3
Z_p3 := 433076669.86 mm^3 = 433077 cm^3
f_상연 := M/Z_t3 = 7.0806 MPa
f_하연 := M/Z_b3 = 6.0574 MPa
f_강선도심 := M/Z_p3 = 5.33481 MPa
# 합성후 고정하중
M := 2748.76 kN*m = 280.296 tonf*m
Z_st := 1114259345.5 mm^3 = 1.11426 m^3
Z_t4 := 1994752614.34 mm^3 = 1.99475 m^3
Z_b4 := 588417810.838 mm^3 = 0.588418 m^3
Z_p4 := 633541184.079 mm^3 = 0.633541 m^3
f_slab := M/Z_st = 2.46689 MPa
f_slab = 25.1553 kgf/cm^2
f_beam_top := M/Z_t4 = 1.378 MPa
f_beam_top = 14.0516 kgf/cm^2
f_beam_bottom := M/Z_b4 = 4.67144 MPa
f_beam_bottom = 47.6355 kgf/cm^2
f_sheath := M/Z_p4 = 4.33872 MPa
n := 200000/29314.90 = 6.82247
f_strend := n*M/Z_p4 = 29.6008 MPa
활하중
# 2.9 프리스트레스에 의한 응력 계산
# 1) 단면내의 긴장재의 위치 결정
# (1) 소요 ps 강연선 개수의 약산
# (2) 강연선의 배치
# (3) PS 강연선을 포물선 형상으로 배치
# (4) 거더 중심으로부터 거리에 따른 거더 하단에서 강연선까지의 높이 산출
# (5) 긴장재의 긴장응력 가정
# (6) 프리스트레스의 즉시 손실 및 긴장재의 초기응력 결정
# ① PS 강연선과 쉬스 사이의 마찰에 의한 손실량
# ② 정착장치 활동량에 의한 손실량
# ③ 콘크리트 탄성수축에 의한 손실량
# ④ PS 강연선의 초기 긴장응력
# (7) 프리스트레스의 시간적 손실 및 긴장재의 유효응력 결정
# ① 콘크리트 크리프에 의한 손실량
# ② 콘크리트 건조수축에 의한 손실량
# ③ PS 강연선의 릴렉세이션에 의한 손실량
# ④ PS 강연선의 유효응력
# (8) 긴장재의 신축량 계산
No1
No2
No3
No4
# (9) 프리스트레스의 영향을 고려한 재하단계별 응력계산
# ① 프리스트레스 도입직후의 콘크리트 응력
# ② 유효 프리스트레스
# ③ 설계하중 작용시의 휨응력
# 2.10 2차응력계산
# 1) 크리프 및 건조수축에 의한 단면력 계산
# (1) 크리프에 의한 단면력 계산
# (2) 건조수축에 의한 단면력 계산
# 2) PSC 거더 밑 바닥판 상하연의 응력계산
# (1) 크리프에 의한 응력계산
# (2) 건조수축에 의한 응력계산
# 2.11 휨 극한 안정성 검토  ( 내측거더 )
# 1) 외력에 의한 극한 모멘트 계산
M_D := 5395.076 kN*m
M_L := 2977.397 kN*m
M_u := 1.3*M_D + 2.15*M_L = 13415 kN*m
M_u = 1367.95 tonf*m
# 2) 설계 단면의 휨 저항강도 계산
# 【 검토 조건 】
B := 2625 mm = 2.625 m  # : 상부 바닥판의 유호폭
b_1 := 200 mm = 0.2 m  # : 복부 두께
d := 2000 mm + 360 mm - 110 mm = 2250 mm
# : 바닥판 상단에서 강연선 도심까지의 거리
A_p := 4*1184.52*mm^2 = 4738.08 mm^2  # :  PS 강연선의 단면적
E_pss := 200000 MPa = 2039432 kgf/cm^2  # : PS 강연선의 탄성계수
f_pe := 920 MPa = 9381.39 kgf/cm^2  # : PS 강연선의 유효 인장응력
f_pu := 1900 MPa = 19374.6 kgf/cm^2  # : PS 강연선의 극한강도
f_py := 1600 MPa = 16315.5 kgf/cm^2  # : PS 강연선의 항복강도
f_ck := 27 MPa = 275.323 kgf/cm^2  # : 콘크리트의 설계기준강도
f_ps := 0.93*f_pu = 1767 MPa  # 라 가정한다
# 수식 A_p*f_ps := 0.85*f_ck*0.85*x*B 에서
x := A_p*f_ps/(0.85*f_ck*0.85*B) = 163.496 mm
a := 0.85*x = 138.972 mm
# 응력 직사삭형의 깊이 a = 0.138972 m로 슬래브 두께 t_slab := 350 mm보다 작으므로 직사각형부재로 취급
ε_cu := 0.003  # :  콘크리트 압축연단에서의 최대 변형률
ε_pe := f_pe/E_pss = 0.0046
ε_p := ((d - x)/x)*ε_cu + ε_pe = 0.0428853
f_ps := 0.93*f_pu = 1767 MPa
# 【 극한 저항모멘트 】
ϕ := 0.85
ϕM_n := ϕ*(A_p*f_ps*(d - a/2)) = 15517.3 kN*m
ϕM_n = 1582.33 tonf*m
M_u = 1367.95 tonf*m
M_u/ϕM_n = 86.4518 %
Moment_Check :=
    "O.K" if ϕM_n > M_u
    "N.G" otherwise
    = "O.K"
# 3) 균열모멘트 계산
# 【 검토 조건 】
f_ck
# : PSC Beam의 설계기준 강도
f_ck := 40 MPa
f_외력
# : 고정 및 활하중에 의한 응력
f_외력 := -19.50*N/mm^2
f_pe
# : 유효 프리스트레스에 의한 응력
f_pe := 17.34*N/mm^2
# f'_cr | : 균열이 발생되기 위한 추가적인 응력
# M'_cr | :  균열이 발생되기 위한 추가적인 모멘트
# Z_b6 | : 슬래브 환산단면의 PSC Beam 하연에 대한 단면계수
Z_b6 := 599548690.406 mm^3
# 【 균열 모멘트 계산 】
# f_외력 + f_pe + f'_cr = f_외력 + f_pe - M'_cr/Z_b6 =-0.63*sqrt(f_ck)
M'_cr := (0.63*sqrt(MPa)*sqrt(f_ck) + f_외력 + f_pe)*Z_b6 = 1093.86 kN*m
M_cr := (M_D + M_L) + M'_cr = 9466.33 kN*m
1.2*M_cr = 11359.6 kN*m
ϕM_n = 15517.3 kN*m
균열모멘트_Check :=
    "O.K" if 1.2*M_cr < ϕM_n
    "N.G" otherwise
    = "O.K"
f_외력 = -19.5 MPa
0.63*sqrt(MPa)*sqrt(f_ck) = 3.98447 MPa
-0.63*sqrt(40) = -3.98447
-19.50 + 17.34 = -2.16
3.984 + (-2.16) = 1.824
1.824*599548690.406 = 1.09358e9
5395.076 + 2977.397 = 8372.47
