tonf := 1000 kgf
# 1. 슬래브 단부 바닥판 계산
# 1) 설계 단면
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H1 := 595.5 mm  # : 단부 전체 높이
1/2*(550 mm + 641 mm) = 595.5 mm
H2 := 50 mm  # : 포장 두께
H3 := 250 mm  # : 일반부 바닥판 두께
83 + 107 + 60 = 250
L1 := 412.5 mm  # : 단부 캔틸레버부 돌출 길이
500 mm - (1/2*350*mm)*1/2 = 412.5 mm
L2 := 350 mm  # : 단부 가로보 폭
L3 := 100 mm  # : 캔틸레버 단부에서 활하중 재하 위치
# 2) 하중 계산
# (1) 고정 하중
L1 = 412.5 mm
H1 = 595.5 mm
P_D := L1*H1*25*kN/m^3*1*m = 6.14109 kN
M_D := P_D*(1/2*L1) = 1.2666 kN*m
# (2) 활하중
P_r := 96 kN
# (2.1) 충격계수
i := 15 m/(40 m + L1) = 0.371172
i :=
    i if i < 0.3
    0.3 otherwise
    = 0.3
# (2.2) 윤하중 작용 위치
X := L1 - L3 = 0.3125 m
# (2.3) 윤하중 작용폭
E := 0.35*X + 0.98 m = 1.08937 m
E :=
    E if E < 2.1 m
    2.1 m otherwise
    = 1.08937 m
E := E/m = 1.08937
# (2.4) 활하중 모멘트
M_L := (P_r*(1 + i)/E)*X = 35.8003 kN*m
# (3) 하중 조합
M_U := 1.3*M_D + 2.15*M_L = 78.6173 kN*m
