tonf := 1000 kgf
g = 9.80665 m/s^2
# 1. 설계 기준
# 1.1  방호벽 형식
# 1) 구조 형식 | 교량용 차량 방호 울타리
# 2) 방호벽 형식 | 보완 형식 - 1
# 3) 방호벽 높이
H := 1.050 m
# 4) 충돌 높이
He := 1.000 m
# 1.2 하중
# 1) 고정하중
# ① 철근 콘크리트
W_c1 := 2.500*tonf/m^3
# ② 무근 콘크리트
W_C2 := 2.350*tonf/m^3
# ③ ASCON
W_a := 2.300*tonf/m^3
# 2) 충돌 하중
# 3) 사용재료
# (1) 기존 방호벽
f_ck.old := 240*kgf/cm^2
E_c.old := 238000*kgf/cm^2
f_y.old := 3000*kgf/cm^2 = 294.199 MPa
E_s.old := 2000000*kgf/cm^2 = 196133 MPa
# (2) 보완 방호벽 (추가분)
f_ck.new := 240*kgf/cm^2
E_c.new := 238000*kgf/cm^2
f_y.new := 3000*kgf/cm^2 = 294.199 MPa
E_s.new := 2000000*kgf/cm^2 = 196133 MPa
# (3) 슬래브
f_ck_slab := 270*kgf/cm^2
E_c_slab := 253000*kgf/cm^2
f_y.slab := 4000*kgf/cm^2
E_S.slab := 2000000*kgf/cm^2
# 1.3 참고문헌
# 2. 가정 단면
# 3. 충돌 시 최대 충격력
# 3.1 Olsen Model ( NCHRP Report 86 )
# A | 차량 앞면으로부터 차량의 무게 중심 까지의 거리
A := 14.2 ft = 4.32816 m
B
# 차량의 폭
B := 8 ft = 2.4384 m
15/180*π = 0.261799
θ
# 충돌각
θ := 15 deg = 0.261799 rad
# D | 방호울타리의 횡방향 변위
D := 0 mm
# V_1 | 충돌전 차량의 속도
V_1 := 80*km/hr
# 1) 감가속도
# 【 설계 입력 변수값 】
V_o := 80*km/hr = 22.2222 m/s
A := 4.33 m
B := 2.44 m
θ := 15 deg
D := 0 m
avgG_lat := V_o^2*sin(θ)^2/(2*g*(A*sin(θ) - 0.5*B*(1 - cos(θ)) + D)) = 1.56296
maxG_lat := π/2*avgG_lat = 2.4551
# 2) 횡방향 충격력
W := 14*tonf
maxF_lat := maxG_lat*W = 34.3713 tonf
# 3.2 AASHTO LRFD Bridge Design Specifications
# 1) 적용기준
# 2) 황방향 충격력
# 4. 방호벽 전체 저항력 검토
# 4.1 연직축에 대한 BEAM의 Moment강도 (Mb)
# 가정한 방호벽 상단에 Beam 구간이 없으므로 Mb=0으로 된다.
D13 := 1.267 cm^2
D16 := 1.986 cm^2
D19 := 2.865 cm^2
D22 := 3.871 cm^2
# 4.2 연직축에 대한 WALL의 Moment강도 (M_w*H )
# 1.1) 기존 방호벽 Segement1 의 정부모멘트 강도
f_y.old = 3000 kgf/cm^2
f_ck.old = 240 kgf/cm^2
ϕ := 1.0
b := 70 cm
n_bar := 3
As := D13 = 1.267 cm^2
# 【 계산 】
As := D13*n_bar = 3.801 cm^2
a := As*f_y.old/(0.85*f_ck.old*b) = 0.798529 cm
d_v1 := 13.2 cm
ϕMn_11 := ϕ*As*f_y.old*(d_v1 - a/2) = 145967 kgf*cm
# 1.2) 보완 방호벽 (추가분) Segment1의 정.부모멘트 강도
# 【 설계 입력 변수값 】
f_y.new = 3000 kgf/cm^2
f_ck.new = 240 kgf/cm^2
ϕ := 1.0
b := 70 cm
D13 := 1.267 cm^2
n_bar := 3
# 【 계산 】
As := D13*n_bar = 3.801 cm^2
a := As*f_y.old/(0.85*f_ck.old*b) = 0.798529 cm
d_v2 := 19.4 cm
ϕMn_12 := ϕ*As*f_y.old*(d_v2 - a/2) = 216665 kgf*cm
# 2.1 ) 기존 방호벽 Segment2의 정.부모멘트 강도
# 【 설계 입력 변수값 】
f_y.old = 3000 kgf/cm^2
f_ck.old = 240 kgf/cm^2
ϕ := 1.0
b := 17.5 cm
D13 := 1.267 cm^2
n_bar := 0
# 【 계산 】
As := D13*n_bar = 0 cm^2
a := As*f_y.old/(0.85*f_ck.old*b) = 0 cm
d_v2 := 0.0 cm
ϕMn_21 := ϕ*As*f_y.old*(d_v2 - a/2) = 0 kgf*cm
# 2.2 ) 보완 방호벽 Segment2의 정.부모멘트 강도
# 【 설계 입력 변수값 】
f_y.new = 3000 kgf/cm^2
f_ck.new = 240 kgf/cm^2
ϕ := 1.0
b := 17.5 cm
D13 := 1.267 cm^2
n_bar := 1
# 【 계산 】
As := D13*n_bar = 1.267 cm^2
a := As*f_y.old/(0.85*f_ck.old*b) = 1.06471 cm
d_v2 := 23.8 cm
ϕMn_22 := ϕ*As*f_y.old*(d_v2 - a/2) = 88440.3 kgf*cm
# 3.1 ) 기존 방호벽 Segment3의 정.부모멘트 강도
# 【 설계 입력 변수값 】
f_y.old = 3000 kgf/cm^2
f_ck.old = 240 kgf/cm^2
ϕ := 1.0
b := 17.5 cm
D13 := 1.267 cm^2
n_bar := 1
# 【 계산 】
As := D13*n_bar = 1.267 cm^2
a := As*f_y.old/(0.85*f_ck.old*b) = 1.06471 cm
d_v2 := 31.9 cm
ϕMn_31 := ϕ*As*f_y.old*(d_v2 - a/2) = 119228 kgf*cm
# 3.2 ) 보완 방호벽 Segment3의 정.부모멘트 강도
# 【 설계 입력 변수값 】
f_y.new = 3000 kgf/cm^2
f_ck.new = 240 kgf/cm^2
ϕ := 1.0
b := 17.5 cm
D13 := 1.267 cm^2
n_bar := 1
# 【 계산 】
As := D13*n_bar = 1.267 cm^2
a := As*f_y.old/(0.85*f_ck.old*b) = 1.06471 cm
d_v2 := 34.6 cm
ϕMn_32 := ϕ*As*f_y.old*(d_v2 - a/2) = 129491 kgf*cm
# 4) 전체 모멘트
M_w := ϕMn_11 + ϕMn_12 + ϕMn_21 + ϕMn_22 + ϕMn_31 + ϕMn_32 = 6.99792 tonf*m
# 4.3 수평축에 대한 WALL의 Moment강도 (M_c )
# 1.1) 기존 방호벽 Segment1의 모멘트 강도
# 【 설계 입력 변수값 】
f_y.old = 3000 kgf/cm^2
f_ck.old = 240 kgf/cm^2
ϕ := 1.0
b := 100 cm
d_h11 := 14.3 cm
n_bar := 1000/200 = 5
As := D16
# 【 계산 】
As := As*n_bar = 9.93 cm^2
a := As*f_y.old/(0.85*f_ck.old*b) = 1.46029 cm
ϕMc_11 := ϕ*As*f_y.old*(d_h11 - a/2) = 404246 kgf*cm
# 1.2) 보완 방호벽 (추가분) Segment1의 모멘트 강도
# 【 설계 입력 변수값 】
f_y.new = 3000 kgf/cm^2
f_ck.new = 240 kgf/cm^2
ϕ := 1.0
b := 100 cm
d_h12 := 21.8 cm
n_bar := 1000/200 = 5
As := D13 = 1.267 cm^2
# 【 계산 】
As := As*n_bar = 6.335 cm^2
a := As*f_y.new/(0.85*f_ck.new*b) = 0.931618 cm
ϕMc_11 := ϕ*As*f_y.new*(d_h12 - a/2) = 405456 kgf*cm
