## 교량용 방호울타리 구조 계산서
tonf := 1000 kgf
g = 9.80665 m/s^2
# 1. 설계 기준
# 1.1  방호벽 형식
# 1) 구조 형식 | 교량용 차량 방호 울타리
# 2) 방호벽 형식 | 보완 형식 - 1
# 3) 방호벽 높이
H := 1.050 m
# 4) 충돌 높이
He := 1.000 m
# 1.2 하중
# 1) 고정하중
W_c1 := 2.500*tonf/m^3
# 철근 콘크리트
# 단위 중량
W_C2 := 2.350*tonf/m^3
# 무근 콘크리트
# 단위 중량
W_a := 2.300*tonf/m^3
# ASCON
# 단위중량
# 2) 충돌 하중
# (1) 도로안전시설 설치 및 관리지침 (건설교통부 2001.7 )
# SB5 | 종별
# 14*tonf | 차량중량 (tonf)
# 80*km/hr | 충돌 속도 (km/hr)
# 15 deg | 충돌 각도 (도)
# 420J | 충격도 (J)
# (2) AASHTO LRFD Bridge Design Specifications
TL - 4  # Railing Test Level
# 240000 N | Transverse (N)
# 80000 N | Longitudinal (N)
# 80000 N | Vertical (N)
# 1070 mm | L_t and L_L (mm)
# 3) 사용재료
# (1) 기존 방호벽
f_ck.old := 240*kgf*cm^-2 = 23.536 MPa
# 기존 방호벽
# 콘크리트 설계기준 강도
E_c.old := 238000*kgf*cm^-2 = 23339.8 MPa
# 기존 방호벽
# 콘크리트 탄성계수
f_y.old := 3000*kgf*cm^-2 = 294.2 MPa
# 기존 방호벽
# 철근 항복 강도
E_s.old := 2000000*kgf*cm^-2 = 196133 MPa
# 기존 방호벽
# 철근 탄성계수
# (2) 보완 방호벽 (추가분)
f_ck.new := 240*kgf*cm^-2 = 23.536 MPa
E_c.new := 238000*kgf*cm^-2 = 23339.8 MPa
f_y.new := 3000*kgf*cm^-2 = 294.2 MPa
E_s.new := 2000000*kgf*cm^-2 = 196133 MPa
# (3) 슬래브
f_ck.slab := 270*kgf/cm^2 = 26.478 MPa
E_c.slab := 253000*kgf/cm^2 = 24810.8 MPa
f_y.slab := 4000*kgf/cm^2 = 392.266 MPa
E_S.slab := 2000000*kgf/cm^2 = 196133 MPa
# (4) 철근 단면적
D13 := 1.267 cm^2
D16 := 1.986 cm^2
D19 := 2.865 cm^2
D22 := 3.871 cm^2
# 1.3 참고문헌
# 2. 가정 단면
# Segment 1
# 【 기존 방호벽 제원 】
H_seg1 := 700 mm
# 【 기존 방호벽 철근 제원 】
d_v11 := 132 mm
# 기존 방호벽
# 수평철근
# 유효깊이
d_h11 := 143 mm
# 기존 방호벽
# 연직철근
# 유효깊이
n_bar.11 := 3
D_11 := D13
# 【 보완 방호벽 철근 제원 】
d_v12 := 194 mm
# 보완 방호벽
# 수평철근
# 유효깊이
d_h12 := 218 mm
# 보완 방호벽
# 연직철근
# 유효깊이
n_bar.12 := 3
D_12 := D13
# Segment 2
# 【 기존 방호벽 제원 】
H_seg2 := 175 mm
# 【 기존 방호벽 철근 제원 】
d_v21 := 0 mm
# 기존 방호벽
# 수평철근
# 유효깊이
d_h21 := 307 mm
# 기존 방호벽
# 연직철근
# 유효깊이
n_bar.21 := 0
D_21 := D13
# 【 보완 방호벽 철근 제원 】
d_v22 := 238 mm
# 보완 방호벽
# 수평철근
# 유효깊이
d_h22 := 307 mm
# 보완 방호벽
# 연직철근
# 유효깊이
n_bar.22 := 1
D_22 := D13
# Segment 3
# 【 기존 방호벽 제원 】
H_seg3 := 175 mm
# 【 기존 방호벽 철근 제원 】
d_v31 := 319 mm
# 기존 방호벽
# 수평철근
# 유효깊이
d_h31 := 318 mm
# 기존 방호벽
# 연직철근
# 유효깊이
n_bar.31 := 1
D_31 := D13
# 【 보완 방호벽 철근 제원 】
d_v32 := 346 mm
# 보완 방호벽
# 수평철근
# 유효깊이
d_h32 := 370 mm
# 보완 방호벽
# 연직철근
# 유효깊이
n_bar.32 := 1
D_32 := D13
# 3. 충돌 시 최대 충격력
# 3.1 Olsen Model ( NCHRP Report 86 )
# 【 설계 입력 변수값 】
A
# 차량 앞면으로부터
# 차량의 무게
# 중심 까지의 거리
A := 14.2 ft = 4.32816 m
B
# 차량의 폭
B := 8 ft = 2.4384 m
θ
# 충돌각
θ := 15 deg = 0.261799 rad
D
# 방호울타리의
# 횡방향 변위
D := 0 mm
# V_o | 충돌전 차량의 속도
V_o := 80*km/hr = 22.2222 m/s
# 1) 감가속도
avgG_lat := V_o^2*sin(θ)^2/(2*g*(A*sin(θ) - 0.5*B*(1 - cos(θ)) + D)) = 1.56361
maxG_lat := π/2*avgG_lat = 2.45612
# 2) 횡방향 충격력
W := 14*tonf
maxF_lat := maxG_lat*W = 34.3857 tonf
# 3.2 AASHTO LRFD Bridge Design Specifications
# 1) 적용기준
# TL - 4
# 2) 황방향 충격력
maxF_AASHTO := 240000 N = 24.4732 tonf
# 4. 방호벽 전체 저항력 검토
# 4.1 연직축에 대한 BEAM의 Moment강도 (Mb)
# 가정한 방호벽 상단에 Beam 구간이 없으므로 Mb=0으로 된다.
M_b := 0.000*tonf*m
# 4.2 연직축에 대한 WALL의 Moment강도 (M_w*H )
# 1.1) 기존 방호벽 Segement1 의 정부모멘트 강도
# 【 설계 입력 변수값 】
f_y := f_y.old = 294.2 MPa
f_ck := f_ck.old = 23.536 MPa
ϕ := 1.0
b := H_seg1 = 70 cm
d_v := d_v11 = 13.2 cm
n_bar := n_bar.11 = 3
D := D_11 = 1.267 cm^2
# 【 계산 】
As := D*n_bar = 3.801 cm^2
a := As*f_y/(0.85*f_ck*b) = 0.798529 cm
ϕMn_11 := ϕ*As*f_y*(d_v - a/2) = 145967 kgf*cm
# 1.2) 보완 방호벽 (추가분) Segment1의 정.부모멘트 강도
# 【 설계 입력 변수값 】
f_y := f_y.new = 294.2 MPa
f_ck := f_ck.new = 23.536 MPa
ϕ := 1.0
b := H_seg1 = 70 cm
d_v := d_v12 = 19.4 cm
n_bar := n_bar.12 = 3
D := D_12 = 1.267 cm^2
# 【 계산 】
As := D*n_bar = 3.801 cm^2
a := As*f_y/(0.85*f_ck*b) = 0.798529 cm
ϕMn_12 := ϕ*As*f_y*(d_v - a/2) = 216665 kgf*cm
# 2.1 ) 기존 방호벽 Segment2의 정.부모멘트 강도
# 【 설계 입력 변수값 】
f_y := f_y.old = 294.2 MPa
f_ck := f_ck.old = 23.536 MPa
ϕ := 1.0
b := H_seg2 = 17.5 cm
d_v := d_v21 = 0 cm
n_bar := n_bar.21 = 0
D := D_21 = 1.267 cm^2
# 【 계산 】
As := D*n_bar = 0 cm^2
a := As*f_y/(0.85*f_ck*b) = 0 cm
ϕMn_21 := ϕ*As*f_y*(d_v - a/2) = 0 kgf*cm
# 2.2 ) 보완 방호벽 Segment2의 정.부모멘트 강도
# 【 설계 입력 변수값 】
f_y := f_y.new = 294.2 MPa
f_ck := f_ck.new = 23.536 MPa
ϕ := 1.0
b := H_seg2 = 17.5 cm
d_v := d_v22 = 23.8 cm
n_bar := n_bar.22 = 1
D := D_22 = 1.267 cm^2
# 【 계산 】
As := D*n_bar = 1.267 cm^2
a := As*f_y/(0.85*f_ck*b) = 1.06471 cm
ϕMn_22 := ϕ*As*f_y*(d_v - a/2) = 88440.3 kgf*cm
# 3.1 ) 기존 방호벽 Segment3의 정.부모멘트 강도
# 【 설계 입력 변수값 】
f_y := f_y.old = 294.2 MPa
f_ck := f_ck.old = 23.536 MPa
ϕ := 1.0
b := H_seg3 = 17.5 cm
d_v := d_v31 = 31.9 cm
n_bar := n_bar.31 = 1
D := D_31 = 1.267 cm^2
# 【 계산 】
As := D*n_bar = 1.267 cm^2
a := As*f_y/(0.85*f_ck*b) = 1.06471 cm
ϕMn_31 := ϕ*As*f_y*(d_v - a/2) = 119228 kgf*cm
# 3.2 ) 보완 방호벽 Segment3의 정.부모멘트 강도
# 【 설계 입력 변수값 】
f_y := f_y.new = 294.2 MPa
f_y.new = 3000 kgf/cm^2
f_ck := f_ck.new = 23.536 MPa
f_ck.new = 240 kgf/cm^2
ϕ := 1.0
ϕ := 1.0
b := H_seg3 = 17.5 cm
b := 17.5 cm
d_v := d_v32 = 34.6 cm
d_v32 := 34.6 cm
n_bar := n_bar.32 = 1
D13 := 1.267 cm^2
D := D_32 = 1.267 cm^2
n_bar := 1
# 【 계산 】
As := D*n_bar = 1.267 cm^2
a := As*f_y/(0.85*f_ck*b) = 1.06471 cm
ϕMn_32 := ϕ*As*f_y*(d_v - a/2) = 129491 kgf*cm
# 4) 전체 모멘트
ϕMn_11 = 1.45967 tonf*m
ϕMn_12 = 2.16665 tonf*m
ϕMn_21 = 0 tonf*m
ϕMn_22 = 0.884403 tonf*m
ϕMn_31 = 1.19228 tonf*m
ϕMn_32 = 1.29491 tonf*m
M_w := ϕMn_11 + ϕMn_12 + ϕMn_21 + ϕMn_22 + ϕMn_31 + ϕMn_32 = 6.99792 tonf*m
0
H×M_w := M_w = 6.99792 tonf*m
# 4.3 수평축에 대한 WALL의 Moment강도 (M_c )
# 1.1) 기존 방호벽 Segment1의 모멘트 강도
# 【 설계 입력 변수값 】
f_y.old = 3000 kgf/cm^2
f_ck.old = 240 kgf/cm^2
ϕ := 1.0
b := 100 cm
d_h11 := 14.3 cm
n_bar := 1000/200 = 5
As := D16
# 【 계산 】
As := As*n_bar = 9.93 cm^2
a := As*f_y.old/(0.85*f_ck.old*b) = 1.46029 cm
ϕMc_11 := ϕ*As*f_y.old*(d_h11 - a/2) = 404246 kgf*cm
# 1.2) 보완 방호벽 (추가분) Segment1의 모멘트 강도
# 【 설계 입력 변수값 】
f_y.new = 3000 kgf/cm^2
f_ck.new = 240 kgf/cm^2
ϕ := 1.0
b := 100 cm
d_h12 := 21.8 cm
n_bar := 1000/200 = 5
As := D13 = 1.267 cm^2
# 【 계산 】
As := As*n_bar = 6.335 cm^2
a := As*f_y.new/(0.85*f_ck.new*b) = 0.931618 cm
ϕMc_12 := ϕ*As*f_y.new*(d_h12 - a/2) = 405456 kgf*cm
# 2.1) 기존 방호벽 Segment2의 모멘트 강도
# 【 설계 입력 변수값 】
f_y.old = 3000 kgf/cm^2
f_ck.old = 240 kgf/cm^2
ϕ := 1.0
b := 100 cm
d_h21 := 21.4 cm
n_bar := 1000/200 = 5
As := D13
# 【 계산 】
As := As*n_bar = 6.335 cm^2
a := As*f_y.old/(0.85*f_ck.old*b) = 0.931618 cm
ϕMc_21 := ϕ*As*f_y.old*(d_h21 - a/2) = 397854 kgf*cm
# 2.2) 보완 방호벽 (추가분) Segment2의 모멘트 강도
# 【 설계 입력 변수값 】
f_y.new = 3000 kgf/cm^2
f_ck.new = 240 kgf/cm^2
ϕ := 1.0
b := 100 cm
d_h22 := 30.7 cm
n_bar := 1000/200 = 5
As := D13 = 1.267 cm^2
# 【 계산 】
As := As*n_bar = 6.335 cm^2
a := As*f_y.new/(0.85*f_ck.new*b) = 0.931618 cm
ϕMc_22 := ϕ*As*f_y.new*(d_h22 - a/2) = 574601 kgf*cm
ϕMc_22 = 5.74601 tonf*m
# 3.1) 기존 방호벽 Segment3의 모멘트 강도
# 【 설계 입력 변수값 】
f_y.old = 3000 kgf/cm^2
f_ck.old = 240 kgf/cm^2
ϕ := 1.0
b := 100 cm
d_h31 := 31.8 cm
n_bar := 1000/200 = 5
As := D13
# 【 계산 】
As := As*n_bar = 6.335 cm^2
a := As*f_y.old/(0.85*f_ck.old*b) = 0.931618 cm
ϕMc_31 := ϕ*As*f_y.old*(d_h31 - a/2) = 595506 kgf*cm
ϕMc_31 = 5.95506 tonf*m
# 3.2) 보완 방호벽 (추가분) Segment3의 모멘트 강도
# 【 설계 입력 변수값 】
f_y.new = 3000 kgf*cm^-2
f_ck.new = 240 kgf*cm^-2
ϕ := 1.0
b := 100 cm
d_h32 := 37.0 cm
n_bar := 0 = 0
As := D13 = 1.267 cm^2
# 【 계산 】
As := As*n_bar = 0 cm^2
a := As*f_y.new/(0.85*f_ck.new*b) = 0 cm
ϕMc_32 := ϕ*As*f_y.new*(d_h32 - a/2) = 0 kgf*cm
ϕMc_32 = 0 tonf*m
# 4) 전체 모멘트
ϕMc_11 = 4.04246 tonf*m
ϕMc_12 = 4.05456 tonf*m
ϕMc_21 = 3.97854 tonf*m
ϕMc_22 = 5.74601 tonf*m
ϕMc_31 = 5.95506 tonf*m
ϕMc_32 = 0 tonf*m
L_1 := 70 cm
L_2 := 17.5 cm
L_3 := 17.5 cm
M_c := ((ϕMc_11 + ϕMc_12)*L_1 + (ϕMc_21 + ϕMc_22)*L_2 + (ϕMc_31 + ϕMc_32)*L_3)/(L_1 + L_2 + L_3) = 8.01128 tonf*m
M_c := M_c*1/m = 8.01128 tonf
# 4.4 Critical Length Yield Line Pattern (L_c )
# 【 설계 입력 변수값 】
L_t := 1.070 m
H := 1.05 m
M_b = 0 tonf*m
H×M_w = 6.99792 tonf*m
M_c = 8.01128 tonf
H×M_w*2 = 13.9958 tonf*m
# 【 계산 】
L_c := L_t/2 + sqrt((L_t/2)^2 + 8*H*(M_b + H×M_w)/M_c) = 3.2961 m
L_c = 3.2961 m
# 4.5 Nominal Resistance to Transverse Load ( R_w )
# 【 설계 입력 변수값 】
L_t = 1.07 m
L_c = 3.2961 m
M_b = 0 tonf*m
M_w = 6.99792 tonf*m
M_c = 8.01128 tonf
R_w := (2/(2*L_c - L_t))*(8*M_b + 8*H×M_w + M_c*L_c^2/H) = 50.2972 tonf
R_w = 50.2972 tonf
# 1) 우리 기준과 비교
maxF_lat = 34.3857 tonf
R_w.OlsenModel.check :=
    "O.K" if R_w > maxF_lat
    "N.G" otherwise
    = "O.K"
# 2) AASHTO (LRFD) 기준과 비교
maxF_AASHTO = 24.4732 tonf
R_w.AASHTO.check :=
    "O.K" if R_w > maxF_AASHTO
    "N.G" otherwise
    = "O.K"
# 4.6 Shear Transfer Between Baririer and Deck
# 1 ) 충돌에 의한 방호벽의 전단력 (AASHTO (LRFD) p.A13-11 참조 )
V_CT := R_w/(L_c + 2*H) = 9.32102 tonf/m
T := V_CT = 9.32102 tonf/m
# 2 ) Nominal Shear Resistance ( 도로교표준시방서 (부록) p.5-72 참조 )
A_cv := 420 mm^2*1/mm = 420 mm^2/mm
A_vf := (D16*1000/200 + D16*1000/200 + D13*1000/200)*1/m = 2.6195 mm^2/mm
f_y.new = 294.2 MPa
c := 0.52 MPa
λ := 1.0
μ := 0.6*λ = 0.6
Pc := 837*kgf/m = 8.20817 N/mm
f_ck.new = 23.536 MPa
V_n := c*A_cv + μ*(A_vf*f_y.new + Pc) = 685.718 N/mm
V_n = 69.9238 tonf/m
f_ck.new*A_cv = 9885.1 N/mm
V_n.check1 :=
    "O.K" if V_n < 0.2*f_ck.new*A_cv
    "N.G" otherwise
    = "O.K"
0.55 MPa*A_cv = 231 N/mm
V_n.check2 :=
    "O.K" if V_n < 5.5 MPa*A_cv
    "N.G" otherwise
    = "O.K"
V_CT = 91.408 N/mm
V_n.check3 :=
    "O.K" if V_n > V_CT
    "N.G" otherwise
    = "O.K"
# 3 ) 최소 전단 철근 검토 ( 도로교표준시방서 (부록) p.5-73참조 )
b_v := 420 mm
s := 150 mm
A_cf := 0.35 MPa*b_v*s/f_y.new = 74.9491 mm^2
# 4 ) 정착길이 검토 ( 도로교표준시방서 (부록) p.5-135 참조 )
# 【 기본 정착 길이 】
d_b := 16 mm
L_nb.1 := 100 MPa^(1/2)*d_b/sqrt(f_ck.slab) = 310.941 mm
L_nb.2 := 8*d_b = 128 mm
L_nb.3 := 150 mm
L_nb := max(L_nb.1, L_nb.2, L_nb.3) = 310.941 mm
# 【 수정 계수 】
# 사용된 철근이 해석에 의해 요구되는 량을 초과하는 경우
수정계수 := 0.143
# 【 정착 길이 】
L_dh := L_nb*수정계수 = 44.4645 mm
# 【 사용 정착 길이 】
L_dh.use := 158 mm
L_dh.check :=
    "O.K" if L_dh < L_dh.use
    "N.G" otherwise
    = "O.K"
# 5. 방호벽의 기존 콘크리트와 보강콘크리트의 일체화 검토
# 5.1 발생가능한 최대 전단력 산정
# 콘크리트의 전단강도 이상이 발생하게 되면 콘크리트의 부착강도가 충분하더라도 콘크리트의 전단파괴가 발생하게 되므로 부착강도는 콘크리트의 전단강도에 대해 설계한다.
V_C := 0.13 MPa^(1/2)*sqrt(f_ck.new) = 0.63068 MPa
V_U == V_C*A_C
# 5.2 전단에 대한 저항력 산정 ( 부착강도)
# ( 도로교표준시방서 (부록) p.5-72 참조 )
# 1) 보완형식-2 (H=1.20m)
# a. 상면에 대한 검토
A_C := 0.27 m*1*m = 0.27 m^2
# 작용전단력 산정
V_U := 0.64 MPa*A_C = 0.1728 MN
# 필요 철근량 산정
c := 0.52 MPa
λ := 1.0
μ := 0.6*λ = 0.6
PC := 0 N
f_y.new = 294.2 MPa
ϕ := 0.8
A_vf.req := (V_U/ϕ - c*A_C)/(μ*(f_y.new - PC)) = 4.28281 cm^2
# 사용 갯수
# b. 측면에 대한 검토
c := 0.7 MPa
λ := 1.0
μ := 1.0
PC := 0 N
f_y.new = 294.2 MPa
ϕ := 0.8
A_C := (0.49 m + 0.3 m + 0.13 m)*1.*m = 0.92 m^2
# 작용 전단력 산정
V_U := 0.64 MPa*A_C = 0.5888 MN
# 필요 철근량 산정
A_vf.req := (V_U/ϕ - c*A_C)/(μ*(f_y.new - PC)) = 3.12713 cm^2
# 사용 갯수
