tonf := 1000 kgf
g = 9.80665 m/s^2
## 교량용 방호울타리 구조 계산서
## 2012.6.20
# 교량명 :
# 보강방법 :
# 1. 설계 기준
# 1.1  방호벽 형식
# 1) 구조 형식 | 교량용 차량 방호 울타리
# 2) 방호벽 형식 | 보완 형식 - 1
# 3) 방호벽 높이
H := 1.050 m
# 4) 충돌 높이
He := 1.000 m
# 1.2 하중
# 1) 고정하중
W_c1 := 2.500*tonf*m^-3
# 철근 콘크리트
# 단위 중량
W_C2 := 2.350*tonf*m^-3
# 무근 콘크리트
# 단위 중량
W_a := 2.300*tonf*m^-3
# ASCON
# 단위중량
# 2) 충돌 하중
# (1) 도로안전시설 설치 및 관리지침 (건설교통부 2001.7 )
# SB5 | 종별
# 14*tonf | 차량중량 (tonf)
# 80*km/hr | 충돌 속도 (km/hr)
# 15 deg | 충돌 각도 (도)
# 420J | 충격도 (J)
# (2) AASHTO LRFD Bridge Design Specifications
TL - 4  # Railing Test Level
# 240000 N | Transverse (N)
# 80000 N | Longitudinal (N)
# 80000 N | Vertical (N)
# 1070 mm | L_t and L_L (mm)
# 3) 사용재료
# (1) 기존 방호벽
f_ck.old := 240*kgf*cm^-2 = 23.536 MPa
# 기존 방호벽
# 콘크리트 설계기준 강도
E_c.old := 238000*kgf*cm^-2 = 23339.8 MPa
# 기존 방호벽
# 콘크리트 탄성계수
f_y.old := 3000*kgf*cm^-2 = 294.2 MPa
# 기존 방호벽
# 철근 항복 강도
E_s.old := 2000000*kgf*cm^-2 = 196133 MPa
# 기존 방호벽
# 철근 탄성계수
# (2) 보완 방호벽 (추가분)
f_ck.new := 240*kgf*cm^-2 = 23.536 MPa
E_c.new := 238000*kgf*cm^-2 = 23339.8 MPa
f_y.new := 3000*kgf*cm^-2 = 294.2 MPa
E_s.new := 2000000*kgf*cm^-2 = 196133 MPa
# (3) 슬래브
f_ck.slab := 270*kgf*cm^-2 = 26.478 MPa
E_c.slab := 253000*kgf*cm^-2 = 24810.8 MPa
f_y.slab := 4000*kgf*cm^-2 = 392.266 MPa
E_S.slab := 2000000*kgf*cm^-2 = 196133 MPa
# (4) 철근 단면적
D10 := 0.7133*cm^2
D13 := 1.267*cm^2
D16 := 1.986*cm^2
D19 := 2.865*cm^2
D22 := 3.871*cm^2
# 1.3 참고문헌
# 2. 가정 단면
# 【 기존 단면 제원 】
# 【 보완 단면 제원 】
# 【  Segment 1 】
# 【 기존 방호벽 제원 】
H_seg1 := 700 mm
B_seg1 := 1000 mm
# 【 기존 방호벽 철근 제원 】
d_v11 := 132 mm
# 기존 방호벽
# 수평철근
# 유효깊이
d_h11 := 143 mm
# 기존 방호벽
# 연직철근
# 유효깊이
n_bar.11 := 3
D_11 := D13
n_bar.h11 := 1000/200 = 5
D_h11 := D16
# 【 보완 방호벽 철근 제원 】
d_v12 := 194 mm
# 보완 방호벽
# 수평철근
# 유효깊이
d_h12 := 218 mm
# 보완 방호벽
# 연직철근
# 유효깊이
n_bar.12 := 3
D_12 := D13
n_bar.h12 := 1000/200 = 5
D_h12 := D13
# 【  Segment 2 】
# 【 기존 방호벽 제원 】
H_seg2 := 175 mm
B_seg2 := 1000 mm
# 【 기존 방호벽 철근 제원 】
d_v21 := 0 mm
# 기존 방호벽
# 수평철근
# 유효깊이
d_h21 := 214 mm
# 기존 방호벽
# 연직철근
# 유효깊이
n_bar.21 := 0
D_21 := D13
n_bar.h21 := 1000/200 = 5
D_h21 := D13
# 【 보완 방호벽 철근 제원 】
d_v22 := 238 mm
# 보완 방호벽
# 수평철근
# 유효깊이
d_h22 := 307 mm
# 보완 방호벽
# 연직철근
# 유효깊이
n_bar.22 := 1
D_22 := D13
n_bar.h22 := 1000/200 = 5
D_h22 := D13
# 【  Segment 3 】
# 【 기존 방호벽 제원 】
H_seg3 := 175 mm
B_seg3 := 1000 mm
# 【 기존 방호벽 철근 제원 】
d_v31 := 319 mm
# 기존 방호벽
# 수평철근
# 유효깊이
d_h31 := 318 mm
# 기존 방호벽
# 연직철근
# 유효깊이
n_bar.31 := 1
D_31 := D13
n_bar.h31 := 1000/200 = 5
D_h31 := D13
# 【 보완 방호벽 철근 제원 】
d_v32 := 346 mm
# 보완 방호벽
# 수평철근
# 유효깊이
d_h32 := 370 mm
# 보완 방호벽
# 연직철근
# 유효깊이
n_bar.32 := 1
D_32 := D13
n_bar.h32 := 0
D_h32 := D13
# 3. 충돌 시 최대 충격력
# 3.1 Olsen Model ( NCHRP Report 86 )
# 【 설계 입력 변수값 】
A
# 차량 앞면으로부터
# 차량의 무게
# 중심 까지의 거리
A := 14.2*ft = 4.32816 m
B
# 차량의 폭
B := 8*ft = 2.4384 m
θ
# 충돌각
θ := 15*deg = 0.261799 rad
D
# 방호울타리의
# 횡방향 변위
D := 0.0*mm
V_o
# 충돌전 차량의 속도
V_o := 80*km/hr = 22.2222 m/s
# 1) 감가속도
avgG_lat := V_o^2*sin(θ)^2/(2*g*(A*sin(θ) - 0.5*B*(1 - cos(θ)) + D)) = 1.56361
maxG_lat := π/2*avgG_lat = 2.45612
# 2) 횡방향 충격력
W := 14*tonf  # 차량의 중량  # 종별  # 차량 중량 (tonf)
# SB5 | 14*tonf
25*tonf
maxF_lat := maxG_lat*W = 34.3857 tonf  # SB6
# SB7 | 36*tonf
# 3.2 AASHTO LRFD Bridge Design Specifications
# 1) 적용기준
# TL - 4
# 2) 황방향 충격력
# 종별 | 충격력
maxF_AASHTO := 240000 N = 24.4732 tonf  # SB5
# TL-4
240000 N
# SB6 | TL-5 | 550000 N
# 4. 방호벽 전체 저항력 검토
# 【 설계  변수 】
H
# 방호울타리
# 높이
L_c
# 방호울타리의
# 파괴길이
L_t
# 충돌하중의
# 재하길이
M_b
# 연직축에 대한
# 보 거동을 하는
# 방호울타리
# 상단의 저항모멘트
M_w
# 연직축에 대한
# 방호울타리 벽체의
# 단위 높이당 저항모멘트
M_c
# 방호울타리의
# 바닥판을 지점으로 한
# 캔틸레버 거동에 의한
# 단위길이당 저항모멘트
# 4.1 연직축에 대한 BEAM의 Moment강도 (Mb)
# 가정한 방호벽 상단에 Beam 구간이 없으므로 Mb=0으로 된다.
M_b := 0.000*tonf*m
# 4.2 연직축에 대한 WALL의 Moment강도 (M_w*H )
# 1.1) 기존 방호벽 Segement1 의 정부모멘트 강도
# 【 설계 입력 변수값 】
f_y := f_y.old = 294.2 MPa  # 철근의 항복강도
f_ck := f_ck.old = 23.536 MPa  # 콘크리트 설계 기준강도
ϕ := 1.0  # 강도감소 계수
b := H_seg1 = 70 cm  # 단면의 폭
d_v := d_v11 = 13.2 cm  # 단면의 유효깊이
n_bar := n_bar.11 = 3  # 철근 배근 갯수
D := D_11 = 1.267 cm^2  # 철근 규격 및 개당 단면적
# 【 계산 】
As := D*n_bar = 3.801 cm^2  # 사용 철근 단면적
a := As*f_y/(0.85*f_ck*b) = 0.798529 cm  # 단면의 응력 직사각형의 깊이 계수
ϕMn_11 := ϕ*As*f_y*(d_v - a/2) = 145967 kgf*cm
ϕMn_11 = 1.45967 tonf*m
# 1.2) 보완 방호벽 (추가분) Segment1의 정.부모멘트 강도
# 【 설계 입력 변수값 】
f_y := f_y.new = 294.2 MPa
f_ck := f_ck.new = 23.536 MPa
ϕ := 1.0
b := H_seg1 = 70 cm
d_v := d_v12 = 19.4 cm
n_bar := n_bar.12 = 3
D := D_12 = 1.267 cm^2
# 【 계산 】
As := D*n_bar = 3.801 cm^2
a := As*f_y/(0.85*f_ck*b) = 0.798529 cm
ϕMn_12 := ϕ*As*f_y*(d_v - a/2) = 216665 kgf*cm
# 2.1 ) 기존 방호벽 Segment2의 정.부모멘트 강도
# 【 설계 입력 변수값 】
f_y := f_y.old = 294.2 MPa
f_ck := f_ck.old = 23.536 MPa
ϕ := 1.0
b := H_seg2 = 17.5 cm
d_v := d_v21 = 0 cm
n_bar := n_bar.21 = 0
D := D_21 = 1.267 cm^2
# 【 계산 】
As := D*n_bar = 0 cm^2
a := As*f_y/(0.85*f_ck*b) = 0 cm
ϕMn_21 := ϕ*As*f_y*(d_v - a/2) = 0 kgf*cm
# 2.2 ) 보완 방호벽 Segment2의 정.부모멘트 강도
# 【 설계 입력 변수값 】
f_y := f_y.new = 294.2 MPa
f_ck := f_ck.new = 23.536 MPa
ϕ := 1.0
b := H_seg2 = 17.5 cm
d_v := d_v22 = 23.8 cm
n_bar := n_bar.22 = 1
D := D_22 = 1.267 cm^2
# 【 계산 】
As := D*n_bar = 1.267 cm^2
a := As*f_y/(0.85*f_ck*b) = 1.06471 cm
ϕMn_22 := ϕ*As*f_y*(d_v - a/2) = 88440.3 kgf*cm
# 3.1 ) 기존 방호벽 Segment3의 정.부모멘트 강도
# 【 설계 입력 변수값 】
f_y := f_y.old = 294.2 MPa
f_ck := f_ck.old = 23.536 MPa
ϕ := 1.0
b := H_seg3 = 17.5 cm
d_v := d_v31 = 31.9 cm
n_bar := n_bar.31 = 1
D := D_31 = 1.267 cm^2
# 【 계산 】
As := D*n_bar = 1.267 cm^2
a := As*f_y/(0.85*f_ck*b) = 1.06471 cm
ϕMn_31 := ϕ*As*f_y*(d_v - a/2) = 119228 kgf*cm
# 3.2 ) 보완 방호벽 Segment3의 정.부모멘트 강도
# 【 설계 입력 변수값 】
f_y := f_y.new = 294.2 MPa
f_ck := f_ck.new = 23.536 MPa
ϕ := 1.0
b := H_seg3 = 17.5 cm
d_v := d_v32 = 34.6 cm
n_bar := n_bar.32 = 1
D := D_32 = 1.267 cm^2
# 【 계산 】
As := D*n_bar = 1.267 cm^2
a := As*f_y/(0.85*f_ck*b) = 1.06471 cm
ϕMn_32 := ϕ*As*f_y*(d_v - a/2) = 129491 kgf*cm
# 4) 전체 모멘트
ϕMn_11 = 1.45967 tonf*m
ϕMn_12 = 2.16665 tonf*m
ϕMn_21 = 0 tonf*m
ϕMn_22 = 0.884403 tonf*m
ϕMn_31 = 1.19228 tonf*m
ϕMn_32 = 1.29491 tonf*m
M_w := ϕMn_11 + ϕMn_12 + ϕMn_21 + ϕMn_22 + ϕMn_31 + ϕMn_32 = 6.99792 tonf*m
0
H×M_w := M_w = 6.99792 tonf*m
# 4.3 수평축에 대한 WALL의 Moment강도 (M_c )
# 1.1) 기존 방호벽 Segment1의 모멘트 강도
# 【 설계 입력 변수값 】
f_y := f_y.old = 294.2 MPa
f_ck := f_ck.old = 23.536 MPa
ϕ := 1.0
b := B_seg1 = 100 cm
d := d_h11 = 14.3 cm
n_bar := n_bar.h11 = 5
D := D_h11 = 1.986 cm^2
# 【 계산 】
As := D*n_bar = 9.93 cm^2
a := As*f_y/(0.85*f_ck*b) = 1.46029 cm
ϕMc_11 := ϕ*As*f_y*(d - a/2) = 404246 kgf*cm
ϕMc_11 = 4.04246 tonf*m
# 1.2) 보완 방호벽 (추가분) Segment1의 모멘트 강도
# 【 설계 입력 변수값 】
f_y := f_y.new = 294.2 MPa
f_ck := f_ck.new = 23.536 MPa
ϕ := 1.0
b := B_seg1 = 100 cm
d := d_h12 = 21.8 cm
n_bar := n_bar.h12 = 5
D := D_h12 = 1.267 cm^2
# 【 계산 】
As := D*n_bar = 6.335 cm^2
a := As*f_y/(0.85*f_ck*b) = 0.931618 cm
ϕMc_12 := ϕ*As*f_y*(d - a/2) = 405456 kgf*cm
ϕMc_12 = 4.05456 tonf*m
# 2.1) 기존 방호벽 Segment2의 모멘트 강도
# 【 설계 입력 변수값 】
f_y := f_y.old = 294.2 MPa
f_ck := f_ck.old = 23.536 MPa
ϕ := 1.0
b := B_seg2 = 100 cm
d := d_h21 = 21.4 cm
n_bar := n_bar.h21 = 5
D := D_h21 = 1.267 cm^2
# 【 계산 】
As := D*n_bar = 6.335 cm^2
a := As*f_y/(0.85*f_ck*b) = 0.931618 cm
ϕMc_21 := ϕ*As*f_y*(d - a/2) = 397854 kgf*cm
ϕMc_21 = 3.97854 tonf*m
# 2.2) 보완 방호벽 (추가분) Segment2의 모멘트 강도
# 【 설계 입력 변수값 】
f_y := f_y.new = 294.2 MPa
f_ck := f_ck.new = 23.536 MPa
ϕ := 1.0
b := B_seg2 = 100 cm
d := d_h22 = 30.7 cm
n_bar := n_bar.h22 = 5
D := D_h22 = 1.267 cm^2
# 【 계산 】
As := D*n_bar = 6.335 cm^2
a := As*f_y/(0.85*f_ck*b) = 0.931618 cm
ϕMc_22 := ϕ*As*f_y*(d - a/2) = 574601 kgf*cm
ϕMc_22 = 5.74601 tonf*m
# 3.1) 기존 방호벽 Segment3의 모멘트 강도
# 【 설계 입력 변수값 】
f_y := f_y.old = 294.2 MPa
f_ck := f_ck.old = 23.536 MPa
ϕ := 1.0
b := B_seg3 = 100 cm
d := d_h31 = 31.8 cm
n_bar := n_bar.h31 = 5
D := D_h31 = 1.267 cm^2
# 【 계산 】
As := D*n_bar = 6.335 cm^2
a := As*f_y/(0.85*f_ck*b) = 0.931618 cm
ϕMc_31 := ϕ*As*f_y*(d - a/2) = 595506 kgf*cm
ϕMc_31 = 5.95506 tonf*m
# 3.2) 보완 방호벽 (추가분) Segment3의 모멘트 강도
# 【 설계 입력 변수값 】
f_y := f_y.new = 294.2 MPa
f_ck := f_ck.new = 23.536 MPa
ϕ := 1.0
b := B_seg3 = 100 cm
d := d_h32 = 37 cm
n_bar := n_bar.h32 = 0
D := D_h32 = 1.267 cm^2
# 【 계산 】
As := D*n_bar = 0 cm^2
a := As*f_y/(0.85*f_ck*b) = 0 cm
ϕMc_32 := ϕ*As*f_y*(d - a/2) = 0 kgf*cm
ϕMc_32 = 0 tonf*m
# 4) 전체 모멘트
ϕMc_11 = 4.04246 tonf*m
ϕMc_12 = 4.05456 tonf*m
ϕMc_21 = 3.97854 tonf*m
ϕMc_22 = 5.74601 tonf*m
ϕMc_31 = 5.95506 tonf*m
ϕMc_32 = 0 tonf*m
L_1 := H_seg1 = 70 cm
L_2 := H_seg2 = 17.5 cm
L_3 := H_seg3 = 17.5 cm
M_c := ((ϕMc_11 + ϕMc_12)*L_1 + (ϕMc_21 + ϕMc_22)*L_2 + (ϕMc_31 + ϕMc_32)*L_3)/(L_1 + L_2 + L_3) = 8.01128 tonf*m
M_c := M_c*1/m = 8.01128 tonf
# 4.4 Critical Length Yield Line Pattern (L_c )
# 【 설계 입력 변수값 】
L_t := 1.070 m
# 충돌하중의
# 재하길이
H := 1.05 m
# 방호울타리
# 높이
M_b = 0 tonf*m
# 보 거동을 하는
# 방호울타리 상단의
# 저항모멘트
M_w
# 방호울타리 벽체의
# 단위 높이당 저항모멘트
H×M_w = 6.99792 tonf*m
M_c = 8.01128 tonf
# 방호울타리의
# 바닥판을 지점으로 한
# 캔틸레버 거동에 의한
# 단위길이당 저항모멘트
H×M_w*2 = 13.9958 tonf*m
# 【 계산 】
L_c
# 방호울타리의
# 파괴길이
L_c := L_t/2 + sqrt((L_t/2)^2 + 8*H*(M_b + H×M_w)/M_c) = 3.2961 m
L_c = 3.2961 m
# 4.5 Nominal Resistance to Transverse Load ( R_w )
# 【 설계 입력 변수값 】
L_t = 1.07 m
# 충돌하중의
# 재하길이
L_c = 3.2961 m
# 방호울타리의
# 파괴길이
M_b = 0 tonf*m
# 보 거동을 하는
# 방호울타리 상단의
# 저항모멘트
M_w = 6.99792 tonf*m
# 방호울타리 벽체의
# 단위 높이당 저항모멘트
M_c = 8.01128 tonf
# 방호울타리의
# 바닥판을 지점으로 한
# 캔틸레버 거동에 의한
# 단위길이당 저항모멘트
# 【 계산 】
R_w := (2/(2*L_c - L_t))*(8*M_b + 8*H×M_w + M_c*L_c^2/H) = 50.2972 tonf
R_w = 50.2972 tonf
# 1) 우리 기준과 비교
maxF_lat = 34.3857 tonf
R_w.OlsenModel.check :=
    "O.K" if R_w > maxF_lat
    "N.G" otherwise
    = "O.K"
# 2) AASHTO (LRFD) 기준과 비교
maxF_AASHTO = 24.4732 tonf
R_w.AASHTO.check :=
    "O.K" if R_w > maxF_AASHTO
    "N.G" otherwise
    = "O.K"
# 4.6 Shear Transfer Between Baririer and Deck
# 접촉면에서의 전단력 전달
# 1. 이미 발생했거나 발생할 균열
# 2. 서로 다른 재료사이의 접촉면
# 3. 서로 다른 시기에 타설된 콘크리트의 접촉면
# 접촉면에서의 공칭 전단강도
V_n == c*A_cv + μ*(A_vf*σ_y + Pc)
V_n
# 접촉면에서의
# 공칭전단강도
# c | 점착계수
# μ | 마찰계수 | c | μ
# 1) 일체로 타설한 콘크리트 | 1.0 MPa | 1.4*λ
# 2) 표면을 의도적으로 6mm
# 크기의
# 요철로 거칠게 한 깨끗하고
# 굳은 콘크리트에 타설한
# 콘크리트
0.70 MPa
1.0*λ
# 3) 표면이 깨끗하고
# 레이어턴스가 없으나,
# 의도적으로 요철을
# 두지 않은 콘크리트에
# 타설한 콘크리트
0.52 MPa
0.6*λ
# 4) 구조용 강재에
# 스터드 또는 전단 연결철근으로
# 정착된 콘크리트
0.17 MPa
0.7*λ
A_cv
# 전단력을 전달하는
# 콘크리트의 면적
A_vf
# 전단면을 가로지르는
# 전단철근의 단면적
σ_y
# 전단철근의
# 항복강도
Pc
# 전단면에 수직한 영구 순압력
# 만약 작용하는 힘이 인장력이면 Pc = 0
# 1 ) 충돌에 의한 방호벽의 전단력 (AASHTO (LRFD) p.A13-11 참조 )
# 【 설계 입력 변수값 】
R_w = 50.2972 tonf  # 방호울타리의 저항능력
L_c = 3.2961 m
# 방호울타리의
# 파괴길이
H = 1.05 m
# 방호울타리의
# 높이
# 【 계산 】
V_CT := R_w/(L_c + 2*H) = 9.32102 tonf/m
T := V_CT = 9.32102 tonf/m
# 그림 : 충돌에 의한 방호벽의 전단력
# 2 ) Nominal Shear Resistance ( 도로교표준시방서 (부록) p.5-72 참조 )
# 【 설계 입력 변수값 】
B_bottom := 42 cm
# 보강 후 방호벽의
# 하단 두께
A_cv := B_bottom*1*mm*1/mm = 420 mm^2/mm
# 방호벽
# 하단의 벽체 두께
A_vf := (D16*1000/200 + D16*1000/200 + D13*1000/200)*1/m = 2.6195 mm^2/mm
# 기존 방호벽의
# 수직 철근량
f_y.old = 294.2 MPa
# 기존 방호벽의 배근 철근의
# 항복강도
f_ck.old = 23.536 MPa
# 약한 쪽 콘크리트의
# 28일 압축강도
# ( 기존 방호벽 )
c := 0.52 MPa  # 점착 계수
λ := 1.0  # 마찰 계수
μ := 0.6*λ = 0.6  # 콘크리트 종류에 따른 계수
Pc := 837*kgf/m = 8.20817 N/mm
# 전단면에 수직한 영구 순압축력
# ( 방호벽 중량 )
# 【 계산 】
V_n := c*A_cv + μ*(A_vf*f_y.new + Pc) = 685.718 N/mm
# 공칭 전단강도
V_n = 69.9238 tonf/m
# 식 (5 8 4 1-1)에 대한 검토
f_ck.new*A_cv = 9885.1 N/mm
V_n.check1 :=
    "O.K" if V_n < 0.2*f_ck.new*A_cv
    "N.G" otherwise
    = "O.K"
# 공칭 전단강도 상한값에 대한 검토
0.55 MPa*A_cv = 231 N/mm
V_n.check2 :=
    "O.K" if V_n < 5.5 MPa*A_cv
    "N.G" otherwise
    = "O.K"
# 충돌에 의한 방호벽에 작용하는 전단력 검토
V_CT = 91.408 N/mm
V_n.check3 :=
    "O.K" if V_n > V_CT
    "N.G" otherwise
    = "O.K"
# 3 ) 최소 전단 철근 검토 ( 도로교표준시방서 (부록) p.5-73참조 )
# 【 설계 입력 변수값 】
b_v := 420 mm
# 접촉면의 폭
# 900mm보다 커서는 안된다
s := (200 mm + 200 mm + 200 mm)/4 = 15 cm
# 이음재의 행간 간격
# 철근의 행사이의
# 종방향 간격은
# 600mm를 초과할 수 없다
A'_vf := (D16 + D16 + D13) = 523.9 mm^2
# 한 행에 배근된 철근의 량
# 【 계산 】
A_cf := 0.35 MPa*b_v*s/f_y.old = 74.9491 mm^2
# 최소전단철근량
A_vf.check :=
    "O.K" if A'_vf > A_cf
    "N.G" otherwise
    = "O.K"
# 4 ) 정착길이 검토 ( 도로교표준시방서 (부록) p.5-135 참조 )
# 전단 마찰 철근은 설계항복강도를 발휘하기 위해 전단면의 양쪽에
# 매입, 갈고리 또는 용접으로 정착 하여야 한다
# 【 기본 정착 길이 】
d_b := 16 mm  # 사용 철근의 공칭 지름
L_nb.1 := 100 MPa^(1/2)*d_b/sqrt(f_ck.slab) = 310.941 mm
L_nb.2 := 8*d_b = 128 mm
L_nb.3 := 150 mm
L_nb := max(L_nb.1, L_nb.2, L_nb.3) = 310.941 mm
# 【 수정 계수 】
# 사용된 철근이 해석에 의해 요구되는 량을 초과하는 경우
A_cf = 0.749491 cm^2  # 최소 필요 전단 철근량
A'_vf = 5.239 cm^2  # 배근된 전단 철근량
수정계수 := A_cf/A'_vf = 0.14306
# 【 정착 길이 】
L_dh := L_nb*수정계수 = 4.44832 cm
# 【 사용 정착 길이 】
L_dh.use := 158 mm
L_dh.check :=
    "O.K" if L_dh < L_dh.use
    "N.G" otherwise
    = "O.K"
# 5. 방호벽의 기존 콘크리트와 보강콘크리트의 일체화 검토
# 5.1 발생가능한 최대 전단력 산정
# 콘크리트의 전단강도 이상이 발생하게 되면 콘크리트의 부착강도가 충분하더라도 콘크리트의 전단파괴가 발생하게 되므로 부착강도는 콘크리트의 전단강도에 대해 설계한다.
# 【 설계 입력 변수값 】
f_ck.new = 23.536 MPa
# 【 계산 】
V_c := 0.13 MPa^(1/2)*sqrt(f_ck.new) = 0.63068 MPa
V_u == V_c*A_c
# 5.2 전단에 대한 저항력 산정 ( 부착강도)
# ( 도로교표준시방서 (부록) p.5-72 참조 )
# 1) 상면에 대한 검토
# 【 설계 입력 변수값 】
B_c := 0.27 m
# 방호벽 상면
# 기존 방호벽 만나는 부분의
# 방호벽 두께
A_c := B_c*1*m = 0.27 m^2
# 방호벽 상면의
# 전단 저항 단면적
V_u := V_c*A_c = 170.284 kN
# 저항 전단력
# 산정
c := 0.52 MPa  # 점착 계수
# 표면이 깨끗하고 레이어턴스가
# 없으나, 의도적으로 요철을
# 두지 않은 콘크리트에
# 타설한 콘크리트
# C = 0.52MPa
# μ = 0.6×λ
λ := 1.0  # 콘크리트 종류에 따른 계수
μ := 0.6*λ = 0.6  # 마찰 계수
# 표면이 깨끗하고 레이어턴스가
# 없으나, 의도적으로 요철을
# 두지 않은 콘크리트에
# 타설한 콘크리트
# C = 0.52MPa
# μ = 0.6×λ
P_c := 0.000 N
# 전단면에 수직한 영구 순압력
# 만약 작용하는 힘이 인장력이면
# Pc = 0
f_y.new = 294.2 MPa
# 보완 단면의
# 수직철근의
# 항복강도
ϕ := 0.8
# 【 필요 철근량 산정 】
V_u == ϕV_n == 0.8*(c*A_c + μ*(A_vf*f_y + Pc))
A_vf.req := (V_u/ϕ - c*A_c)/(μ*(f_y.new - P_c)) = 4.10462 cm^2
D := D13
# 사용 철근 규격
# ( 보완 단면의 수직철근의 규격 )
n_bar := 1000/200 = 5
# 사용 갯수
# ( 보완단면의 수직 철근의 배근 간격 )
A_s.use := D*n_bar = 6.335 cm^2
A_s.check :=
    "O.K" if A_vf.req < A_s.use
    "N.G" otherwise
    = "O.K"
# 2) 측면에 대한 검토 (원설계)
# 표면을 의도적으로 mm 크기의 요철로 거칠게 한 깨끗하고 굳은 콘크리트에
# 타설한 콘크리트
# 【 설계 입력 변수값 】
B_c := 0.49 m + 0.3 m + 0.13 m = 0.92 m
# 방호벽 측면에서
# 기존 방호벽과  만나는 부분의
# 총 연장
sqrt((215 + 215)^2 + 50^2) = 432.897
sqrt((175 mm)^2 + (120 mm)^2) = 0.212191 m
A_c := B_c*1*m = 0.92 m^2
# 방호벽 상면의
# 전단 저항 단면적
V_u := V_c*A_c = 580.226 kN
# 저항 전단력
# 산정
c := 0.70 MPa  # 점착 계수
# 표면을 의도적으로 6mm 크기의
# 요철로 거칠게 한 깨끗하고
# 굳은 콘크리트에 타설한
# 콘크리트
# C = 0.7MPa
# μ = 1.0×λ
λ := 1.0  # 콘크리트 종류에 따른 계수
μ := 1.0*λ = 1  # 마찰 계수
# 표면을 의도적으로 6mm 크기의
# 요철로 거칠게 한 깨끗하고
# 굳은 콘크리트에 타설한
# 콘크리트
# C = 0.7MPa
# μ = 1.0×λ
P_c := 0.000 N
# 전단면에 수직한 영구 순압력
# 만약 작용하는 힘이 인장력이면
# Pc = 0
f_y := f_y.new = 294.2 MPa
# 보완 단면의
# 수직철근의
# 항복강도
ϕ := 0.8
# 【 필요 철근량 산정 】
V_u == ϕV_n == 0.8*(c*A_c + μ*(A_vf*f_y + Pc))
A_vf.req := (V_u/ϕ - c*A_c)/(μ*(f_y - P_c)) = 2.76283 cm^2
D := D10
# 사용 철근 규격
# ( 보완 단면의 전단철근의 규격 )
n_bar := 1000/400 + 1000/400 = 5
# 사용 갯수
# ( 보완단면의 전단 철근의 배근 간격 )
A_s.use := D*n_bar = 3.5665 cm^2
A_s.check :=
    "O.K" if A_vf.req < A_s.use
    "N.G" otherwise
    = "O.K"
# 2) 측면에 대한 검토  ( 철근 변경 검토)
# D10을 D13으로
# 표면 치핑 삭제
# 표면이 깨끗하고 레이턴스가 없으나 의도로적으로 요철을 두지 않은 콘크리트에
# 타설한 콘크리트
# 【 설계 입력 변수값 】
B_c := 0.49 m + 0.3 m + 0.13 m = 0.92 m
# 방호벽 측면에서
# 기존 방호벽과  만나는 부분의
# 총 연장
sqrt((215 + 215)^2 + 50^2) = 432.897
sqrt((175 mm)^2 + (120 mm)^2) = 0.212191 m
A_c := B_c*1*m = 0.92 m^2
# 방호벽 상면의
# 전단 저항 단면적
V_u := V_c*A_c = 580.226 kN
# 저항 전단력
# 산정
c := 0.52 MPa  # 점착 계수
# 표면을 의도적으로 6mm 크기의
# 요철로 거칠게 한 깨끗하고
# 굳은 콘크리트에 타설한
# 콘크리트
# C = 0.7MPa
# μ = 1.0×λ
λ := 1.0  # 콘크리트 종류에 따른 계수
μ := 0.6*λ = 0.6  # 마찰 계수
# 표면을 의도적으로 6mm 크기의
# 요철로 거칠게 한 깨끗하고
# 굳은 콘크리트에 타설한
# 콘크리트
# C = 0.7MPa
# μ = 1.0×λ
P_c := 0.000 N
# 전단면에 수직한 영구 순압력
# 만약 작용하는 힘이 인장력이면
# Pc = 0
f_y := f_y.new = 294.2 MPa
# 보완 단면의
# 수직철근의
# 항복강도
ϕ := 0.8
# 【 필요 철근량 산정 】
V_u == ϕV_n == 0.8*(c*A_c + μ*(A_vf*f_y + Pc))
A_vf.req := (V_u/ϕ - c*A_c)/(μ*(f_y - P_c)) = 13.9861 cm^2
D := D13
# 사용 철근 규격
# ( 보완 단면의 전단철근의 규격 )
n_bar := 1000/200 + 1000/200 = 10
# 사용 갯수
# ( 보완단면의 전단 철근의 배근 간격 )
A_s.use := D*n_bar = 12.67 cm^2
A_s.check :=
    "O.K" if A_vf.req < A_s.use
    "N.G" otherwise
    = "N.G"
D := D16
# 사용 철근 규격
# ( 보완 단면의 전단철근의 규격 )
n_bar := 1000/200 + 1000/400 = 7.5
# 사용 갯수
# ( 보완단면의 전단 철근의 배근 간격 )
A_s.use := D*n_bar = 14.895 cm^2
A_s.check :=
    "O.K" if A_vf.req < A_s.use
    "N.G" otherwise
    = "O.K"
D := D19
# 사용 철근 규격
# ( 보완 단면의 전단철근의 규격 )
n_bar := 1000/400 + 1000/400 = 5
# 사용 갯수
# ( 보완단면의 전단 철근의 배근 간격 )
A_s.use := D*n_bar = 14.325 cm^2
A_s.check :=
    "O.K" if A_vf.req < A_s.use
    "N.G" otherwise
    = "O.K"
