ORIGIN := 1
Ru := [
    605, 569.05, 505.16, 280.85;
    542.57, 529.05, 490.37, 321.78;
    605.04, 462.49, 305.91, -26.97;
    1026.26, 902.95, 753.64, 385.93;
    769.3, 708.76, 624.1, 378.33;
    934.24, 664.05, 379.14, -183.56
]*kN
Ru[1, 1] = 605000 N
Ru[2, 1] = 542570 N
Ru1 := Ru*3/4.27 = [
    425.059, 399.801, 354.913, 197.319;
    381.197, 371.698, 344.522, 226.075;
    425.087, 324.934, 214.925, -18.9485;
    721.026, 634.391, 529.489, 271.145;
    540.492, 497.958, 438.478, 265.806;
    656.375, 466.546, 266.375, -128.965
] kN
V_pile := Ru1[:, 3] + Ru1[:, 4] = [552.232; 570.597; 195.977; 800.635; 704.283; 137.41] kN
M_pile := Ru1[:, 3]*0.35*m + Ru1[:, 4]*2.65*m = [647.114; 719.681; 25.0103; 903.856; 857.852; -248.526] kN*m
V_1 := 105.105 kN
V_D1 := 105.105 kN
M_D1 := 173.423 kN*m
V_2 := 567.054 kN
V_D2 := 567.054 kN
M_D2 := 921.049 kN*m
V_3 := 32 kN
V_L := 32 kN
M_L := 54.049 kN*m
V_4 := 77.275 kN
V_H := 77.275 kN
M_H := 170.005 kN*m
Vc[1] := 1.3*(V_D1 + V_D2) + 2.15*V_L + 1.7*V_H = 1073.97 kN
Vc[2] := 1.3*(V_D1 + V_D2) + 1.7*V_H = 1005.17 kN
Vc[3] := 1.0*(V_D1 + V_D2) + 1.0*V_H = 749.434 kN
Vc[4] := 1.3*(V_D1 + V_D2) + 2.15*V_L + 1.7*V_H = 1073.97 kN
Vc[5] := 1.3*(V_D1 + V_D2) + 0.0*V_L + 1.7*V_H = 1005.17 kN
Vc[6] := 1.0*(V_D1 + V_D2) + 1.0*V_L + 1.0*V_H = 781.434 kN
M := [M_D1, M_D2, M_L, M_H]
COM := [
    1.3, 1.3, 2.15, 1.7;
    1.3, 1.3, 0.0, 1.7;
    1, 0.0, 1, 1;
    1.3, 1.3, 2.15, 1.7;
    1.3, 1.3, 0.0, 1.7;
    1.0, 1.0, 0.0, 1.0
]
M_com[:, 1] := COM[:, 1]*M_D1
M_com[:, 2] := COM[:, 2]*M_D2
M_com[:, 3] := COM[:, 3]*M_L
M_com[:, 4] := COM[:, 4]*M_H
Vc = [1073.97; 1005.17; 749.434; 1073.97; 1005.17; 781.434] kN
M_com = [
    225.45, 1197.36, 116.205, 289.009;
    225.45, 1197.36, 0, 289.009;
    173.423, 0, 54.049, 170.005;
    225.45, 1197.36, 116.205, 289.009;
    225.45, 1197.36, 0, 289.009;
    173.423, 921.049, 0, 170.005
] kN*m
i := 1 .. 4
Vc1 := Vc - V_pile = [521.742; 434.577; 553.457; 273.34; 300.891; 644.024] kN
M_com1 := [
    sum(M_com[1, i], i) - M_pile[1];
    sum(M_com[2, i], i) - M_pile[2];
    sum(M_com[3, i], i) - M_pile[3];
    sum(M_com[4, i], i) - M_pile[4];
    sum(M_com[5, i], i) - M_pile[5];
    sum(M_com[6, i], i) - M_pile[6]
] = [1180.91; 992.141; 372.467; 924.171; 853.97; 1513] kN*m
M1 := [1, 2, 3, 4]
M2 := [1, 2, 3, 4; 1, 2, 3, 4; 1, 2, 3, 4; 1, 2, 3, 4]
M1*M2 = [10, 20, 30, 40]
