# [교각] 안정검토
# [ 풀  이 ]
# 1. 검토 방향 조건
단위중량_무근콘크리트 := 2.35*tonne/m^3
단위중량_물 := 1.0*tonne/m^3
# 2. 검토 단면
A := 3.16 m
B := 5.46 m
C := 1.18 m
D := 0.40 m
E := 10.20 m
F := 0.31 m
G := 4.78 m
H := 0.31 m
교량지간 := 10.14 m
# 유슈작용방향
θ := 14 deg
구체_하단_폭 := 4.78 m
구체_하단_길이 := 2.18 m
# 3. 하중 산정
# 가. 활하중
# 나. 고정하중
# 1) 상부구조 고정하중
# 2) 하부구조 고정하중
# (1) 정면도
상부단면
b_상부 := 3.82 m
t_상부 := 1.22 m
A_상부 := b_상부*t_상부 = 4.6604 m^2
h_상부 := 1.66 m
# 하부 단면
b_하부 := 4.78 m
t_하부 := 2.18 m
A_하부 := b_하부*t_하부 = 10.4204 m^2
h_하부 := 8 m
# 받침부
b_받침 := 2.6 m
t_받침 := 1.22 m
A_받침 := b_받침*t_받침 = 3.172 m^2
h_받침 := 0.2 m
교각중량
W_구체 := ((A_상부 + A_하부)/2*(h_상부 + h_하부) + A_받침*h_받침)*2.35*tonne/m^3 = 172.665 tonne
# 확대기초
확대기초_폭 := 5.4 m
확대기초_길이 := 2.18 m
확대기초_두께 := 0.4 m
W_기초 := 확대기초_폭*확대기초_길이*확대기초_두께*단위중량_무근콘크리트
W_기초 = 11.0657 tonne
# 교각 고정하중
W_교각 := W_구체 + W_기초 = 183.731 tonne
# 다. 부력
# (1) 교각의 수중 체적
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구체_수중_높이 := 6.64 m
구체_수위면_폭 := 3.98 m
구체_하단_폭 = 4.78 m
구체_수위면_길이 := 1.38 m
구체_하단_길이 = 2.18 m
# ① 구체 체적
구체_절단면적_상부 := 3.98 m*1.38*m = 5.4924 m^2
구체_절단면적_하부 := 구체_하단_폭*구체_하단_길이 = 10.4204 m^2
구체체적_수중 := (구체_절단면적_상부 + 구체_절단면적_하부)/2*구체_수중_높이 = 52.8305 m^3
구체체적_수중 = 52.8305 m^3
# ② 기초체적
기초체적_수중 := 확대기초_폭*확대기초_길이*확대기초_두께 = 4.7088 m^3
기초체적_수중 = 4.7088 m^3
# ③ 교각의 수중 체적
교각체적_수중 := 구체체적_수중 + 기초체적_수중 = 57.5393 m^3
교각체적_수중 = 57.5393 m^3
# (2) 부력
부력 := 교각체적_수중*단위중량_물 = 57.5393 tonne
부력 = 57.5393 tonne
# 라. 유수압 (최대홍수위시)
# 1) 교각 형상에  따른 저항계수
K_x := 0.07*tonne/m^2*(sec/m)^2
K_y := 0.04*tonne/m^2*(sec/m)^2
# 2) 유속
Q := 260*m^3/sec
A := 103.175 m^2
V := Q/A = 2.51999 m/s
θ = 14 deg
V_x := V*sin(θ) = 0.609641 m/s
V_y := V*cos(θ) = 2.44514 m/s
# 3) 투영면적
구체_수위면_폭 = 3.98 m
구체_수위면_폭_교축 := 1.38 m
구체_하단_폭 = 4.78 m
구체_하단_폭_교축 := 2.18 m
구체_수중_높이 = 6.64 m
확대기초_폭 = 5.4 m
확대기초_폭_교축 := 2.18 m + 0.31 m + 0.31 m = 2.8 m
확대기초_두께 = 0.4 m
확대기초_두께_교축 := 확대기초_두께
# (1) 기초 하면
투영면적_기초_x := (구체_수위면_폭 + 구체_하단_폭)/2*구체_수중_높이 + 확대기초_폭*확대기초_두께
투영면적_기초_x = 31.2432 m^2
투영면적_기초_y := (구체_수위면_폭_교축 + 구체_하단_폭_교축)/2*구체_수중_높이 + 확대기초_폭_교축*확대기초_두께
투영면적_기초_y = 12.9392 m^2
# (2) 시공이음부 (확대기초 상면부)
# 4) 유수압
# (1) 기초 하면
# ① 형상계수 :
K_x = 0.07 tonne*s^2/m^4
# ② 유속  :
V_x = 0.609641 m/s
# ③ 투영면적 :
투영면적_기초_x = 31.2432 m^2
# ④ 유수압  :
유수압_기초하면_x := K_x*V_x^2*투영면적_기초_x = 0.812834 tonne
유수압_기초하면_x = 0.812834 tonne
# ① 형상계수 :
K_y = 0.04 tonne*s^2/m^4
# ② 유속  :
V_y = 2.44514 m/s
# ③ 투영면적 :
투영면적_기초_y = 12.9392 m^2
# ④ 유수압  :
유수압_기초하면_y := K_y*V_y^2*투영면적_기초_y = 3.09438 tonne
유수압_기초하면_y = 3.09438 tonne
유수압_기초하면 := sqrt(유수압_기초하면_x^2 + 유수압_기초하면_y^2)
유수압_기초하면 = 3.19936 tonne
# 마. 풍하중
# 1) 풍하중 산정
# 상부 거더  :
# 교각 코핑  :
# 교각 구체  :
# 2) 기초 하단부 모멘트 산정
# 3) 시공이음부 모멘트 산정
