ORIGIN := 1
tonf := 1000 kgf
# 예제 2.1
# 자유 물체도
# 그림 2-4b와 같이 25tonf 의 힘은 x 와 y 성분으로 분해된다.
# 더우기 우력은 자유벡터이므로 2m에 대한 단면치수는 불필요하며
#
# 또 보의 어느 위치에서도 작용할 수 있다.
P_x := 25*tonf*cos(60 deg) = 12.5 tonf
P_y := 25*tonf*sin(60 deg) = 21.6506 tonf
# 검산
sqrt(P_x^2 + P_y^2) = 25 tonf
ΣF_x == 0
A_x + P_x == 0
A_x := -P_x = -12.5 tonf
ΣM_a == 0
P_y*3*m - P_x*0.3*m - B_y*4*m + 6*tonf*m == 0
P_y*3*m - P_x*0.3*m - B_y*4*m + 6*tonf*m == 0 solve, B_y → 150046.416113*N + 1500.0*kgf
P_y*3*m - P_x*0.3*m - B_y*4*m + 6*tonf*m == 0 solve, B_y → 150046.416113*N + 1500.0*kgf
P_y*3*m - P_x*0.3*m - B_y*4*m + 6*tonf*m == 0
f(B_y) := P_y*3*m - P_x*0.3*m - B_y*4*m + 6*tonf*m
B_y := 1*tonf
B_y := root(f(B_y), B_y) = 16.8005 tonf
B_y = 16.8005 tonf
ΣF_y == 0
A_y - P_y + B_y == 0
A_y - P_y + B_y == 0 solve, A_y → 47563.8095376*N
A_y =  # error: This variable is undefined.  # 이 계산 결과를 변수 Ay에 대입하는 방법은 ?
