ORIGIN := 1
tonf := 1000 kgf
# 예제 2.2
# 그림 2-5a에 있는 보의 반력을 구하여라
# 풀이
# 자유 물체도
# 그림 2-5b에서 보는 바와 같이
#
# 사다리꼴 등분포하중은 삼각형 등분포하중과 사각형등분포하중으로 분리할 수 있다.
#
# 이러한 힘들은 각각의 해당면적의 도심을 통해서 작용한다.
# 평형 방정식
# 좌향 , 상향, 시게방향을 +로 한다
ΣF_x == 0
A_x := 0
ΣF_y == 0
A_y - (1/2*10*kN/m*12*m) - (5*kN/m*12) == 0
A_y - (1/2*10*kN/m*12*m) - (5*kN/m*12*m) == 0 solve, A_y → 120*kN
f(A_y) := A_y - (1/2*10*kN/m*12*m) - (5*kN/m*12*m)
A_y := 1 kN
A_y := root(f(A_y), A_y) = 120 kN
ΣM_a == 0
-M_a + (1/2*10*kN/m*12*m)*(1/3*12*m) + (5*kN/m*12*m)*(1/2*12*m) == 0
-M_A + (1/2*10*kN/m*12*m)*(1/3*12*m) + (5*kN/m*12*m)*(1/2*12*m) == 0 solve, M_A → 600*kN*m
f(M_A) := -M_A + (1/2*10*kN/m*12*m)*(1/3*12*m) + (5*kN/m*12*m)*(1/2*12*m)
M_A := 1 kN*m
M_A := root(f(M_A), M_A) = 600 kN*m
# 이 계산 결과를 변수 Ay에 대입하는 방법은 ?
x := x
d/dx(x^3 - 2*y*x) → 3*x^2 - 2*y
d/dx(x^3) → 3*x^2
