# 검토 조건
B := 30 cm  # : 부재 폭
t := 2 cm  # : 종방향 배치 간격  # : 부재 두께
d := 2.6 cm  # : 횡방향 배치간격  # : 볼트 직경
s := 8 cm
g := 10 cm
# 1. 총단면적
A_g := B*t explicit, B, t → 30*cm*2*cm
A_g = 60 cm^2
# 2. 순단면적
# ① 파단선 ACEF
A_n1 := A_g - (2*d*t) → 60*cm^2 + (-10.4*cm^2) = 49.6 cm^2
A_n1 = 49.6 cm^2
# ② 파단선 ACDEF
A_n2 := A_g - (3*d*t) + (2*s^2/(4*g)*t) = 50.8 cm^2
A_n2 := A_g - (3*d*t) + (2*s^2/(4*g)*t) → 332*cm^2/5 + (-15.6*cm^2) = 50.8 cm^2
A_n2 := A_g - (3*d*t) + (2*s^2/(4*g)*t) explicit, A_g, d, t, s, g → 30*cm*2*cm - 3*2.6*cm*2*cm + 2*(8*cm)^2/(4*10*cm)*2*cm
A_n2 = 50.8 cm^2
A_n := min(A_n1, A_n2) = 49.6 cm^2
