# [계산예] 단면 특성
b := 10 cm
h := 10 cm
D := 1 cm
# 장방형 단면
# 도심축
# 단면적
A := b*h = 100 cm^2
# 단면
# 2차모멘트
I_xo := b*h^3/12 = 833.333 cm^4
# 단면
# 회전반경
r_xo := sqrt(I_xo/A) = 2.88675 cm
# 밑변
I_x := b*h^3/3 = 3333.33 cm^4
# 원형
# 도심축
# 단면적
A := π*D^2/4 = 0.785398 cm^2
# 단면
# 2차모멘트
I_xo := π*D^4/64 = 0.0490874 cm^4
# 단면
# 회전반경
r_xo := sqrt(I_xo/A) = 0.25 cm
# 압연H형강 단면 특성
# 소성단면계수
