# ■ 장방형
# - 검토조건
b := 3
h := 2
# - 면적
A_장방형 := b*h
A_장방형 explicit, A_장방형, b, h → 3*2 = 6
# - 도심위치
y_장방형 := h/2
y_장방형 explicit, y_장방형, h, b → 2/2 = 1
# - 단면2차모멘트
I_장방형 := b*h^3/12
I_장방형 explicit, I_장방형, b, h → 3*2^3/12 = 2
I_장방형 := b*h^3/12 explicit, b, h → 3*2^3/12 = 2
# ■ 삼각형
# - 검토조건
b := 10
h := 10
# - 면적
A_삼각형 := 1/2*b*h
A_삼각형 explicit, A_삼각형, b, h → 1/2*10*10 = 50
# - 도심위치
y_삼각형 := h/3
y_삼각형 explicit, y_삼각형, h, b → 10/3 = 3.33333
# - 단면2차모멘트
I_삼각형 := b*h^3/36
I_삼각형 explicit, I_삼각형, b, h → 10*10^3/36 = 277.778
# ■ 사다리꼴
# - 검토조건
a := 10
b := 10
h := 10
# - 면적
A_사다리꼴 := h/2*(a + b)
A_사다리꼴 explicit, A_사다리꼴, a, b, h → 10/2*(10 + 10) = 100
# - 도심위치
y_사다리꼴 := h/3*(2*a + b)/(a + b)
y_사다리꼴 explicit, y_사다리꼴, a, b, h → 10/3*(2*10 + 10)/(10 + 10) = 5
# - 단면2차모멘트
I_사다리꼴 := h^3/36*(a^2 + 4*a*b + b^2)/(a + b)
I_사다리꼴 explicit, I_사다리꼴, a, b, h → 10^3/36*(10^2 + 4*10*10 + 10^2)/(10 + 10) = 833.333
