## 물 탱 크  구 조 계 산 서
tonf := 1000 kgf
As_D13 := 1.267 cm^2
As_D16 := 1.986 cm^2
As_D19 := 2.865 cm^2
As_D22 := 3.871 cm^2
# 1. A-A 단면  ( 간이법 )
# 간이법은 벽체가 저판에 고정된 캔틸레버로 보고 구조계산함
# 【 검토 조건 】
# 뒷채움 흙의
# 단위중량
γ_s := 1.8*tonf/m^3 = 1800 kgf/m^3
# 흙의
# 내부마찰각
ϕ := 30 deg
# 벽체
# 높이
H := 3.5 m
# 【 하중 계산 】
# 토압 계수
Ka := tan^2(45 deg - ϕ/2) = 0.333333
# 바닥판
# 접합부에서의
# 토압 강도
pa := Ka*γ_s*H = 2.1 tonf/m^2
# 심도에 따른
# 토압의 증분
Ka*γ_s = 0.6 tonf/m^3
# 토압
Pa := 1/2*Ka*γ_s*H^2*1.0*m = 3.675 tonf
# 모멘트
M := Pa*1/3*H = 4.2875 tonf*m
# 전단력
V := Pa = 3.675 tonf
# 계수
# 모멘트
Mu := 1.6*M = 6.86 tonf*m
# 계수
# 전단력
Vu := 1.6*V = 5.88 tonf
# 【 사용 재료 】
# 콘크리트
# 설계기준강도
fck := 24 MPa
# 철근
# 항복강도
fy := 300 MPa
# 강도감소계수
ϕ := 0.85
k1 := 0.85
# 【 검토 단면 】
# 단면 폭
B := 1000 mm = 100 cm
# 단면 높이
H := 400 mm = 40 cm
# 단면
# 인장측 피복두께
d' := 80 mm
# 단면
# 유효높이
d := H - d' = 320 mm
# 【 설계 하중 】
# 계수
# 휨모멘트
Mu = 6.86 tonf*m
# 계수
# 전단력
Vu = 5.88 tonf
# 【 필요 철근량 계산 】
fy^2/(2*0.85*fck*B)*As^2 - Fy*d*As + Mu/ϕ == 0
a := fy^2/(2*0.85*fck*B)
b := -fy*d
c := Mu/ϕ
As1 := (-b + sqrt(b^2 - 4*a*c))/(2*a) = 42679.3 mm^2
As1 = 426.793 cm^2
As2 := (-b - sqrt(b^2 - 4*a*c))/(2*a) = 840.671 mm^2
As2 = 8.40671 cm^2
# 계산상
# 필요 철근량
As_req := min(As1, As2) = 840.671 mm^2
As_req = 8.40671 cm^2
# -------------------
# 【 최소 및 최대 철근량 계산 】
# 최소 철근비1
ρ_min1 := 1.4 MPa/fy = 0.00466667
# 최소 철근비2
ρ_min2 := 0.25*sqrt(MPa)*sqrt(fck)/fy = 0.00408248
# 최소 철근비
ρ_min := max(ρ_min1, ρ_min2) = 0.00466667
As_min := ρ_min*(B*d) = 14.9333 cm^2
# 최대 철근비
ρ_max := 0.75*k1*ϕ*fck/fy*600 MPa/(600 MPa + fy) = 0.0289
As_max := ρ_max*(B*d) = 92.48 cm^2
# 【 사용 철근량 】
# 철근
# 백근 간격
CTC := 125 mm
# 인장 철근
# 배근 갯수
N_As := 1000 mm/CTC = 8
# 사용
# 철근량
As_use := As_D16*N_As = 15.888 cm^2
# 사용
# 철근량 철근비
ρ_use := As_use/(B*d) = 0.4965 %
As_use = 15.888 cm^2
As_min := ρ_min*(B*d) = 14.9333 cm^2
As_max := ρ_max*(B*d) = 92.48 cm^2
As_check :=
    "O.K" if As_max > As_use > As_min
    "N.G" otherwise
    = "O.K"
# 【 휨에 대한 검토 】
# 등가 직사각형
# 응력 블럭의
# 깊이
a := As_use*fy/(0.85*fck*B) = 23.3647 mm
# 설계 강도
ϕMn := 0.85*As_use*fy*(d - a/2) = 124.913 kN*m
Mu = 67.2736 kN*m
Moment_check :=
    "O.K" if ϕMn > Mu
    "N.G" otherwise
    = "O.K"
ϕMn/Mu = 185.679 %
# 【 수평 철근량 계산  】
# 수평 철근량은 벽체의 최소 철근 규정에 의거 최소 철근(0.2%)만 배근 한다.
# 단면의 폭
b := 100 cm
# 단면의 두께
d := d = 32 cm
# 필요 철근량
As_req := 0.002*b*d = 6.4 cm^2
# 위에서 계산한 필요 철근량은 총단면에 대하여 필요한 총 철근량으로 철근량을 벽체 전면과 후면에 분배하여야 하므로 필요 철근량의 1/2를 필요 철근량으로 산정한다.
# 필요 철근량
As_req := As_req*1/2 = 3.2 cm^2
# 철근
# 백근 간격
CTC := 125*2*mm = 25 cm
# 수평 철근
# 배근 갯수
N_As := 1000 mm/CTC = 4
# 사용
# 철근량
As_use := As_D13*N_As explicit, As_D13, N_As → 1.267*cm^2*4 = 5.068 cm^2
# 사용
# 철근량 철근비
ρ_use := As_use/(B*d) = 0.158375 %
As_use = 5.068 cm^2
As_req = 3.2 cm^2
As_check :=
    "O.K" if As_use > As_req
    "N.G" otherwise
    = "O.K"
# 2. 판해석
# 모서리부 모멘트 산정을 간략법으로 구하기 어려워 판해석을 수행함
# 【 모델링 】
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# 【 변위도 】
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# 2.1 A-A 단면  ( 벽체 연직 철근, 판해석 )
# 【 검토 조건 】
# 콘크리트
# 설계기준강도
fck := 24 MPa
# 철근
# 항복강도
fy := 300 MPa
# 강도감소계수
ϕ := 0.85
# 단면 폭
B := 1000 mm = 100 cm
# 단면 높이
H := 400 mm = 40 cm
# 단면
# 인장측 피복두께
d' := 80 mm
# 단면
# 유효높이
d := H - d' = 320 mm
# 모멘트
M := 4.3151*tonf*m
# 계수
# 모멘트
Mu := 1.6*M = 6.90416 tonf*m
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# 【 필요 철근량 계산 】
fy^2/(2*0.85*fck*B)*As^2 - Fy*d*As + Mu/ϕ == 0
a := fy^2/(2*0.85*fck*B)
b := -fy*d
c := Mu/ϕ
As1 := (-b + sqrt(b^2 - 4*a*c))/(2*a) = 42673.8 mm^2
As1 = 426.738 cm^2
As2 := (-b - sqrt(b^2 - 4*a*c))/(2*a) = 846.192 mm^2
As2 = 8.46192 cm^2
# 계산상
# 필요 철근량
As_req := min(As1, As2) = 846.192 mm^2
As_req = 8.46192 cm^2
# -------------------
# 【 최소 및 최대 철근량 계산 】
# 최소 철근비1
ρ_min1 := 1.4 MPa/fy = 0.00466667
# 최소 철근비2
ρ_min2 := 0.25*sqrt(MPa)*sqrt(fck)/fy = 0.00408248
# 최소 철근비
ρ_min := max(ρ_min1, ρ_min2) = 0.00466667
As_min := ρ_min*(B*d) = 14.9333 cm^2
# 최대 철근비
ρ_max := 0.75*k1*ϕ*fck/fy*600 MPa/(600 MPa + fy) = 0.0289
As_max := ρ_max*(B*d) = 92.48 cm^2
# 【 사용 철근량 】
# 철근
# 백근 간격
CTC := 125 mm
# 인장 철근
# 배근 갯수
N_As := 1000 mm/CTC = 8
# 사용
# 철근량
As_use := As_D16*N_As = 15.888 cm^2
# 사용
# 철근량 철근비
ρ_use := As_use/(B*d) = 0.4965 %
As_use = 15.888 cm^2
As_min := ρ_min*(B*d) = 14.9333 cm^2
As_max := ρ_max*(B*d) = 92.48 cm^2
As_check :=
    "O.K" if As_max > As_use > As_min
    "N.G" otherwise
    = "O.K"
# 【 휨에 대한 검토 】
# 등가 직사각형
# 응력 블럭의
# 깊이
a := As_use*fy/(0.85*fck*B) = 23.3647 mm
ϕMn := 0.85*As_use*fy*(d - a/2) = 124.913 kN*m
Mu = 67.7067 kN*m
As_check :=
    "O.K" if ϕMn > Mu
    "N.G" otherwise
    = "O.K"
ϕMn/Mu = 184.491 %
# 2.2 B-B 단면  ( 벽체 모서리부 수평 철근, 판해석 )
# 【 검토 조건 】
# 콘크리트
# 설계기준강도
fck := 24 MPa
# 철근
# 항복강도
fy := 300 MPa
# 강도감소계수
ϕ := 0.85
# 단면 폭
B := 1000 mm = 100 cm
# 단면 높이
H := 400 mm = 40 cm
# 단면
# 인장측 피복두께
d' := 80 mm
# 단면
# 유효높이
d := H - d' = 320 mm
# 모멘트
M := 3.1548*tonf*m
# 계수
# 모멘트
Mu := 1.6*M = 5.04768 tonf*m
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# 【 필요 철근량 계산 】
fy^2/(2*0.85*fck*B)*As^2 - Fy*d*As + Mu/ϕ == 0
a := fy^2/(2*0.85*fck*B)
b := -fy*d
c := Mu/ϕ
As1 := (-b + sqrt(b^2 - 4*a*c))/(2*a) = 42904.7 mm^2
As1 = 429.047 cm^2
As2 := (-b - sqrt(b^2 - 4*a*c))/(2*a) = 615.328 mm^2
As2 = 6.15328 cm^2
# 계산상
# 필요 철근량
As_req := min(As1, As2) = 615.328 mm^2
As_req = 6.15328 cm^2
# -------------------
# 【 최소 및 최대 철근량 계산 】
# 최소 철근비1
ρ_min1 := 1.4 MPa/fy = 0.00466667
# 최소 철근비2
ρ_min2 := 0.25*sqrt(MPa)*sqrt(fck)/fy = 0.00408248
# 최소 철근비
ρ_min := max(ρ_min1, ρ_min2) = 0.00466667
As_min := ρ_min*(B*d) = 14.9333 cm^2
# 최대 철근비
ρ_max := 0.75*k1*ϕ*fck/fy*600 MPa/(600 MPa + fy) = 0.0289
As_max := ρ_max*(B*d) = 92.48 cm^2
# 【 사용 철근량 】
# 철근
# 백근 간격
CTC := 125 mm
# 인장 철근
# 배근 갯수
N_As := 1000 mm/CTC = 8
# 사용
# 철근량
As_use := As_D16*N_As = 15.888 cm^2
# 사용
# 철근량 철근비
ρ_use := As_use/(B*d) = 0.4965 %
As_use = 15.888 cm^2
As_min := ρ_min*(B*d) = 14.9333 cm^2
As_max := ρ_max*(B*d) = 92.48 cm^2
As_check :=
    "O.K" if As_max > As_use > As_min
    "N.G" otherwise
    = "O.K"
# 【 휨에 대한 검토 】
# 등가 직사각형
# 응력 블럭의
# 깊이
a := As_use*fy/(0.85*fck*B) = 23.3647 mm
ϕMn := 0.85*As_use*fy*(d - a/2) = 124.913 kN*m
Mu = 49.5008 kN*m
As_check :=
    "O.K" if ϕMn > Mu
    "N.G" otherwise
    = "O.K"
ϕMn/Mu = 252.345 %
