## 지반 반력 계수
tonf := 1000 kgf
tf := 1000 kgf
# 1) 수평 방향 지반반력 계수
# K_H값을 구하는데 있어서 β값을 구하는 식 자체에K_H 항이 들어 있으므로 간단히 구할 수 없다. 따라서, β값을 가정하여 수평방향 지반반력계수(K_H)를 산정하고 β == nthroot(K_H*D/(4*E*i), 4)식에 대입하여 값을 산출한다.
# 가정한 β값과 계산식에 의한 β값의 오차가 1% 미만이면 채택하고, 그렇지 않으면 위의 과정을 반복하여 산정한다.
# 【 검토 조건 】
# 말뚝
# 직경
D := 504 mm
D = 50.4 cm
# 말뚝
# 탄성계수
E := 210000000 kN*m^-2
E = 2141404 kgf*cm^-2
# 말뚝
# 단면2차모멘트
I := 0.00033753 m^4
I = 33753 cm^4
# 지반의 N치
N_s := 10
# 【 수평방향 지반반력계수  】
# 기초의 특성치
# 가정값
β := 0.403537 m^-1
# 지반반력계수
# 추정에 따른 계수
α := 1.0
# 지반 탄성계수
E_o := 1200*(kN/m^2)*N_s = 12000 kN*m^-2
E_o = 122.366 kgf*cm^-2
# 수평지반반력계수
# 지름 300mm의 강체원판에 의한 평판재하시험의 값에 상당하는
# 수평방향 지반반력계수
K_Ho := (1/(30 cm))*α*E_o = 40000 kN/m^3
K_Ho = 4.07886 kgf*cm^-3
# 하중 작용방향에
# 직교하는
# 기초환산재하폭
B_H := sqrt(D/β) = 1.11757 m
# 수평지반반력계수
K_H := K_Ho*(B_H/(0.3 m))^(-3/4) = 14917.5 kN*m^-3
# 기초의 특성치
β := nthroot((K_H*D/(4*E*I)), 4) = 0.403537 m^-1
1/β = 2.47809 m
# 【 수평방향 지반반력계수  】
β1 := 1/2.478*m^-1
β := (((1/(30 cm))*α*E_o)*(sqrt(D/β1)/(0.3 m))^(-3/4)*D/(4*E*I))^(1/4) = 0.403539 1/m
1/β = 2.47808 m
