tonf := 1000 kgf
# 프리스트레스트 콘크리트 보의 해석
Material
E := 4400 ksi = 3093506 tonf/m^2
PoissonRatio := 0.2
fc := 6 ksi = 421.842 kgf/cm^2
CableTension := 200 kip = 90.7185 tonf
fy := 60*kip/in^2 = 4218.42 kgf/cm^2
SpanLength := 30 ft = 9.144 m
Section
Depth := 30 in = 76.2 cm
Width := 18 in = 45.72 cm
76.2/2 = 38.1
Start := 8 in = 20.32 cm
Middle := 12 in = 30.48 cm
End := 3 in = 7.62 cm
