tonf := 1000 kgf
ton := 1000 kg
# 프리스트레스트 콘크리트 보의 해석
#
# 문제9
# DL + LL + Prestress 하중 조합에 대한 모멘트도를 구하시오
# 4 Output Segment와 30 Output Segment를 각각 사용하여 비교 하시오
SpanLength := 30 ft = 9.144 m
# 【 Material Propert 】
WeightPerUnitVolume := 0.15*kip/ft^3 = 2.40277 tonf/m^3
MassPerUnitVolume := 4.658*10^-3*kip/(g*ft^3) = 0.074614 tonf/(gravitational_acceleration*m^3)
0.245*tonf/(g*m^3) = 0.0152949 kip/(ft^3*gravitational_acceleration)
g = 32.174 ft/s^2
g = 9.80665 m/s^2
0.15/32.174 = 0.00466215
2.403/9.807 = 0.245029
E := 633600*kip/ft^2
E = 4400 kip/in^2
PoissonRatio := 0.2
CoeffThermalExpansion := 5.5*10^-6
ShearModulii := 216000*kip/ft^2
ShearModulii = 1500 kip/in^2
fc := 864*kip/ft^2 = 421.842 kgf/cm^2
fc = 6 kip/in^2
fy := 8640*kip/ft^2 = 4218.42 kgf/cm^2
fy = 60 kip/in^2
f_ys := 8640*kip/ft^2 = 4218.42 kgf/cm^2
f_ys = 60 kip/in^2
fcs := 864*kip/ft^2 = 421.842 kgf/cm^2
fcs = 6 kip/in^2
# 【 Section 】
Depth := 30 in = 76.2 cm
Width := 18 in = 45.72 cm
76.2/2 = 38.1
# 【 Frame Prestressing Patterns 】
CableTension := 200 kip
CableTension = 90.7185 tonf
Start := 8 in = 20.32 cm
Middle := 12 in = 30.48 cm
End := 3 in = 7.62 cm
# 【 Define Static Load Case 】
DL := -2.2 kip = -0.997903 tonf
LL := -1.6 kip = -0.725748 tonf
Prest := 1 kip
# 【 Load Combination 】
COM1 := 1.0*DL + 1.0*LL + 1.0*Prest = -1.27006 tonf
# 【 Output Segment 】
NumberOfSegment := 4
