tonf := 1000 kgf
ton := 1000 kg
# 프리스트레스트 콘크리트 보의 해석
#
# 문제9
# DL + LL + Prestress 하중 조합에 대한 모멘트도를 구하시오
# 4 Output Segment와 30 Output Segment를 각각 사용하여 비교 하시오
SpanLength := 30 ft = 9.144 m
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# 【 Material Propert 】
WeightPerUnitVolume := 0.15*kip/ft^3 = 2.40277 tonf/m^3
MassPerUnitVolume := 4.658*10^-3*kip/(g*ft^3) = 0.074614 tonf/(gravitational_acceleration*m^3)
0.245*tonf/(g*m^3) = 0.0152949 kip/(ft^3*gravitational_acceleration)
g = 32.174 ft/s^2
g = 9.80665 m/s^2
0.15/32.174 = 0.00466215
2.403/9.807 = 0.245029
E := 633600*kip/ft^2
E = 4400 kip/in^2
PoissonRatio := 0.2
CoeffThermalExpansion := 5.5*10^-6
ShearModulii := 216000*kip/ft^2
ShearModulii = 1500 kip/in^2
fc := 864*kip/ft^2 = 421.842 kgf/cm^2
fc = 6 kip/in^2
fy := 8640*kip/ft^2 = 4218.42 kgf/cm^2
fy = 60 kip/in^2
f_ys := 8640*kip/ft^2 = 4218.42 kgf/cm^2
f_ys = 60 kip/in^2
fcs := 864*kip/ft^2 = 421.842 kgf/cm^2
fcs = 6 kip/in^2
# 【 Section 】
Depth := 30 in = 76.2 cm
Width := 18 in = 45.72 cm
76.2/2 = 38.1
# 【 Frame Prestressing Patterns 】
CableTension := 200 kip
CableTension = 90.7185 tonf
Start := 8 in = 20.32 cm
Middle := 12 in = 30.48 cm
End := 3 in = 7.62 cm
# 【 Define Static Load Case 】
DL := -2.2 kip = -0.997903 tonf
LL := -1.6 kip = -0.725748 tonf
Prest := 1 kip
# 【 Load Combination 】
COM1 := 1.0*DL + 1.0*LL + 1.0*Prest = -1.27006 tonf
# 【 Output Segment 】
NumberOfSegment := 4
# 【 변위 】
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# 【 사하중 】
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# 【 활하중 】
# 【 프리스트레스 】
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# 【 하중 조합 】
# 【 반력 】
# 【 사하중 】 | 【 활하중 】
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# 【 프리스트레스 】
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# 【 하중 조합 】
# 【 모멘트 】
# 【 사하중 】 | 【 활하중 】
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# 【 프리스트레스 】
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# 【 하중 조합 】
# ; File C:\Documents and Settings\h\바탕 화면\SCAN\21.s2k saved 7-12-12 19:19:27 in Kip-ft
#
# SYSTEM
#
# DOF=UX,UZ,RY  LENGTH=FT  FORCE=Kip  PAGE=SECTIONS
#
# JOINT
#
# 1  X=-15  Y=0  Z=0
#
# 2  X=15  Y=0  Z=0
#
# RESTRAINT
#
# ADD=1  DOF=U1,U2,U3,R1,R3
#
# ADD=2  DOF=U2,U3,R1,R3
#
# PATTERN
#
# NAME=DEFAULT
#
# MATERIAL
#
# NAME=STEEL  IDES=S  M=1.518628E-02  W=.4890231
#
# T=0  E=4176000  U=.3  A=.0000065  FY=5184
#
# NAME=CONC  IDES=C  M=4.657306E-03  W=.1500077
#
# T=0  E=633600  U=.2  A=.0000055
#
# NAME=OTHER  IDES=N  M=4.658087E-03  W=.1499904
#
# T=0  E=518400  U=.2  A=.0000055
#
# FRAME SECTION
#
# NAME=FSEC1 MAT=CONC SH=R T=2.5,1.5 A=3.75 J=1.760857 I=1.953125,.703125 AS=3.125,3.125
#
# FRAME
#
# 1  J=1,2  SEC=FSEC1  NSEG=4  ANG=0
#
# PRESTRESS
#
# ADD=1  D=.6666667,1,.25  T=200
#
# LOAD
#
# NAME=DL  SW=1  CSYS=0
#
# TYPE=DISTRIBUTED SPAN
#
# ADD=1  RD=0,1  UZ=-2.2,-2.2
#
# NAME=LL  CSYS=0
#
# TYPE=DISTRIBUTED SPAN
#
# ADD=1  RD=0,1  UZ=-1.6,-1.6
#
# NAME=PREST  CSYS=0
#
# TYPE=PRESTRESS
#
# ADD=1  P=1
#
# COMBO
#
# NAME=COMB1
#
# LOAD=DL  SF=1
#
# LOAD=LL  SF=1
#
# LOAD=PREST  SF=1
#
# OUTPUT
#
# ; No Output Requested
#
# END
#
# ; The following data is used for graphics, design and pushover analysis.
#
# ; If changes are made to the analysis data above, then the following data
#
# ; should be checked for consistency.
#
# SAP2000 V7.40 SUPPLEMENTAL DATA
#
# GRID GLOBAL  X "1"  -15
#
# GRID GLOBAL  X "2"  15
#
# GRID GLOBAL  Y "3"  0
#
# GRID GLOBAL  Z "4"  0
#
# MATERIAL STEEL FY 5184
#
# MATERIAL CONC FYREBAR 8640 FYSHEAR 8640 FC 864 FCSHEAR 864
#
# CONCRETESECTION FSEC1 COLUMN  COVER .25 REBAR RR-3-3
#
# STATICLOAD DL TYPE DEAD
#
# STATICLOAD LL TYPE LIVE
#
# STATICLOAD PREST TYPE OTHER
#
# END SUPPLEMENTAL DATA
