# 1. 설계조건
# 1) 구조형식
# 2) 지하수위
# 3) 재료중량
# - 철근콘크리트  :
γc := 24.50 kN*m^-3
# - Mortar  :
γ_mot := 21.50 kN*m^-3
# - 포장  :
γ_asp := 22.50 kN*m^-3
# - 지하수  :
γ_w := 10.00 kN*m^-3
# 4) 사용재료의 강도
# - 콘크리트 강도  :
fck := 35 MPa
# - 콘크리트 탄성계수 :
Ec := 29778.9 MPa
# - 철근 강도  :
fy := 400 MPa
# - 철근의 탄성계수  :
Es := 200000 MPa
# 5) 토압계산에 사용되는 흙의 단위중량
# _ 일반 토사  :
γ_t := 20 kN*m^-3
# _ 수중단위중량  :
γ_sub := 10.0 kN*m^-3
# 6) 지진계수
# 7) 노면활하중
W_L := 11.355 kN*m^-2
# 8) 토사
# - 흙의 습윤단위중량 :
γ_t := 20.0 kN*m^-3
# - 흙의 수중단위중량 :
γ_sub := 10.0 kN*m^-3
# - 흙의 내부마찰각  :
ϕ := 30 deg
# - 정지토압계수  :
Ko := 1 - sin(ϕ) = 0.5
# 9) 설계방법
# 10) 사용프로그램
# 11) 참고문헌
# 2. 가정 단면
# 3. 부력 검토
# 부력에 대한 안전율 Fs = R/B
# 공사중 안전율
Fs_공사중 := 1.1
# 완공후 안전율
Fs_완공후 := 1.2
# 부력에 대한 안정계산시 구체자중과 측면마찰력, 상재하중만을 고려하여 검토한다.
# 1) 구체자중
# - 하부 슬래브
C1 := 4.540 m*0.2*m*γc = 22.246 kN*m^-1
# - 상부 슬래브
C2 := 4.54 m*0.2*m*γc = 22.246 kN*m^-1
# - 좌측 벽체
C3 := 0.18 m*2*m*γc = 8.82 kN*m^-1
# - 우측 벽체
C4 := 0.18 m*2*m*γc = 8.82 kN*m^-1
# - 중간 벽체
C5 := 0.18 m*2*m*γc = 8.82 kN*m^-1
# - 헌치
C6 := 1/2*0.2*m*0.2*m*8*γc = 3.92 kN*m^-1
# ------------------------------------------------------------------
Σ구체자중
ΣCi := C1 + C2 + C3 + C4 + C5 + C6 = 74.872 kN*m^-1
# 2) 상부슬래브에 작용하는 하중
# - 표층
W1 := 0.2 m*4.54*m*γ_asp = 20.43 kN*m^-1
# _ 기층
W2 := 0.3 m*4.54*m*γ_asp = 30.645 kN*m^-1
# - 흙의 자중(지하수위 이상)
W3 := 0.5 m*4.54*m*γ_t = 45.4 kN*m^-1
# _ 흙의 자중(자하수위 이하)
W4 := 2.0 m*4.54*m*γ_sub = 90.8 kN*m^-1
# - 지하수 자중
W5 := 2.0 m*4.54*m*γ_w = 90.8 kN*m^-1
# ------------------------------------------------------------------
# Σ상부슬래브 작용하중
ΣWi := W1 + W2 + W3 + W4 + W5 = 278.075 kN*m^-1
# 3) 측면 마찰력
# 4) 부력
# 5) 완공후 부력안정검토
# 4. 해석모델 및 단면제원 (상시)
# 3.1 Olsen Model (NCHRP Report 86)
# 1) 감가속도
# 2) 횡방향 충격력
# 3.2 AASHTO LRFD Bridge Design Specifications
# 1) 적용기준
# 2) 횡방향 충격력
# 4. 방호벽 전체 저항력 검토
# 4.1 연직축에 대한 BEAM의 Moment강도 (Mb)
# 가정한 방호벽 단면 상단에 BEAM 구간이 없으므로 Mb := 0 으로 한다
# 4.2 연직축에 대한 WALL의 Moment강도 (Mw*H)
# 4.3 수평축에 대한 WALL의 Moment강도 (Mc)
# 4.4 Critical Length Yield Line Pattern (Lc)
# 4.5 Nominal Resistance to Transverse Load (Rw)
# 4.6 Shear Transfer Between Barrier and Deck
# 1) 충돌에 의한 방호벽의 전단력
# 2) Nominal Shear Resistance
# 3) 최소 전단 철근 검토
# 4) 청착길이 검토
# 5. 방호벽의 기존 콘크리트와 보강콘크리트의 일체화 검토
# 5.1 발생 가능한 최대 전단력 산정
# 5.2 전단에 대한 저항력 산정 (부착강도)
# 5.1 발생 가능한 최대 전단력 산정
# 콘크리트의 전단강도 이상이 발생하게 되면 콘크리트의 부착강도가 충분하더라도, 콘크리트의 전단파과가 발생하게 되므로 콘크리트의 전단강도에 대해 설계한다.
# - 콘크리트의 전단강도
fck := 24
Vc := 0.13*sqrt(fck) float, 3 → 0.637
# - 설계 극한 전단력
Vu := Vc*Ac  # disabled
# 5.2 전단에 대한 저항력 산정 (부착강도)
# 1) 상면에 대한 검토
Ac := 0.25*1 = 0.25  # m^2
# - 작용전단력 산정
Vu := Vc*Ac explicit, Vc, Ac → 0.637*0.25 = 0.15925
# - 필요 철근량 계산
ϕ := 0.8
c := 0.52
μ := 0.6
Pc := 0
fy := 300
Avf_req := (Vu/0.8 - c*Ac)/(μ*fy) - Pc/fy explicit, Vu, c, Ac, μ, fy, Pc → (0.15925/0.8 - 0.52*0.25)/(0.6*300) - 0/300 = 0.000383681
Avf_req := Avf_req*100*100 = 3.83681  # cm^2
# - 철근 사용갯수 검토
As_D16 := 1.986
ns := Avf_req/As_D16 = 1.93193
# 2) 측면에 대한 검토
# - 콘크리트 단면적
Ac := 0.49 + 0.3 + 0.13 = 0.92
sqrt(0.0575^2 + 0.485^2) + sqrt(0.1675^2 + 0.250^2) + 0.075 + 0.080 = 0.944322
# - 작용전단력 산정
Vu := Vc*Ac explicit, Vc, Ac → 0.637*0.92 = 0.58604
# - 필요 철근량 계산
ϕ := 0.8
c := 0.70
# : 점착계수
# 일체로 타설한 콘크리트  = 0.10 Mpa
# 6mm요철을 둔경우  = 0.70 Mpa
# 의도적인 요철을 두지 않은 경우 = 0.52 MPa
μ := 1.0
# : 마찰계수
# 일체로 타설한 콘크리트  = 1.4λ
# 6mm요철을 둔경우  = 1.0λ
# 의도적인 요철을 두지 않은 경우 = 0.6λ
Pc := 0
# : 전단면에 수직한 영구 순압축력
# 만약 작용하는 힘이 인장력이면 Pc=0.0(N)
fy := 300
Avf_req := (Vu/0.8 - c*Ac)/(μ*fy) - Pc/fy explicit, Vu, c, Ac, μ, fy, Pc → (0.58604/0.8 - 0.70*0.92)/(1.0*300) - 0/300 = 0.000295167
Avf_req := Avf_req*100*100 float, 3 → 2.95  # cm^2
# - 철근 사용갯수 검토
db := 1.3
As_D13 := 1.267
ns := Avf_req/As_D13 explicit, Avf_req, As_D13 → 2.95/1.267 = 2.32833
0.6*2.86*280/sqrt(28) = 90.8022
# - 정착길이검토 | (도로교표준시방서(부록) p.5-139 참조)
ld := 0.17*db*fy/sqrt(fck) explicit, db, fy, fck → 0.17*1.3*300/sqrt(24) = 13.5334
# 2) 측면에 대한 검토
# - 콘크리트 단면적
Ac := 0.49 + 0.3 + 0.13 = 0.92
sqrt(0.0575^2 + 0.485^2) + sqrt(0.1675^2 + 0.250^2) + 0.075 + 0.080 = 0.944322
# - 작용전단력 산정
Vu := Vc*Ac explicit, Vc, Ac → 0.637*0.92 = 0.58604
# - 필요 철근량 계산
ϕ := 0.8
c := 0.52
# : 점착계수
# 일체로 타설한 콘크리트  = 0.10 Mpa
# 6mm요철을 둔경우  = 0.70 Mpa
# 의도적인 요철을 두지 않은 경우 = 0.52 MPa
μ := 0.6
# : 마찰계수
# 일체로 타설한 콘크리트  = 1.4λ
# 6mm요철을 둔경우  = 1.0λ
# 의도적인 요철을 두지 않은 경우 = 0.6λ
Pc := 0
# : 전단면에 수직한 영구 순압축력
# 만약 작용하는 힘이 인장력이면 Pc=0.0(N)
fy := 300
Avf_req := (Vu/0.8 - c*Ac)/(μ*fy) - Pc/fy explicit, Vu, c, Ac, μ, fy, Pc → (0.58604/0.8 - 0.52*0.92)/(0.6*300) - 0/300 = 0.00141194
Avf_req := Avf_req*100*100 float, 3 → 14.1  # cm^2
# - 철근 사용갯수 검토
db := 1.9
As_D13 := 1.267
As_D16 := 1.986
As_D19 := 2.865
ns := Avf_req/As_D19 explicit, Avf_req, As_D19 → 14.1/2.865 = 4.92147
# - 정착길이검토 | (도로교표준시방서(부록) p.5-139 참조)
ld := 0.17*db*fy/sqrt(fck) explicit, db, fy, fck → 0.17*1.9*300/sqrt(24) = 19.7796
