a := 4.2 m
b := 2.5 m
b_2 := 2.5 m
U_f := 1.3 m
a_2 := 9 m
a_s := 0
# R_c | 차로 중심선의 반지름
R_c := 15 m
# R_w | 바깥쪽 곡선 반지름
R_w := sqrt((sqrt(R_c^2 - (a + U_f)^2) + b/2)^2 + (a + U_f)^2) = 16.1694 m
B := R_w + b_2/2 - sqrt(R_c^2 - (a + U_f)^2 - a_2^2 + a_s^2) = 6.75407 m
R_i := R_w - B = 9.41536 m
B_req := b + R_i + R_w = 28.0848 m
# R_c | 차로 중심선의 반지름
R_c := 12 m
# R_w | 바깥쪽 곡선 반지름
R_w := sqrt((sqrt(R_c^2 - (a + U_f)^2) + b/2)^2 + (a + U_f)^2) = 13.1235 m
B := R_w + b_2/2 - sqrt(R_c^2 - (a + U_f)^2 - a_2^2 + a_s^2) = 8.65073 m
R_i := R_w - B = 4.47276 m
B_req := b + R_i + R_w = 20.0962 m
