# 1. 유역면적
B_유역 := 1.5 + 1*3.6 + 0.5 = 5.6
L_유역 := 1.4
# 2. 유출량 계산
C := 0.9  # : 유출계수
I := 134.4
A := B_유역*L_유역 = 7.84
Q_유출 := 1/3600000*C*I*A = 0.000263424
# 3. 통수량 계산
i_종단 := 0.003
i_횡단 := 0.02
b := 0.5
h := b*i_횡단 = 0.01
A := 1/2*b*h = 0.0025
P := h + sqrt(b^2 + h^2) = 0.5101
R := A/P = 0.004901
n := 0.015
Q_통수 := A*(1/n*R^(2/3)*i_종단^(1/2)) = 0.00026339
0.0025*1/0.015*0.0049^(2/3)*0.003^(1/2) = 0.000263354
# 4. 배수거 간격 검토
Q_유출 = 0.000263424
Q_통수 = 0.00026339
배수거_간격_검토 :=
    "O.K" if Q_유출 < Q_통수
    "N.G" otherwise
    = "N.G"
