# 1. 유역면적
B_유역 := 1.5 + 1*3.6 + 0.5 = 5.6
# 2. 유출량 계산
C := 0.9  # : 유출계수
I := 134.4  # : 강우 강도 (10년빈도 부산지역)
# 3. 통수량 계산 (기존단면)
i_종단 := 0.003  # : 종단 경사
i_횡단 := 0.02  # : 횡단 경사
b := 0.5  # : 유로폭
h := b*i_횡단 = 0.01  # : 수심
A_통수 := 1/2*b*h = 0.0025  # : 통수 단면적
P := h + sqrt(b^2 + h^2) = 0.5101  # : 윤변
R := A_통수/P = 0.004901  # : 경심
n := 0.015  # : 수로 조도 계수
Q_통수 := A_통수*(1/n*R^(2/3)*i_종단^(1/2)) = 0.00026339
# 4. 배수거 간격 검토
L_유역 := (A_통수*(1/n*R^(2/3)*i_종단^(1/2)))/(1/3600000*C*I*B_유역) = 1.39982
# 5. 통수량 계산 (변경단면)
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b_ditch := 0.1  # : 보완 수로폭
h_ditch := 0.045  # : 보완 수로 깊이
h_1 := b*i_횡단 = 0.01
h_2 := (b - b_ditch)*i_횡단 = 0.008
A_통수 := (b_ditch*(h_ditch + h_1)) + (1/2*(b - b_ditch)*h_2) = 0.0071  # : 통수 단면적
P := (h_1 + h_ditch) + b_ditch + (h_ditch + (h_1 - h_2)) + sqrt((b - b_ditch)^2 + h_2^2) = 0.60208  # : 윤변
R := A_통수/P = 0.0117925  # : 경심
# 6. 배수거 간격 검토
L_유역 := (A_통수*(1/n*R^(2/3)*i_종단^(1/2)))/(1/3600000*C*I*B_유역) = 7.13844
