# (제1공구) 차선전환가도 배수간격 검토
# 1. 유역면적
B_유역 := 1.5 m + 2*3.6*m + 1.5 m = 10.2 m
# 2. 유출량 계산
C := 0.9  # : 유출계수
I := 94.2*mm/hr  # : 강우 강도 (부산지역 3년빈도)
# 3. 통수량 계산 (기존단면)
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i_종단 := 0.01  # : 종단 경사
i_횡단 := 0.02  # : 횡단 경사
b := 50 cm  # : 유로폭
h := b*i_횡단 = 0.01 m  # : 수심
A_통수 := 1/2*b*h = 0.0025 m^2  # : 통수 단면적
P := h + sqrt(b^2 + h^2) = 0.5101 m  # : 윤변
n := 0.015*m^(2/3)*sec/m  # : 수로 조도 계수
R := A_통수/P = 0.004901 m  # : 경심
Q_통수 := A_통수*(1/n*R^(2/3)*i_종단^(1/2)) = 0.000480882 m^3/s
# 4. 배수거 간격 검토
L_유역 := (A_통수*(1/n*R^(2/3)*i_종단^(1/2)))/(C*I*B_유역) = 2.00192 m
# 5. 통수량 계산 (변경단면)
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b_ditch := 15 cm  # : 보완 수로폭
h_ditch := 4 cm  # : 보완 수로 깊이
h_1 := b*i_횡단 = 0.01 m
h_2 := (b - b_ditch)*i_횡단 = 0.007 m
A_통수 := (b_ditch*(h_ditch + h_1)) + (1/2*(b - b_ditch)*h_2) = 0.008725 m^2  # : 통수 단면적
P := (h_1 + h_ditch) + b_ditch + (h_ditch + (h_1 - h_2)) + sqrt((b - b_ditch)^2 + h_2^2) = 0.59307 m  # : 윤변
R := A_통수/P = 0.0147116 m  # : 경심
# 6. 배수거 간격 검토
L_유역 := (A_통수*(1/n*R^(2/3)*i_종단^(1/2)))/(C*I*B_유역) = 14.5386 m
