# (제1공구) 응달교 차선전환가도 배수간격 검토 (1구간)
# 1. 유역면적
B_유역 := 0.8 m + 2*3.5*m + 2.0 m = 9.8 m  # : 유로폭
L_유역 := 6080 m - 5860 m = 220 m  # : 유로 연장
A_유역 := B_유역*L_유역 = 2156 m^2  # : 유역 면적
# 2. 유출량 계산
C := 0.9  # : 유출계수
I := 94.2*mm/hr  # : 강우 강도 (부산지역 3년빈도)
# 3. 통수량 계산 (기존단면)
i_종단 := 0.0405  # : 종단 경사
i_횡단 := 0.05  # : 횡단 경사
b := 50 cm  # : 유로폭
h := b*i_횡단 = 2.5 cm  # : 수심
A_통수 := 1/2*b*h = 62.5 cm^2  # : 통수 단면적
P := h + sqrt(b^2 + h^2) = 52.5625 cm  # : 윤변
R := A_통수/P = 1.18906 cm  # : 경심
n := 0.015*m^(2/3)*sec/m  # : 수로 조도 계수
Q_통수 := A_통수*(1/n*R^(2/3)*i_종단^(1/2)) = 0.00436837 m^3/s
# 4. 배수거 간격 검토
L_유역 := (A_통수*(1/n*R^(2/3)*i_종단^(1/2)))/(C*I*B_유역) = 18.9279 m  # 따라서 18m 마다 집수거를 설치하여야 한다
# 5. V1형 측구 설치 시 통수량 게산
i_V형측구 := 0.0405  # : V형 측구 종단 경사
b_하부 := 50 cm  # : V형 측구 하부 폭
b_측벽 := 13.5 cm  # : V형 측구 측벽 폭
b_상부 := b_하부 + 2*b_측벽 = 77 cm  # : V형 측구 상부 폭
h := 45 cm  # : V형 측구 높이
A_통수 := 1/2*(b_상부 + b_하부)*h = 2857.5 cm^2  # : 통수 단면적
P := b_하부 + 2*sqrt(b_측벽^2 + h^2) = 143.963 cm  # : 윤변
R := A_통수/P = 19.8489 cm  # : 경심
n := 0.015*m^(2/3)*sec/m  # : 수로 조도 계수
Q_통수 := A_통수*(1/n*R^(2/3)*i_종단^(1/2)) = 1.30451 m^3/s
# 6. V형 측구 설치 연장 검토
L_유역 := (A_통수*(1/n*R^(2/3)*i_종단^(1/2)))*0.8/(C*I*B_유역) = 4521.89 m
# 유로 연장 220m를 초과 하므로 적정
# 7. 통수량 계산 (벤치 플륨관 450)
i_V형측구 := 0.0405  # : 종단 경사
a := 45 cm  # : 플륨관 상부 폭
b := 39 cm  # : 플륨관 하부 폭
h := 29.5 cm  # : 플륨관 높이
A_통수 := 1/2*(a + b)*h = 1239 cm^2  # : 통수 단면적
P := b + 2*sqrt(((a - b)/2)^2 + h^2) = 98.3043 cm  # : 윤변
R := A_통수/P = 12.6037 cm  # : 경심
n := 0.014*m^(2/3)*sec/m  # : 수로 조도 계수 (콘크리트 컬버트)
Q_통수 := A_통수*(1/n*R^(2/3)*i_종단^(1/2)) = 0.447717 m^3/s
# 8. 벤치 퓰륨관 설치 연장 검토
L_유역 := (A_통수*(1/n*R^(2/3)*i_종단^(1/2)))*0.8/(C*I*B_유역) = 1551.94 m
# 유로 연장 220m를 초과 하므로 적정
