# (제1공구) 응달교 차선전환가도 배수간격 검토 (2구간)
# STA 5+740 ~ STA 5+860  (120m)
# 1. 유역면적
B_start := 1.0 m + 2*3.6*m + 2*3.5*m + 1.6/2*m = 16 m  # : 유로폭
B_end := 1.0 m + 2*3.6*m + 3 m = 11.2 m  # : 유로폭
L_유역 := 5860 m - 5740 m = 120 m  # : 유로 연장
A_유역 := (B_start + B_end)/2*L_유역 = 1632 m^2  # : 유역 면적
# 2. 유출량 계산
C := 0.9  # : 유출계수
I := 94.2*mm/hr  # : 강우 강도 (부산지역 3년빈도)
# 3. 통수량 계산 (기존단면)
i_종단 := 0.00262  # : 종단 경사
i_횡단 := 0.06  # : 횡단 경사
b := 100 cm  # : 유로폭
h := b*i_횡단 = 6 cm  # : 수심
A_통수 := 1/2*b*h = 300 cm^2  # : 통수 단면적
P := h + sqrt(b^2 + h^2) = 106.18 cm  # : 윤변
R := A_통수/P = 2.8254 cm  # : 경심
n := 0.015*m^(2/3)*sec/m  # : 수로 조도 계수
# 4. 배수거 간격 검토
L_유역 := (A_통수*(1/n*R^(2/3)*i_종단^(1/2)))/(C*I*B_start) = 25.2032 m  # 따라서 23m 마다 집수거를 설치하여야 한다
