# (제1공구) 응달교 차선전환가도 배수간격 검토 (3구간)
# STA 5+760 ~ STA 6+080  (320m)
# 1. 유역면적
B_유역 := 1.6/2*m + 2*3.5*m + 2 m = 9.8 m  # : 유로폭
L_유역 := 6080 m - 5760 m = 320 m  # : 유로 연장
A_유역 := B_유역*L_유역 = 3136 m^2  # : 유역 면적
# 2. 유출량 계산
C := 0.9  # : 유출계수
I := 94.2*mm/hr  # : 강우 강도 (부산지역 3년빈도)
# 3. 통수량 계산 (기존단면)
EL_5760 := 2.216 m
EL_6040 := 8.846 m
i := (8.846 - 2.216)/(6040 - 576) = 0.0012134
i_종단 := 0.0012  # : 종단 경사
i_횡단 := 0.06  # : 횡단 경사
b := 250 cm  # : 유로폭
h := b*i_횡단 = 15 cm  # : 수심
A := 1/2*b*h = 1875 cm^2  # : 통수 단면적
P := h + sqrt(b^2 + h^2) = 265.45 cm  # : 윤변
R := A/P = 7.06349 cm  # : 경심
n := 0.015*m^(2/3)*sec/m  # : 수로 조도 계수
# 4. 노면수 배수 검토
V := 1/n*R^(2/3)*i_종단^(1/2) = 0.39462 m/s
L_유역 := A*V/(C*I*B_유역) = 320.6 m  # 따라서 노면 2.5m 만큼 물이 차서 흐르게 된다.
# 5. 통수량 계산 (횡단배수관)
i_횡단 := 0.0016  # : 횡단 배수관 종단 경사
D := 45 cm  # : 횡단배수관 직경
A := 1/4*π*D^2*(215/360) + (D/2*sin(72.5*π/180)*D/2*cos(72.5*π/180)*1/2)*2 = 1095.03 cm^2
0.5408*D^2 = 1095.12 cm^2
# : 통수 단면적
sin(45*π/180) = 0.707107
1/sqrt(2) = 0.707107
P := π*D*(215/360) = 84.4303 cm  # : 윤변
1.87623*D = 84.4304 cm
R := A/P = 12.9696 cm  # : 경심
0.2882*D = 12.969 cm
n := 0.015*m^(2/3)*sec/m  # : 수로 조도 계수
V := 1/n*R^(2/3)*i_횡단^(1/2) = 0.683261 m/s
# 6. 횡단배수관 규격 검토
Q_통수 := A*V = 0.0748189 m^3/s
Q_유출 := C*I*A_유역 = 0.0738528 m^3/s
횡단배수관_규격_검토 :=
    "O.K" if Q_유출 < Q_통수
    "N.G" otherwise
    = "O.K"
i_횡단 := (C*I*A_유역/(A*(1/n*R^(2/3))))^2 = 0.00155895
