# (제1공구) 응달교 차선전환가도 배수간격 검토 (2구간)
# ( 5+500 ~ 6+080 )
# STA 5+500 ~ STA 6+080
L := 6080 m - 5500 m = 580 m
# 교통전환 가도 설치 개통 후
# 1. 유역면적
B_유역1 := 2.0 m + 2*3.5*m + 1.6 m + 2*3.5*m + 2.0 m = 19.6 m
B_유역2 := 2.0 m + 2*3.5*m + 1.6 m + 2*3.5*m + 2.0 m = 19.6 m
B_유역3 := 3.0 m + 2*3.6*m + 2.0 m + 2*3.6*m + 3.0 m = 22.4 m  # : 유로폭
L_유역1 := 6080 m - 5860 m = 220 m
L_유역2 := 5860 m - 5740 m = 120 m
L_유역3 := 5740 m - 5500 m = 240 m  # : 유로 연장
A_유역 := B_유역1*L_유역1 + B_유역2*L_유역2 + B_유역3*L_유역3 = 12040 m^2  # : 유역 면적
# 2. 유출량 계산
C := 0.9  # : 유출계수
I := 94.2*mm/hr  # : 강우 강도 (부산지역 3년빈도)
# 3. 통수량 계산 (기존단면)
i_종단 := 0.0405  # : 종단 경사
i_횡단 := 0.05  # : 횡단 경사
b := 2 m  # : 유로폭
h := b*i_횡단 = 10 cm  # : 수심
A_통수 := 1/2*b*h = 1000 cm^2  # : 통수 단면적
P := h + sqrt(b^2 + h^2) = 210.25 cm  # : 윤변
R := A_통수/P = 4.75625 cm  # : 경심
n := 0.015*m^(2/3)*sec/m  # : 수로 조도 계수
# 4. 배수거 간격 검토
Q_통수 := A_통수*(1/n*R^(2/3)*i_종단^(1/2)) = 0.176122 m^3/s
L_유역 := (A_통수*(1/n*R^(2/3)*i_종단^(1/2)))/(C*I*B_유역1) = 381.562 m  # 따라서 50m 마다 집수거를 설치하여야 한다
# 5. V1형 측구 설치 시 통수량 게산
i_V형측구 := 0.0405  # : V형 측구 종단 경사
b_하부 := 50 cm  # : V형 측구 하부 폭
b_측벽 := 13.5 cm  # : V형 측구 측벽 폭
b_상부 := b_하부 + 2*b_측벽 = 77 cm  # : V형 측구 상부 폭
h := 45 cm  # : V형 측구 높이
A_통수 := 1/2*(b_상부 + b_하부)*h = 2857.5 cm^2  # : 통수 단면적
P := b_하부 + 2*sqrt(b_측벽^2 + h^2) = 143.963 cm  # : 윤변
R := A_통수/P = 19.8489 cm  # : 경심
n := 0.015*m^(2/3)*sec/m  # : 수로 조도 계수
Q_통수 := A_통수*(1/n*R^(2/3)*i_종단^(1/2)) = 1.30451 m^3/s
# 6. V형 측구 설치 연장 검토
L_유역 := (A_통수*(1/n*R^(2/3)*i_종단^(1/2)))*0.8/(C*I*B_유역1) = 2260.94 m
# 유로 연장 220m를 초과 하므로 적정
# 7. 통수량 계산 (벤치 플륨관 450)
i_V형측구 := 0.0405  # : 종단 경사
a := 45 cm  # : 플륨관 상부 폭
b := 39 cm  # : 플륨관 하부 폭
h := 29.5 cm  # : 플륨관 높이
A_통수 := 1/2*(a + b)*h = 1239 cm^2  # : 통수 단면적
P := b + 2*sqrt(((a - b)/2)^2 + h^2) = 98.3043 cm  # : 윤변
R := A_통수/P = 12.6037 cm  # : 경심
n := 0.014*m^(2/3)*sec/m  # : 수로 조도 계수 (콘크리트 컬버트)
Q_통수 := A_통수*(1/n*R^(2/3)*i_종단^(1/2)) = 0.447717 m^3/s
# 8. 벤치 퓰륨관 설치 연장 검토
L_유역 := (A_통수*(1/n*R^(2/3)*i_종단^(1/2)))*0.8/(C*I*B_유역1) = 775.972 m
# 유로 연장 220m를 초과 하므로 적정
# 9. 통수량 계산 (횡단배수관)
i_횡단 := 0.03  # : 횡단 배수관 종단 경사
D := 45 cm  # : 횡단배수관 직경
A := 1/4*π*D^2*(215/360) + (D/2*sin(72.5*π/180)*D/2*cos(72.5*π/180)*1/2)*2 = 1095.03 cm^2
# : 통수 단면적
P := π*D*(215/360) = 84.4303 cm  # : 윤변
R := A/P = 12.9696 cm  # : 경심
n := 0.015*m^(2/3)*sec/m  # : 수로 조도 계수
V := 1/n*R^(2/3)*i_횡단^(1/2) = 2.95861 m/s
# 10. 횡단배수관 규격 검토
# 1) 통수량 계산
A = 0.109503 m^2
V = 2.95861 m/s
Q_통수 := A*V = 0.323975 m^3/s
# 2) 유출량 계산
C = 0.9
I = 94.2 mm/hr
A_유역 = 12040 m^2
Q_유출 := C*I*A_유역 = 0.283542 m^3/s
0.9*94.2*(1/1000*1/(60*60))*2156 = 0.0507738
# 3) 횡단배수관 규격 및 설치 경사 검토
횡단배수관_규격_검토 :=
    "O.K" if Q_유출 < Q_통수
    "N.G" otherwise
    = "O.K"
i_횡단 := (C*I*A_유역/(A*(1/n*R^(2/3))))^2 = 0.022979
