# (제1공구) 응달교 차선전환가도 배수간격 검토
# 1. 유역면적
B_유역 := 0.8 m + 2*3.5*m + 2.0 m = 9.8 m
# 2. 유출량 계산
C := 0.9  # : 유출계수
I := 94.2*mm/hr  # : 강우 강도 (부산지역 3년빈도)
# 3. 통수량 계산 (기존단면)
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i_종단 := 0.0405  # : 종단 경사
i_횡단 := 0.05  # : 횡단 경사
b := 50 cm  # : 유로폭
h := b*i_횡단 = 0.025 m  # : 수심
A_통수 := 1/2*b*h = 0.00625 m^2  # : 통수 단면적
P := h + sqrt(b^2 + h^2) = 0.525625 m  # : 윤변
n := 0.015*m^(2/3)*sec/m  # : 수로 조도 계수
R := A_통수/P = 0.0118906 m  # : 경심
Q_통수 := A_통수*(1/n*R^(2/3)*i_종단^(1/2)) = 0.00436837 m^3/s
# 4. 배수거 간격 검토
L_유역 := (A_통수*(1/n*R^(2/3)*i_종단^(1/2)))/(C*I*B_유역) = 18.9279 m
# 5. 통수량 계산 (변경단면)
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b_ditch := 12 cm  # : 보완 수로폭
h_ditch := 5 cm  # : 보완 수로 깊이
h_1 := b*i_횡단 = 0.025 m
h_2 := (b - b_ditch)*i_횡단 = 0.019 m
A_통수 := (b_ditch*(h_ditch + h_1)) + (1/2*(b - b_ditch)*h_2) = 0.01261 m^2  # : 통수 단면적
P := (h_1 + h_ditch) + b_ditch + (h_ditch + (h_1 - h_2)) + sqrt((b - b_ditch)^2 + h_2^2) = 0.631475 m  # : 윤변
R := A_통수/P = 0.0199691 m  # : 경심
# 6. 배수거 간격 검토
L_유역 := (A_통수*(1/n*R^(2/3)*i_종단^(1/2)))/(C*I*B_유역) = 53.9561 m
