# (제1공구) 응달교 차선전환가도 배수간격 검토
#
# ( 배수유역 1+2+4 )
# ( 6+320 ~ 6+080 ) | STA 6+080 ~ STA 6+320
# 1. 유역면적
# : 유로폭
B_유역1 := 16.4 m + 26.3 m = 42.7 m  # : 6+200~6+320 구간 ( 본선 + 절토부)
B_유역2 := 2.5 m + 26.3 m = 28.8 m  # : 6+200~6+080 구간 ( 본선길어깨 + 절토부 )
L_시점 := 6320 m
L_유역1 := 6320 m - 6220 m = 100 m
L_유역2 := 6220 m - 6080 m = 140 m
# : 유로 연장
A_유역 := (B_유역1*L_유역1) + (B_유역2*L_유역2) = 8302 m^2  # : 유역 면적
# 2. 유출량 계산
C := 0.9  # : 유출계수
I := 134.4*mm/hr  # : 강우 강도 (부산지역 10년빈도)
# 3. 통수량 계산 (저판삭제 L측구)
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i_종단 := 0.025542  # : 종단 경사
i_횡단 := 0.04  # : 횡단 경사
b := 2.5 m  # : 유로폭
2.5*0.05 = 0.125
h := b*i_횡단 = 10 cm  # : 수심
A_통수 := 1/2*b*h = 1250 cm^2  # : 통수 단면적
P := h + sqrt(b^2 + h^2) = 260.2 cm  # : 윤변
R := A_통수/P = 4.804 cm  # : 경심
n := 0.015*m^(2/3)*sec/m  # : 수로 조도 계수
# 4. 배수거 간격 검토
Q_통수 := A_통수*(1/n*R^(2/3)*i_종단^(1/2)) = 0.176001 m^3/s
Q_유출 := (C*I*L_유역1*B_유역1) + (C*I*L_유역2*B_유역2) = 0.278947 m^3/s
L := ((A_통수*(1/n*R^(2/3)*i_종단^(1/2))) - (C*I*B_유역1*L_유역1))/(C*I*B_유역2) = 33.6153 m
L_초기설치 := L_유역1 + L = 133.615 m
L_시점 - L_초기설치 = 6186.38 m
# 5. 통수량 계산 (횡단배수관)
i_횡단 := 0.04  # : 횡단 배수관 종단 경사
D := 45 cm  # : 횡단배수관 직경
A := 1/4*π*D^2*(215/360) + (D/2*sin(72.5*π/180)*D/2*cos(72.5*π/180)*1/2)*2 = 1095.03 cm^2
# : 통수 단면적
P := π*D*(215/360) = 84.4303 cm  # : 윤변
R := A/P = 12.9696 cm  # : 경심
n := 0.015*m^(2/3)*sec/m  # : 수로 조도 계수
V := 1/n*R^(2/3)*i_횡단^(1/2) = 3.4163 m/s
Q_통수 := A*V = 0.374095 m^3/s
A_유역 := B_유역1*(L_유역1 + L_유역2) = 10248 m^2
Q_유출 := C*I*A_유역 = 0.344333 m^3/s
횡단배수관_규격_검토 :=
    "O.K" if Q_유출 < Q_통수
    "N.G" otherwise
    = "O.K"
i_횡단 := (C*I*A_유역/(A*(1/n*R^(2/3))))^2 = 0.0338886
