# 중분대 종배수관 기계타설에 구조 및 수리  안정성 검토
tonf := 1000 kgf
# 1. 설계 조건
# 1) 설계 개요
# 중분대종배수관의 시공 시 포장 공종과의 중첩으로 인해 집수정 설치에 장기간이  소요되므로 선배수공법의 적용을 통한 집수정 설치를 최소화 하고 이를 기계로 타설할 경우 시공성 및 경제성이 향상되므로 기계 타설 시 중분대의 배수규격 및 단면규격의 구조 적정성을 검토
# 2 ) 사용 재료
f_ck := 270*kgf/cm^2
# 3 ) 작용 하중
γ_conc := 2.35*tonf/m^3  # : 콘크리트 단위 중량
# W_L | : 활하중 강도
# 2. 단면 가정
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# 3. 단면 검토 (우측)
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# 1) 고정 하중
# 콘크리트
# 단위중량
γ_conc := 2.35*tonf/m^3
# 단면적
A_D := 110425 mm^2 = 0.110425 m^2
L_D := 1.0 m
W_D := A_D*L_D*γ_conc = 0.259499 tonf
x_D := 153 mm  # 무게 작용점
e_D := x_D - 150 mm/2 = 0.078 m  # 편심거리
M_D := W_D*e_D = 0.0202409 tonf*m
# 2) 활하중 Moment
# 활하중 축하중 강도
P := 96 kN
# (1) 접지 길이 계산
(2.5*L)*(1.0*L) == 12500/9*P
L_L := sqrt(12500/(9 kN)*P*1/2.5)*mm = 230.94 mm
# 활하중
# 작용 길이
# (2) 접지폭 산정
B_L := 2.5*L_L = 577.35 mm
# 활하중
# 작용 폭
# (3) 활하중 접지압
W_L := P/(L_L*B_L) = 0.72 MPa  # 활하중 강도
W_L = 73.4196 tonf/m^2
# (4) 활하중 작용 편심거리
# 활하중 접지폭이 B_L = 577.35 mm 로 전체폭 383mm를 초과하므로
e_L := (383 mm/2) - 150 mm/2 = 0.1165 m
# 활하중 작용 편심거리
# (검토단면 도심 기준)
# (5) 활하중 모멘트 계산
M_L := (W_L*383*mm*L_L)*e_L = 0.756547 tonf*m
# 3 ) 단면응력 검토
# 단면의 폭
b := 408 mm + L_L + 408 mm = 1.04694 m
# 단면의 높이
h := 15 cm
# 단면2차 모멘트
I := b*h^3/12 = 29445.2 cm^4
# 단면 연단거리
y := h/2 = 7.5 cm
# 사하중 모멘트
M_D = 0.198495 kN*m
# 활하중 모멘트
M_L = 7.41919 kN*m
M := M_D + M_L*(1 + 0.3) = 1.00375 tonf*m  # : 활하중 충격 포함
σ := M/I*y = 25.5666 kgf/cm^2
f_ck = 270 kgf/cm^2
f_r := 2*(kgf/cm^2)^(1/2)*sqrt(f_ck) = 32.8634 kgf/cm^2
Bending_Check :=
    "O.K" if σ < f_r
    "N.G" otherwise
    = "O.K"
# 4. 단면 검토 (좌측)
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# 1) 고정 하중
# 콘크리트
# 단위중량
γ_conc := 2.35*tonf/m^3
# 단면적
A_D := 91065 mm^2 = 0.091065 m^2
L_D := 1.0 m
W_D := A_D*L_D*γ_conc = 0.214003 tonf
x_D := 177 mm  # 무게 작용점
e_D := x_D - 150 mm/2 = 0.102 m  # 편심거리
M_D := W_D*e_D = 0.0218283 tonf*m
# 2) 활하중 Moment
# 활하중 축하중 강도
P := 96 kN
# (1) 접지 길이 계산
(2.5*L)*(1.0*L) == 12500/9*P
L_L := sqrt(12500/(9 kN)*P*1/2.5)*mm = 230.94 mm
# 활하중
# 작용 길이
# (2) 접지폭 산정
B_L := 2.5*L_L = 577.35 mm
# 활하중
# 작용 폭
# (3) 활하중 접지압
W_L := P/(L_L*B_L) = 0.72 MPa  # 활하중 강도
W_L = 73.4196 tonf/m^2
# (4) 활하중 작용 편심거리
# 활하중 접지폭이 B_L = 577.35 mm 로 전체폭 383 mm - 121 mm = 262 mm를 초과하므로
e_L := (121 mm + 262 mm/2) - 150 mm/2 = 0.177 m
# 활하중 작용 편심거리
# (검토단면 도심 기준)
# (5) 활하중 모멘트 계산
M_L := (W_L*(383 mm - 121 mm)*L_L)*e_L = 0.786295 tonf*m
# 3 ) 단면응력 검토
# 단면의 폭
b := 408 mm + L_L + 408 mm = 1.04694 m
# 단면의 높이
h := 15 cm
# 단면2차 모멘트
I := b*h^3/12 = 29445.2 cm^4
# 단면 연단거리
y := h/2 = 7.5 cm
# 사하중 모멘트
M_D = 0.214062 kN*m
# 활하중 모멘트
M_L = 7.71092 kN*m
M := M_D + M_L*(1 + 0.3) = 1.04401 tonf*m
σ := M/I*y = 26.5921 kgf/cm^2
f_ck = 270 kgf/cm^2
f_r := 2*(kgf/cm^2)^(1/2)*sqrt(f_ck) = 32.8634 kgf/cm^2
Bending_Check :=
    "O.K" if σ < f_r
    "N.G" otherwise
    = "O.K"
# 5. 오리피스 크기 계산
# 1) 유출량 계산
B := 1.5 m + 4*3.6*m + 3.0 m = 18.9 m  # : 유역 폭 ( 편도 2차로의 경우 )
A := B*1*m = 18.9 m^2  # : 유역 면적 ( 단위 길이 )
I := 134.4*mm/hr  # : 강우 강도  # ( 부산지역, 10년 빈도 )
C := 0.9  # : 유출 계수  # ( 포장면 )
Q := C*I*A = 0.00063504 m^3/s
# 2 ) 배출량 계산
h := 0.5 m*0.02 = 0.01 m  # : 수심  # ( 횡단 경사 2%인 경우 )
c := 0.62  # : 유량 계수
a := 1.0 m  # : 오리피스 길이 ( 단위 길이 )
# t | : 오리피스 설치 폭
g = 9.80665 m/s^2  # : 중력 가속도
Q := c*(a*t)*sqrt(2*g*H)  # disabled
t := C*I*A/(c*a*sqrt(2*g*h)) = 2.31278 mm
# 따라서 t = 2.31278 mm 이상 확보할 경우 통수에는 문제가 없을 것으로 판단됨
# 6. 단면 검토 (우측) ( 활하중 편기 재하 )
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# 1) 고정 하중
# 콘크리트
# 단위중량
γ_conc := 2.35*tonf/m^3
# 단면적
A_D := 110425 mm^2 = 0.110425 m^2
L_D := 1.0 m
W_D := A_D*L_D*γ_conc = 0.259499 tonf
x_D := 153 mm  # 무게 작용점
e_D := x_D - 150 mm/2 = 0.078 m  # 편심거리
M_D := W_D*e_D = 0.0202409 tonf*m
# 2) 활하중 Moment
# 활하중 축하중 강도
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P := 96 kN
# (1) 접지 길이 계산
(2.5*L)*(1.0*L) == 12500/9*P
L_L := sqrt(12500/(9 kN)*P*1/2.5)*mm = 230.94 mm
# 활하중
# 작용 길이
# (2) 접지폭 산정
B_L := 2.5*L_L = 577.35 mm
# 활하중
# 작용 폭
# (3) 활하중 접지압
W_L := P/(L_L*B_L) = 0.72 MPa  # 활하중 강도
W_L = 73.4196 tonf/m^2
# (4) 활하중 작용 편심거리
# 활하중 접지폭이 B_L = 577.35 mm 로 전체폭 383mm를 초과하므로
e_L := ((383 mm - 150 mm/2)/2) = 15.4 cm
# 활하중 작용 편심거리
# (검토단면 도심 기준)
# (5) 활하중 모멘트 계산
M_L := (W_L*(383 mm - 150 mm/2)*L_L)*e_L = 0.804234 tonf*m
# 3 ) 단면응력 검토
# 단면의 폭
b := 408 mm + L_L + 408 mm = 1.04694 m
# 단면의 높이
h := 15 cm
# 단면2차 모멘트
I := b*h^3/12 = 29445.2 cm^4
# 단면 연단거리
y := h/2 = 7.5 cm
# 사하중 모멘트
M_D = 0.198495 kN*m
# 활하중 모멘트
M_L = 7.88684 kN*m
M := M_D + M_L*(1 + 0.3) = 1.06575 tonf*m  # : 활하중 충격 포함
σ := M/I*y = 27.1457 kgf/cm^2
f_ck = 270 kgf/cm^2
f_r := 2*(kgf/cm^2)^(1/2)*sqrt(f_ck) = 32.8634 kgf/cm^2
Bending_Check :=
    "O.K" if σ < f_r
    "N.G" otherwise
    = "O.K"
σ/f_r = 82.6016 %
