# 【 길어깨에서 통수할 수 있는 통수량 】
I := 125.97*mm/hr
B_1 := 2.5 m
L := 2.40 m
S := 4 %
# 수위
h_w := B_1*S = 0.1 m
# 집수폭
B_2 := 0.25*h_w = 0.025 m
B_2 = 0.082021 ft
B_w := B_1 + B_2 = 2.525 m
B_w = 8.28412 ft
# 통수 면적
A_w := 1/2*B_w*h_w = 0.12625 m^2
A_w = 1.35894 ft^2
# 윤변
S := sqrt(B_1^2 + h_w^2) + sqrt(B_2^2 + h_w^2) = 2.60508 m
S = 8.54684 ft
# 경심
R := A_w/S = 0.0484631 m
R = 0.159 ft
# 유속
n := 0.015*m^(2/3)*sec/m
1*m^(2/3)*sec/m = 0.672984 s/ft^(1/3)
1/0.673 = 1.48588
1/n = 66.6667 m^(1/3)/s
1/n = 99.0612 ft^(1/3)/s
1/0.015 = 66.6667
1.49/0.015 = 99.3333
R = 0.0484631 m
I := 1.5602/100
V := 1/n*R^(2/3)*I^(1/2) = 1.10689 m/s
V = 3.63154 ft/s
# 횡단 및 종단 합성 다이크 통수량
Q := A_w*V = 0.139745 m^3/s
Q = 4.93506 ft^3/s
K := 0.6
S := 0.03
n := 0.015
1/n = 66.6667
Q := 1*ft^3/sec
S_x := 0.03  # : 길어깨 횡단경사
a := 0.04  # : 측구 깊이
W := 1 ft
S_w := a/(12*W) = 0.00333333 1/ft
S_e := S_x + S_w*E_o  # error: This variable is undefined.
L_T := K*Q^0.42*S^0.3*(1/(n*S_e))^0.6  # error: This variable is undefined.
A := 0.507 ft^2
n := 0.015*m^(2/3)*sec/m
n = 0.0100948 s/ft^(1/3)
0.015/1.49 = 0.0100671
S := 0.061 ft
1/1.49 = 0.671141
1.49^0.6 = 1.27032
S^(2/3) = 0.15496 ft^(2/3)
1/1.27 = 0.787402
V := 1/n*S^(2/3) = 15.3505 ft/s
Q := A*V = 7.78272 ft^3/s
Q_1 := 0.507*1/0.015*0.061^(2/3) = 5.23765
Q_2 := 0.507*1.486/0.015*0.061^(2/3) = 7.78315
