W_82 := 96.446*10^6  # 설계기간동안의 8.2톤 등가단축하중(ESAL)의 설계차로당 누가통과 횟수
Pt := 2.5  # 최종서비수지수
J := 3.2  # 하중전달계수
Sc := 480  # 콘크리트슬래브의 설계휨강도(psi)
Ec := 4.0*10^6  # 콘크리트 슬래브의 설계탄성계수(psi)
Kc := 670  # 콘크리트 슬래브의 접속면에서의 노상지지력계수(pci)
Gt := log((4.5 - Pt)/(4.5 - 1.5)) = -0.176091
f(D) := (7.35*log(D + 1)) - 0.06 + Gt/(1 + 1.624*10^7/(D + 1)^8.46) + (4.22 - 0.32*Pt)*log(Sc*(D^0.75 - 1.132)/(215.63*J*(D^0.75 - 18.42/(Ec/Kc)^0.25))) - log(W_82)
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D := 10
r := root(f(D), D, 10, 20)
r = 13.2953
D_m := r*2.54 = 33.77
