tonf := 1000 kgf
in = 2.54 cm
## 콘크리트 포장 설계
## ( 3공구 시점부 가도 포장 설계 )
## ( 다웰바 미사용 )
# 1. 검토 조건
# 【 교통 조건 】
W_82 := 4.542*10^6  # 설계기간동안의 8.2톤 등가단축하중(ESAL)의 설계차로당 누가통과 횟수
W_82 := W_82*1.5 = 6813000
# 【 서비스 지수  】
Pt := 2.5  # 최종서비수지수
# 【 하중 전달 계수  】
J := 3.2  # 하중전달계수
# 다웰바 사용
2.9
# 다웰바 미사용 | 3.2
# 【 노상 물성치 】
CBR := 10
# 【 동상 방지층 물성치 】
D_동방층 := 20*cm
E_동방층 := 1.5*10^4*psi
# 【 린콘크리트 기층 물성치 】
D_린기층 := 0*cm
E_린기층 := 2000000*psi
# 【 콘크리트 슬래브 물성치 】
S_c := 640*0.75*psi  # 콘크리트슬래브의 설계휨강도(psi)
S_c = 33.7473 kgf/cm^2
E_c := 4.0*10^6*psi  # 콘크리트 슬래브의 설계탄성계수(psi)
# 2. 합성노상반력계수 산정
# 1) 노상 상단의 K값 산정
# (1) 시방규정의 의한 값
K_30 := 15*kgf/cm^3
K_75.case1 := 1/2.2*K_30 = 6.81818 kgf/cm^3
K_75.case1 = 246.322 pounds_per_cubic_inch
# (2) CBR과 K값의 상관도표
# CBR과 K값의 상관도표에서 CBR값이 10인 경우
K_75.case2 := 5.6*kgf/cm^3
K_75.case2 = 202.313 pounds_per_cubic_inch
# (3) 노상 K값 산정
K_노상 := max(K_75.case1, K_75.case2) = 246.322 pounds_per_cubic_inch
# (4) 노상 회복탄성계수 산정
M_R.노상 := K_노상*24*in = 5911.74 psi
# 흙쌓기 (다짐도90% 이상)의 동탄성계수(MR)은 AASHTO Guide에서는 K값과 MR과의 관계식으로 추정한다.
# 2) 동상방지층 상단의 합성K값 산정
# 【 검토 조건 】
D_동방층 = 20 cm
E_동방층 = 15000 psi
D_SB := D_동방층 = 7.87402 in
E_SB := E_동방층 = 15000 psi
M_R := M_R.노상 = 5911.74 psi
# 【 단위 삭제 】
D_SB := D_SB*1/in = 7.87402
E_SB := E_SB*1/psi = 15000
M_R := M_R*1/psi = 5911.74
# 【 지수부 계산 】
lnK := -2.807 + 0.1253*ln(D_SB)^2 + 1.062*ln(M_R) + 0.1282*ln(D_SB)*ln(E_SB) - 0.4114*ln(D_SB) + (-0.0581*ln(E_SB) - 0.1317*ln(D_SB)*ln(M_R)) = 5.72568
# 【 동상방지층 상단의 합성K값 산정 】
K := e^lnK = 306.642
K := K*pci = 306.642 pounds_per_cubic_inch
K_동방층 := K
# 【 동상방지층 회복탄성계수 】
M_R.동방층 := K_동방층*24*in = 7359.42 psi
# 3) 보조기층(린콘크리트트기층)  상단의 합성K값 산정
# 【 검토 조건 】
D_린기층 = 0 cm
E_린기층 = 2000000 psi
# 【 변수 치환 】
D_SB := D_린기층 = 0 in
E_SB := E_린기층 = 2000000 psi
M_R := M_R.노상 = 5911.74 psi
# 【 단위 삭제 】
D_SB := D_SB*1/in = 0
E_SB := E_SB*1/psi = 2000000
M_R := M_R*1/psi = 5911.74
# 【 지수부 계산 】
lnK := -2.807 + 0.1253*ln(D_SB)^2 + 1.062*ln(M_R) + 0.1282*ln(D_SB)*ln(E_SB) - 0.4114*ln(D_SB) + (-0.0581*ln(E_SB) - 0.1317*ln(D_SB)*ln(M_R))  # error: This function is undefined at one or more of the specified points.
# 【 린콘크리트 기층 상단의 합성K값 산정 】
K := e^lnK  # error: This variable is undefined.
K := K*pci = pci  # error: This variable is undefined.
K_린기층 := K = pci  # error: This variable is undefined.
# 【 린콘크리트 기층 회복탄성계수 】
M_R.린기층 := K_린기층*24*in  # error: This variable is undefined.
# 4) 합성K값 산정
K_c := K_동방층 = 306.642 pounds_per_cubic_inch
# 콘크리트 슬래브의 접속면에서의 노상지지력계수(pci)
K_c = 8.48783 kgf/cm^3
K_c := 3.0*kgf/cm^3
K_c = 108.382 pounds_per_cubic_inch
# 3. 콘크리트 슬래브 두께 산정
# 【 검토 조건 】
Pt = 2.5
Gt := log((4.5 - Pt)/(4.5 - 1.5)) = -0.176091
S_c = 480 psi
E_c = 4000000 psi
K_c = 108.382 pounds_per_cubic_inch
J = 3.2
# 【 단위 삭제 】
S_c := S_c*1/psi = 480
E_c := E_c*1/psi = 4000000
K_c := K_c*1/pci = 108.382
# 【 콘크리트 슬래브 두께 산정 】
f(D) := (7.35*log(D + 1)) - 0.06 + Gt/(1 + 1.624*10^7/(D + 1)^8.46) + (4.22 - 0.32*Pt)*log(S_c*(D^0.75 - 1.132)/(215.63*J*(D^0.75 - 18.42/(E_c/K_c)^0.25))) - log(W_82)
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D := 5
r := root(f(D), D, 5, 20)
r = 9.59084
D := r*in = 24.3607 cm
D_콘슬래브 := D
10 in = 25.4 cm
# 【 해석 결과 】
W_82 = 6813000
D_동방층 = 0.2 m
D_린기층 = 0 cm
D_콘슬래브 = 24.3607 cm
