# 아스팔트 콘크리트 포장 두께 설계
# 【 검토조건 】
# W_8.2 | 양방향 누가 8.2tonf 등가단축하중 교통량
# D_D | 방향별 분배계수
# D_L | 차로별 분배계수
# P_t | 최종 서비스지수
# R_f | 지역계수
# 설계공용기간 동안의
# 8.2톤 등가단축하중의
# 누가통과횟수
W_82 := 50.024*10^6
# 서비스 지수
P_t := 2.5
# 지역계수
R_f := 1.5
G_t := log((4.2 - P_t)/(4.2 - 1.5)) = -0.200915
# 【 보조기층 상단 】
# 설계 CBR
CBR := 50
# 노상지지력계수
SSV := 3.8*log(CBR) + 1.3 = 7.75609
f(SN_2) := (9.36*log(SN_2 + 1) - 0.20 + log((4.2 - P_t)/(4.2 - 1.5))/(0.4 + 1094/(SN_2 + 1)^5.19) + log(1/R_f) + 0.372*(SSV - 3.0)) - log(W_82)
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SN_2 := 5
SN_2 := root(f(SN_2), SN_2, 0, 10)
SN_2 = 4.10106
a := log(W_82) = 7.69918
b := 9.36*log(SN_2 + 1) = 6.6237
c := 0.2
d := G_t/(0.4 + 1094/(SN_2 + 1)^5.19) = -0.317696
e := log(1/R_f) = -0.176091
f := 0.372*(SSV - 3.0) = 1.76926
b - c + d + e + f = 7.69918
# 【 노상층 상단 】
# 설계 CBR
CBR := 8.62
# 노상지지력계수
SSV := 3.8*log(CBR) + 1.3 = 4.85493
f(SN_3) := (9.36*log(SN_3 + 1) - 0.20 + log((4.2 - P_t)/(4.2 - 1.5))/(0.4 + 1094/(SN_3 + 1)^5.19) + log(1/R_f) + 0.372*(SSV - 3.0)) - log(W_82)
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SN_3 := 4
SN_3 := root(f(SN_3), SN_3, 0, 10)
SN_3 = 5.8668
# 【 포장 두께 산출 】
# 【 표층 】
a_11 := 0.157 cm^-1
D_11 := 5 cm
SN_11 := a_11*D_11 = 0.785
# 【 중간층 】
a_12 := 0.145*cm^-1
D_12 := 7 cm
SN_12 := a_12*D_12 = 1.015
# 【 아스팔트 콘크리트 】
SN_1 := SN_11 + SN_12 = 1.8
D_1 := D_11 + D_12 = 12 cm
# 【 아스콘기층 】
SN_2 = 4.10106
a_2 := 0.110*cm^-1
D_2 := (SN_2 - SN_1)/a_2 = 20.9187 cm
D_2 := 22 cm
SN'_2 := SN_1 + a_2*D_2 = 4.22
SN_2 = 4.10106
SN_2check :=
    "O.K" if SN_2 < SN'_2
    "N.G" otherwise
    = "O.K"
# 【 보조기층 】
SN_3 = 5.8668
a_3 := 0.048*cm^-1
D_3 := (SN_3 - SN'_2)/a_3 = 34.3084 cm
D_3 := 36 cm
SN'_3 := SN'_2 + a_3*D_3 = 5.948
SN_3check :=
    "O.K" if SN_3 < SN'_3
    "N.G" otherwise
    = "O.K"
D_11 = 5 cm
D_12 = 7 cm
D_1 = 12 cm
D_2 = 22 cm
D_3 = 36 cm
ΣD := D_1 + D_2 + D_3 = 70 cm
