log(91.291*10^6) = 7.96043
Pt := 2.5
J := 3.2
Sc := 480
Ec := 4.0*10^6
Kc := 670
Gt := log((4.5 - Pt)/(4.5 - 1.5)) = -0.176091
f(D) := (7.35*log(D + 1)) - 0.06 + (Gt/(1 + 1.624*10^7/(D + 1)^8.46)) + (4.22 - 0.32*Pt)*log(Sc*(D^0.75 - 1.132)/(215.63*J*(D^0.75 - 18.42/(Ec/Kc)^0.25)))
Given
10 ≤ D ≤ 30
f(D) == 7.96
Find(D)  # error: No solution was found.
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