# (제1공구) 주촌교 교각 강재 거푸집 구조계산서 검토
tonf := 1000 kgf
ton := 1000 kg
1 kgf = 9.80665 N
1*tonf = 9.80665 kN
# 1. 일반사항
# 1) 수직하중
r_c := 2.4*tonf/m^3  # : 콘크리트 단위중량
P_R := 0.07*tonf/m^2  # : 폼 단위중량
# 거푸집의 무게는 최소 0.4*kN/m^3 이상을 적용하여야 한다. 다만 특수거푸집인 경우에는 그 실제 거푸집 및 철근의 무게를 적용하여야 한다.
P_R = 0.686466 kN/m^2
# 사용강재의 두께를 t := 4.5 mm로 가정하는 경우
t = 0.45 cm
4.5 mm*7850*kgf/m^3 = 0.34642 kN/m^2
P_L := 0.25*tonf/m^2  # : 작업하중 (충격하중 고려)
# 활하중은 구조물의 수평투영면적 당 최소2.5*kN/m^2 이상으로 설계한다.
P_L = 2.45166 kN/m^2
# 2) 구조용 강재 및 형강자재의 허용응력
σ_b := 1.25*1400*kgf/cm^2 = 1750 kgf/cm^2  # : 구조용 강재의 허용 휨응력
τ_b := 1.25*800*kgf/cm^2 = 1000 kgf/cm^2  # : 구조용 강재의 허용 전단응력
# 가설 시 허용응력 25% 할증 고려
# 3) 볼트의 허용응력
σ_y_bolt := 80*kgf/mm^2  # : 볼트의 극한 인장응력
σ_y_bolt = 784.532 MPa
σ_a_bolt := 0.33*σ_y_bolt = 2640 kgf/cm^2  # : 볼트의 허용 인장응력
A_bolt := π*(3/4*in)^2/4 = 2.85023 cm^2  # : 볼트 1개의 단면적
3/4*in = 1.905 cm
F_b := σ_a_bolt*A_bolt = 7.52461 tonf  # : 볼트 1개의 허용 인장력
# 4) 측압의 정의 (가설공사 표준시방서 2006)
T := 15  # : 콘크리트 타설시 온도
R := 7.08  # : 타설속도
C_W := 24/23  # : 콘크리트 단위중량 계수
C_C := 1  # : 첨가물 계수
P_max := C_W*C_C*(7.2 + 790*R/(T + 18)) = 184.373
# 2. D1800 교각폼
D_pier := 1800 mm
# 1) 콘크리트 타설 속도 계산
H_C := 3.0 m  # : 콘크리트 타설 높이
C_r := 6.0 m^3  # : 레미콘 1대의 콘크리트량
Hr := 20 min  # : 레미콘 1대의 타설 시간
A := π*D_pier^2/4 = 2.54469 m^2  # : 타설 콘크리트의 단면적
V := A*H_C = 7.63407 m^3  # : 타설 콘크리트의 체적
N := V/C_r = 1.27235  # : 타설 콘크리트의 필요 레미콘 대수
t := N*Hr = 25.4469 min  # : 콘크리트 타설 시간
R := H_C/t = 7.07355 m/hr  # : 콘크리트 타설 시간
# 2) 콘크리트 타설 압 계산
T := 15  # : 콘크리트 타설 시 온도
R := 7.08  # : 콘크리트 타설 속도
C_W := 24/23 = 1.04348  # : 콘크리트 단위중량 계수
C_C := 1  # : 첨가물 계수
P_max := C_W*C_C*(7.2 + 790*R/(T + 18)) = 184.373
1.043*(7.2 + 790*7.074/(15 + 18)) = 184.139
P_max1 := P_max*1*kN/m^2 = 184.373 kN/m^2
P_max1 = 1.88008 kgf/cm^2
0.333*1.8*tonf/m^3*30*m = 1.7982 kgf/cm^2
# 3) Steel Plate Check
t := 4.5 mm  # : 플레이트 두께
D_pier = 1.8 m  # : 기둥 부재 직경
P_max1 = 1.88008 kgf/cm^2  # : 콘크리트 타설압
σ_plate := P_max1*D_pier/(2*t) = 36874.6 kN/m^2  # : 강 철판이 받는 응력
σ_plate = 376.017 kgf/cm^2
Steel_Plate_Stress_Check :=
    "O.K" if σ_plate < σ_b
    "N.G" otherwise
    = "O.K"
# 4) 원주 방향 최대 변형량 검토
E := 2.1*10^6*kgf/cm^2
δ_max := P_max1*D_pier^2/(4*E*t) = 0.16115 mm
# 5) Joint Bolt Check
T := P_max1*D_pier/2 = 16.9207 tonf/m
n_bolt := T/F_b = 2.24872 1/m
# 6) 수평 보강재 강도 검토
b_bar := 75 mm  # : 수평 스티퍼너 높이
t_bar := 6 mm  # : 수평 스티퍼너 두께
CTC_bar := 600 mm  # : 수평 스티퍼너 배치 간격
L_bar := π*D_pier = 5654.87 mm  # : 수평 스티퍼너 길이
π*D_pier/2 = 2.82743 m
CTC_bar/2/L_bar = 0.0530516
λ := (1.06 - 3.2*(CTC_bar/2/L_bar) + 4.5*(CTC_bar/2/L_bar)^2)*CTC_bar = 54.174 cm
t = 4.5 mm
A_eff := λ*t = 24.3783 cm^2  # : 유효 단면적
T = 16.9207 tonf/m  # : 단위 길이당 작용력
σ_stiff := T*CTC_bar/A_eff = 4.08402 kN/cm^2
σ_stiff = 416.454 kgf/cm^2
σ_b = 1750 kgf/cm^2
Horizontall_Stiffener_Stress_Check :=
    "O.K" if σ_stiff < σ_b
    "N.G" otherwise
    = "O.K"
# 3. Band Form 검토
# 1 단 콘크리트 타설 후 2단 콘크리트 타설 시 하부(1단) 밴드폼이 상부(2단) 밴드폼을 지지함
# 1) 수직하중 계산
# Form 자중 및 활하중에 의한 하중을 마찰력으로 지지
# 안전발판 (Working Area)
B_w := 65 cm  # : 안전 발판 폭
D_w := D_pier + 2*B_w = 3.1 m  # : 안전 발판 폭을 고려한 직경
A_w := π*(D_w^2 - D_pier^2)/4 = 5.00299 m^2  # ; 안전 발판의 면적
n_W := 1  # : 안전발판의 개수
P_R = 0.07 tonf/m^2
D_pier = 1.8 m
H_C = 3 m
P_L = 0.25 tonf/m^2  # : 활하중
V := P_R*(π*D_pier)*H_C + P_L*A_w*n_W = 2438.27 kgf
# : 안전발판에 작용하는 수직력
1*ton = 1000 kg
1*ton = 101.972 kgf*s^2/m
1000 kg = 1 kN*s^2/m
1000/9.807 = 101.968
1*ton = 0.101972 tonf*s^2/m
1*tonf = 9.80665 kN
1000 kgf = 9.80665 kN
8.896 kN = 907.14 kgf
9.807 kN = 9807 kg*m/s^2
907.14 kgf = 0.90714 tonf
9.807 kN = 1000.04 kgf
1000 kgf = 9.80665 kN
1000 kgf/g = 1 kN*s^2/m
1000 kgf/g = 1000 kg
1000 kg*g = 9.80665 kN
1*tonf = 1000 kgf
1000 kg*g = 1000 kgf
1*tonf = 9806.65 kg*m/s^2
1*tonf = 9.80665 kN
1*tonf/g = 1000 kg
# 2 ) 측압에 의한 마찰력 계산
P_max1 = 184.373 kN/m^2
P_max1 = 1.88008 kgf/cm^2
P_max1 = 18.8008 tonf/m^2
H_band := 1.2 m  # : 밴드 폼 높이
μ := 0.4  # : 밴드 폼의 콘크리트와의 마찰계수
η := 0.8  # : 건조수에 의한 마찰계수의 감소계수
F_U := μ*P_max1*(π*D_pier)*H_band*η = 40825.4 kgf
V = 2438.27 kgf
V/F_U = 0.0597243
