# (제7공구)
# 대동 JCT 본선2교 강재동바리 헌치부 구조 검토
tonf := 1000 kgf
# 【 사용 부재 】
# ㄷ - 200 × 80 × 7.5 / 11T
A := 31.33 cm^2
W_unit := 24.6*kgf/m
I := 1950 cm^4
Z := 195 cm^3
# 【 하중 계산 】
γ_1 := 24000*N/m^3 = 2.44732 tonf/m^3
γ_2 := 3750*N/m^2 = 0.382394 tonf/m^2
γ_3 := 400*N/m^2 = 0.0407886 tonf/m^2
t_1 := 0.9 m
t_3 := 1.3 m
t_2 := t_1 + (t_3 - t_1)/1.33*(0.44 + 0.45) = 1.16767 m
w_1 := γ_1*t_1 + γ_2 + γ_3 = 0.02575 MPa
w_1 = 2.62577 tonf/m^2
w_1 = 0.02575 N/mm^2
w_2 := γ_1*t_2 + γ_2 + γ_3 = 0.0321741 MPa
w_2 = 3.28084 tonf/m^2
w_3 := γ_1*t_3 + γ_2 + γ_3 = 0.03535 MPa
w_3 = 3.6047 tonf/m^2
# 【 해석 모델링 】
0.44 m = 440 mm
0.44 m + 0.45 m = 890 mm
0.44 m + 0.45 m + 0.44 m = 1330 mm
-0.25 m = -250 mm
-0.25 m + 0.083 m = -167 mm
-0.25 m + (-0.15 m) = -400 mm
# 【 해석 결과 】
# 【 단면 응력 검토 】
σ_ba := 1.0*1400*kgf/cm^2 = 1400 kgf/cm^2  # : 구조용 강재의 허용 휨응력
σ_ba = 137.293 MPa
τ_b := 1.0*800*kgf/cm^2 = 800 kgf/cm^2  # : 구조용 강재의 허용 전단응력
M := 0.35*tonf*m*1.1 = 0.385 tonf*m  # : H-700 Beam 간격 1.1m 보정
P := 7.77*tonf*1.1 = 8.547 tonf
σ := P/A + M/Z = 46.1149 MPa
# 【 볼트 응력 검토 】
P := sqrt((2.35*tonf)^2 + (7.46*tonf)^2) = 7.82139 tonf
P := P*1.1 = 8.60353 tonf
P = 84.3718 kN
# F8T 볼트 ϕ22mm 사용의 경우
P_a := 39 kN = 3.97689 tonf
P_a := P_a*2 = 7.95379 tonf
