# (제1공구) 가설 방음벽 구조계산서
tonf := 1000 kgf
H := 3.0 m
# 1. 설계조건
# 2. 구조 부재 배치도
# 3. 하중계산
# 1) 고정 하중
# 파이프 자중 | : 프로그램 내에서 자동 계산
# 방음벽 자중
P1 := 4.5*kgf/m^2*2.0*m = 0.009 tonf/m
# 2) 풍하중
# 방음벽에 작용하는 풍하중
ρ := 0.125 kgf*sec^2/m^4  # : 공기밀도
Vd := 40*m/sec  # : 설계 기준 풍속
Cd := 1.2  # : 항력 계수
G := 1  # : 거스트 응답계수
A := 1.0 m*1.0*m = 1 m^2  # : 풍하중을 받는 면의 투영면적
W := 1/2*ρ*Vd^2*Cd*G*A = 120 kgf
W = 0.12 tonf  # : 풍하중 강도
# 4. 구조해석 모델링
0.35 = 0.35
0.35 + 1.5 = 1.85
0.35 + 1.5 + 0.5 = 2.35
0.35 + 1.5 + 0.5 + 1.1 = 3.45
1.0/3.0*1.2 = 0.4
# 1) 단면특성
# (1) 수직재
D := 48.6 mm
t := 2.3 mm
A := π*D^2/4 - π*(D - 2*t)^2/4 = 3.34548 cm^2  # : 단면적
I := π*D^4/64 - π*(D - 2*t)^4/64 = 8.98672 cm^4  # : 단면2차모멘트
Z := I/(D/2) = 3.69824 cm^3  # : 단면계수
r := sqrt(I/A) = 1.63897 cm  # : 단면2차회전반경
# (2) 경사재
# 수직재와 동일한 부재 사용
# (3) 수평재
# 수직재와 동일한 부재 사용
# 5. 전산해석 (SAP2000)
# 1) BMD
# 2) SFD
# 3) AFD
# 6. 주부재 검토
# 1) 작용력
M_max := 0.14*tonf*m
V_max := 0.238*tonf
P_max := 1.73*tonf
# 2) 주지주의 휨응력 검토
f_s := P_max/A + M_max/Z = 4302.7 kgf/cm^2
f_ba := 1400*kgf/cm^2
Bending_Check :=
    "O.K" if f_s < f_ba
    "N.G" otherwise
    = "N.G"
# 3 ) 주지주의 전단응력 검토
f_t := V_max/A = 71.1407 kgf/cm^2
f_ta := 800*kgf/cm^2
Shear_Check :=
    "O.K" if f_t < f_ta
    "N.G" otherwise
    = "O.K"
# 7. 경사재 검토
# 1) 작용력
P_max := 5.71/2*1.5*tonf = 4.2825 tonf
# 2) 경사재 검토
L := 1.1541 m = 115.41 cm
L/r = 70.4161
f_ca1 :=
    1400 if L/r ≤ 20
    (1400 - 8.4*(L/r - 20)) if 20 < L/r ≤ 93
    (12000000/(6700 + (L/r)^2)) if 93 < L/r
    = 976.504
f_ca := f_ca1*kgf/cm^2 = 976.504 kgf/cm^2
A = 3.34548 cm^2
f_c := P_max/A = 1280.08 kgf/cm^2
Axal_Check :=
    "O.K" if f_c < f_ca
    "N.G" otherwise
    = "N.G"
# 8. 수평 부재 검토
