# (제1공구) 가설 방음벽 구조계산서
# ( 현 설치 상태 안정성 검토 )
tonf := 1000 kgf
H := 3.0 m
Vd := 35*m/sec
# 1. 설계 조건
# 2. 단면 가정
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# 3. 하중계산
# 1) 고정 하중
# 파이프 자중 | : 프로그램내에서 자동 계산
# 방음벽 자중
P1 := 4.5*kgf/m^2*2.0*m = 0.009 tonf/m
# 2) 풍하중
# 방음벽에 작용하는 풍하중
# ( 방음벽기초 설계기준 개선방안 연구 최종보고서, 2012.12 )
ρ := 0.125 kgf*sec^2/m^4  # : 공기밀도
Vd = 35 m/s  # : 설계 기준 풍속
Cd := 1.2  # : 항력계수
G := 1  # : 거스트 응답계수
A := 1.0 m*1.0*m = 1 m^2  # : 풍하중 재하면적
W := 1/2*ρ*Vd^2*Cd*G = 91.875 kgf/m^2
W = 0.091875 tonf/m^2  # : 풍하중 강도
# 4. 구조해석 모델링
# 1) 모델링
0.35 = 0.35
0.35 + 1.5 = 1.85
1100 + 500 - 1300 = 300
0.35 + 1.5 + 0.5 = 2.35
0.35 + 1.5 + 0.5 + 1.1 = 3.45
1.0/3.0*1.2 = 0.4
1500 + 500 + 1100 = 3100
# 2) 단면특성
# (1) 수직재
n := 1
D_v := 48.6 mm
t_v := 3.2 mm
A_v := (π*D_v^2/4 - π*(D_v - 2*t_v)^2/4)*n = 4.56411 cm^2
I_v := (π*D_v^4/64 - π*(D_v - 2*t_v)^4/64)*n = 11.8176 cm^4
Z := I_v/(D_v/2) = 4.86321 cm^3
r := sqrt(I_v/A_v) = 1.60911 cm
# (2) 경사재
# 수직재와 동일한 부재 사용
D := 48.6 mm
t := 3.2 mm
A := π*D^2/4 - π*(D - 2*t)^2/4 = 4.56411 cm^2
I := π*D^4/64 - π*(D - 2*t)^4/64 = 11.8176 cm^4
Z := I/(D/2) = 4.86321 cm^3
r := sqrt(I/A) = 1.60911 cm
# (3) 수평재
# 수직재와 동일한 부재 사용
# 5. 전산해석 (SAP2000)
# 1 ) 모델링
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W = 0.091875 tonf/m^2
CTC := 2.0 m
W_해석 := W*CTC = 0.18375 tonf/m
# 2) 변위도
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X_변위 := 0.00342 m = 3.42 mm
Y_변위 := 0.00113 m = 1.13 mm
# 3) BMD
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# 4) SFD
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# 5) AFD
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# 6. 주부재 검토 (수직재)
# 1) 작용력
M_max := 0.07*tonf*m
V_max := 0.22*tonf
P_max := 0.57*tonf
# 2) 휨응력 검토
f_b := P_max/A_v = 124.888 kgf/cm^2
f_ba := 1.2*1400*kgf/cm^2 = 1680 kgf/cm^2
Bending_Check :=
    "O.K" if f_b < f_ba
    "N.G" otherwise
    = "O.K"
# 3 ) 전단응력 검토
f_t := V_max/A_v = 48.2022 kgf/cm^2
f_ta := 1.2*800*kgf/cm^2 = 960 kgf/cm^2
Shear_Check :=
    "O.K" if f_t < f_ta
    "N.G" otherwise
    = "O.K"
# 4) 압축응력 검토
L := 1.5 m = 150 cm  # : 경사재 횡지지 길이
L/r = 93.219
f_ca1 :=
    1400 if L/r ≤ 20
    (1400 - 8.4*(L/r - 20)) if 20 < L/r ≤ 93
    (12000000/(6700 + (L/r)^2)) if 93 < L/r
    = 779.738
f_ca := f_ca1*kgf/cm^2 = 779.738 kgf/cm^2
A_v = 4.56411 cm^2
f_c := P_max/A_v = 124.888 kgf/cm^2
Axal_Check :=
    "O.K" if f_c < f_ca
    "N.G" otherwise
    = "O.K"
# 5) 조합응력 검토
f_b/f_ba + f_c/f_ca = 0.234504
조합응력_검토 :=
    "O.K" if f_b/f_ba + f_c/f_ca < 1
    "N.G" otherwise
    = "O.K"
# 7. 경사 부재  검토 (2단)
# 1) 작용력
M_max := 1.279*10^-3*tonf*m
V_max := 0.0*tonf
P_max := 0.63*tonf
# 2) 휨응력 검토
f_b := P_max/A = 138.034 kgf/cm^2
f_ba := 1.2*1400*kgf/cm^2 = 1680 kgf/cm^2
Bending_Check :=
    "O.K" if f_b < f_ba
    "N.G" otherwise
    = "O.K"
# 3 ) 전단응력 검토
f_t := V_max/A = 0 kgf/cm^2
f_ta := 1.2*800*kgf/cm^2 = 960 kgf/cm^2
Shear_Check :=
    "O.K" if f_t < f_ta
    "N.G" otherwise
    = "O.K"
# 4) 압축응력 검토
L := 2.5 m = 250 cm  # : 경사재 횡지지 길이
L/r = 155.365
f_ca1 :=
    1400 if L/r ≤ 20
    (1400 - 8.4*(L/r - 20)) if 20 < L/r ≤ 93
    (12000000/(6700 + (L/r)^2)) if 93 < L/r
    = 389.127
f_ca := f_ca1*kgf/cm^2 = 389.127 kgf/cm^2
A = 4.56411 cm^2
f_c := P_max/A = 138.034 kgf/cm^2
Axal_Check :=
    "O.K" if f_c < f_ca
    "N.G" otherwise
    = "O.K"
# 5) 조합응력 검토
f_b/f_ba + f_c/f_ca = 0.436889
조합응력_검토 :=
    "O.K" if f_b/f_ba + f_c/f_ca < 1
    "N.G" otherwise
    = "O.K"
# 8. 수평 부재 검토
# 1 ) 작용하중 계산
L_n := 2 m  # : 수평 부재 지지점간 거리
B := 1.5 m  # : 수평 부재 설치 간견
W = 0.091875 tonf/m^2  # : 풍하중 강도
W1 := W*B = 0.137813 tonf/m
# 2) 부재력 계산
# 최대 모멘트
M_max := W1*L_n^2/11 = 0.0501136 tonf*m
# 최대 전단력
V_max := 1.15*W1*L_n/2 = 0.158484 tonf
# 3) 휨응력 검토
f_b := M_max/Z = 1030.46 kgf/cm^2
f_ba := 1.2*1400*kgf/cm^2 = 1680 kgf/cm^2
Bending_Check :=
    "O.K" if f_b < f_ba
    "N.G" otherwise
    = "O.K"
# 4 ) 전단응력 검토
f_s := V_max/A = 34.7241 kgf/cm^2
f_sa := 1.2*800*kgf/cm^2 = 960 kgf/cm^2
Shear_Check :=
    "O.K" if f_s < f_sa
    "N.G" otherwise
    = "O.K"
# 9. 수직 조이너 검토
# 10. 지지말뚝 검토
# 1) 검토 조건
H := 0.42*tonf  # : 작용 수평력
h := 0.35 m  # : 말뚝 돌출 길이 ( 지표면에서 하중 작용점간 거리 )
# 2) 말뚝 특성치 계산
N := 10
β_가정 := 2.227*1/m = 0.02227 1/cm
B_H := sqrt(D/β_가정) = 0.147726 m
k_h0 := 1/30*1*m^(-1/4)*(28*(N*kgf/cm^2)) = 0.0933333 kgf/cm^3
k_h := k_h0*(B_H/30)^(-3/4) = 5.02093 kgf/cm^3
1 m^(-3/4)/m^(1/4) = 1 1/m
D = 0.0486 m
E := 2100000*kgf/cm^2
I = 11.8176 cm^4
β := (k_h*D/(4*E*I))^(1/4) = 2.22665 1/m
# 2 ) 말뚝 근입 깊이
L := 3/β*1.2 = 1.61678 m
# 3) 말뚝머리 변위
δ := ((1 + β*h)^3 + 1/2)/(3*E*I*β^3)*H = 31.3415 mm
# 4) 최대모멘트 발생점
L_m := 1/β*atan(1/(1 + 2*β*h)) = 0.167326 m
# 5) 최대모멘트
M_max := H/(2*β)*sqrt((1 + 2*β*h)^2 + 1)*e^(-β*L_m) = 0.1785 tonf*m
# 6) 휨응력 검토
M_max = 17850 kgf*cm
Z = 4.86321 cm^3
f_b := M_max/Z = 3670.41 kgf/cm^2
f_ba := 1.2*1400*kgf/cm^2 = 1680 kgf/cm^2
Bending_Check :=
    "O.K" if f_b < f_ba
    "N.G" otherwise
    = "N.G"
# 7 ) 전단응력 검토
f_s := H/A = 92.0224 kgf/cm^2
f_sa := 1.2*800*kgf/cm^2 = 960 kgf/cm^2
Shear_Check :=
    "O.K" if f_s < f_sa
    "N.G" otherwise
    = "O.K"
