# 제1공구
# 방음벽 구조 계산서
tonf := 1000 kgf
# 1. 설계 조건
# 1) 일반 사항
# 방음벽
# 종류
# 흡응형 + 투명 방음벽 (토공부)
# 방음벽
# 높이
H_wall := 7.0 m
# 방음벽 기초
# 높이
H_footing := 2.0 m
# 방음벽 기초
# 폭
B_footing := 0.5 m
# 2) 하중
# (1) 사하중
# 철근 콘크리트
r_c := 2.5*tonf*m^-3
# 흙의 단위중량
r_s := 1.9*tonf*m^-3
# (2) 활하중
# 상재 활하중
W_L := 1.0 ton*m^-2
# (3) 풍하중
# 풍하중
P_wind := 120 kgf*m^-2
# 3) 사용 재료 강도
# (1) 콘크리트
# 설계 기준 강도
f_ck := 240 kgf*cm^-2
# 탄성 계수
E_c := 2.7*10^5*kg*cm^-2
# (2) 철근
# 항복 강도
f_y := 3000 kgf*cm^-2
# 탄성계수
E_s := 2*10^6*kgf*cm^-2
# (3) 강재
# 항복 강도
# 탄성계수
# (4) Anchor bolt
# 4) 허용 응력
# (1) 콘크리트
# 허용 휨압축응력
f_ca := 0.4*f_ck = 96 kgf*cm^-2
# 허용 전단응력
τ_a := 0.08*sqrt(kgf*cm^-2)*sqrt(f_ck) = 1.23935 kgf*cm^-2
sqrt(kgf/cm^2)*sqrt(kgf/cm^2) = 98066.5 Pa
# (2) 철근
# 허용 인장응력
f_sa := 1500 kgf*cm^-2
# (3) 강재
# 허용 휨인장응력
f_ta.post := 1680 kgf*cm^-2
# 허용 전단응력
τ_a.post := 960 kgf*cm^-2
# (4) 용접부
# 허용 전단응력
τ_a.weld := 80 MPa = 815.773 kgf/cm^2
# SM400강재 공장 용접 기준
# 5) 사용 지주의 제원
H_post := 200 mm
B_post := 200 mm
t_web := 8 mm
t_flange := 12 mm
# 단면적
A_post := 63.53 cm^2
# 전단면적
A_w.post := 14.08 cm^2
H_a := τ_a.post*A_w.post = 13.5168 tonf
# 단면2차 모멘트
I_x.post := 4720 cm^4
I_y.post := 1600 cm^4
# 회전 반경
r_x.post := 8.62 cm
r_y.post := 5.02 cm
# 단면 계수
Z_x.post := 472 cm^3
M_a := f_ta.post*Z_x.post = 7.9296 tonf*m
Z_y.post := 160 cm^3
# 단위 길이당 중량
W_post := 49.90 kgf*m^-1
# 지주 배치 간격
CTC_post := 2.0 m
# 방음판 중량
W_wall := 0.03*tonf*m^-2
# 6) 하부 지반 조건
# 흙의 내부마찰각
ϕ_s := 30
# 흙의 점착력
c_s := 0.0*tonf*m^-2
# 지반의 추정N치
N := 20
# 7) 참고 문헌
# 2 단면 가정
# 1) 방음벽
# 3. 설계 하중
# 1) 사하중
# 【 입력 변수 】
# 방음벽 지주
# 단위 길이당 중량
W_post = 49.9 kgf*m^-1
# 방음벽 지주
# 높이
H_wall = 7 m
# 방음벽 지주
# 설치 간격
CTC_post = 2 m
# 방음판
# 단위 면적당 중량
W_wall = 0.003 kgf*cm^-2
# 【 부재별 사하중 】
# H-Post
W_d := W_post*H_wall = 0.3493 tonf
# 방음판
W_p := W_wall*H_wall*CTC_post = 0.42 tonf
# 사하중
V := W_d + W_p = 769.3 kgf
# 2) 풍하중
# 방음벽 내측에 작용하는 하중
# 【 입력 변수 】
# 풍하중
# 강도
P_wind = 1176.8 Pa
# 【 풍하중 】
# 수평력
H_wind := P_wind*H_wall*CTC_post = 1.68 tonf
# 모멘트
M_wind := H_wind*(1/2*H_wall) = 5.88 tonf*m
# 3 ) 설계 하중
# 연직 하중
V := V = 0.7693 tonf
# 수평 하중
H := H_wind = 1.68 tonf
# 모멘트
M := M_wind = 5.88 tonf*m
# 4. 응력 검토
# 1 ) 지주 응력 검토
# (1) 휨응력 검토
# 【 입력 변수 】
# 방음벽 지주
# 단면적
A := A_post = 63.53 cm^2
# 방음벽 지주
# 단면계수
Z_x := Z_x.post = 472 cm^3
# 방음벽 지주
# 허용 휨응력
f_a := f_ta.post = 1680 kgf/cm^2
# 방음벽 지주
# 연직 방향 설계 하중
V = 0.7693 tonf
# 방음벽 지주
# 설계 모멘트
M = 5.88 tonf*m
# 【 응력 검토 】
σ := V/A + M/Z_x = 1257.87 kgf/cm^2
Stress_check :=
    "O.K" if σ < f_a
    "N.G" otherwise
    = "O.K"
# (2) 전단응력 검토
# 【 입력 변수 】
# 방음벽 지주
# 전단 단면적
A_w := A_w.post = 14.08 cm^2
# 방음벽 지주
# 허용 전단응력
τ_a := τ_a.post = 960 kgf/cm^2
# 방음벽 지주
# 설계 수평력
H = 1.68 tonf
# 【 응력 검토 】
τ := H/A_w = 119.318 kgf/cm^2
Stress_check :=
    "O.K" if τ < τ_a
    "N.G" otherwise
    = "O.K"
# 2) 지주 용접부 응력 검토
# (1) 휨응력 검토
# 인장력
T_1 := -V/2 + M/H_post = 29.0153 tonf  # [ 압축  (-) 인장 (+) ]
T_2 := -V/2 - M/H_post = -29.7846 tonf
# 【 용접 치수 】
s_min := 6 mm
t_1 := t_flange = 12 mm
t_2 := 30 mm
sqrt(2 mm*t_2) = 7.74597 mm
s_use := 8 mm
s_check :=
    "O.K" if (s_use > s_min) and (t_1 > s_use > sqrt(2 mm*t_2))
    "N.G" otherwise
    = "O.K"
a := 0.707*s_use = 5.656 mm
L_weld := (200 mm + 4*90*mm) + (200 mm - 8 mm) = 0.752 m
# 플렌지
# 용접부의 단면적
A_weld := a*L_weld = 42.5331 cm^2
# 【 용접 응력 검토 】
τ := T_1/A_weld = 682.182 kgf/cm^2
τ_a := 80 MPa = 815.773 kgf/cm^2
Weld_check :=
    "O.K" if τ < τ_a
    "N.G" otherwise
    = "O.K"
# (2) 전단웅력 검토
# 방음벽 지주
# 하단부의 수평력
H := H = 1.68 tonf  # [ 압축  (-) 인장 (+) ]
# 【 용접 치수 】
s_min := 6 mm
t_1 := t_web = 8 mm
t_2 := 30 mm
sqrt(2 mm*t_2) = 7.74597 mm
s_use := 8 mm
s_check :=
    "O.K" if (s_use > s_min) and (t_1 ≥ s_use ≥ sqrt(2 mm*t_2))
    "N.G" otherwise
    = "O.K"
a := 0.707*s_use = 5.656 mm
L_weld := (H_post - 2*t_flange)*2 = 352 mm
# 플렌지
# 용접부의 단면적
A_weld := a*L_weld = 19.9091 cm^2
# 【 용접 응력 검토 】
τ := H/A_weld = 84.3834 kgf/cm^2
τ_a := 80 MPa = 815.773 kgf/cm^2
Weld_check :=
    "O.K" if τ < τ_a
    "N.G" otherwise
    = "O.K"
# 3) Anchor Bolt 응력 검토
# (1) 작용 하중
# 【 작용 하중 】
V = 0.7693 tonf
H = 1.68 tonf
M = 5.88 tonf*m
# (2) Anchor Bolt 본수 검토
# 【 검토 조건 】
# 앵커 볼트
# 직경
D_bolt := 28 mm
# 베이스 플레이트
# 전체폭
D := 210 mm + 145 mm + 65 mm = 420 mm
# 베이스 플레이트
# 전체 길이
b := 420 mm
# 앵커 볼트에서
# 베이스 플레이트
# 플랜지까지의 거리
de := 65 mm = 65 mm
# 탄성 계수비
n := 15
# 인장측 앵커볼트의
# 총단면적
A_t := π*D_bolt^2/4 = 0.000615752 m^2
# 인장측 앵커볼트의
# 갯수
n_t := 3
# 【 하중 편심거리에 의한 응력 상태 분석 】
# 하중의
# 편심거리
e := M/V = 7643.31 mm
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D/6 = 70 mm
D/6 + de/3 = 91.6667 mm
f(x_n) := x_n^3 + 3*(e - D/2)*x_n^2 - 6*n*A_t/b*(e + D/2 - de)*(D - de - x_n)
x_n := 65 mm
root(f(x_n), x_n) = 106.711 mm
σc := V/(b*D) + V*e/((b*D^2)/6) = 48.0552 kgf/cm^2
σc := 2*V/(3*b*(D/2 - e)) = -0.0164276 kgf/cm^2
σc := 2*V*(e + D/2 - de)/(b*x_n*(D - de - x_n/3)) = 131.682 kgf/cm^2
# 【 베이스 플레이트의 하면의 최대 인장응력도 게산 】
# 베이스 플레이트 하면의
# 최대 압축응력도
σ_c :=
    (V/(b*D) + V*e/(b*D^2/6)) if e ≤ D/6
    (2*V/(3*b*(D/2 - e))) if ((D/6 + de/3) ≥ e > D/6)
    (2*V*(e + D/2 - de)/(b*x_n*(D - de - x_n/3))) otherwise
    = 131.682 kgf/cm^2
# 【 앵커 볼트의 인장력 계산 】
# 앵커 볼트의
# 인장력
Z := V*(e - D/2 + x_n/3)/(D - de - x_n/3) = 17.2053 tonf
Z_bolt := Z/n_t = 5.73512 tonf
Z_a := π*D_bolt^2/4*1400*kgf/cm^2 = 8.62053 tonf
σ_bolt := Z_bolt/(π*D_bolt^2/4) = 931.4 kgf/cm^2
# (3) Anchor Bolt의 정착길이에 대한 검토
# 앵커 볼트
# 주장 길이
DL_bolt := π*D_bolt = 87.9646 mm
# 허용
# 부착응력도
τ_a := (0.64*sqrt(kgf/cm^2))*sqrt(f_ck) = 9.91484 kgf/cm^2
# 앵커
# 매입길이
L1 := Z_bolt/(τ_a*DL_bolt) = 657.58 mm
# 앵커
# 갈고리에 의한
# 매입길이
L2 := L1*2/3 = 438.387 mm
# 4) Base Plate 검토
# (1) 콘크리트 지압응력 검토
# 지지하는
# 콘크리트의 전면적
A_c := 50 cm*50*cm = 250000 mm^2
# 지압능 받는
# 재하면적
A_b := 40 cm*42*cm = 168000 mm^2
# (2) 받침판 응력 검토
