## 제1공구  방음벽 구조 계산서
tonf := 1000 kgf
tf := 1000 kgf
As_D13 := 1.267 cm^2
As_D16 := 1.986 cm^2
As_D19 := 2.865 cm^2
As_D22 := 3.871 cm^2
# 1. 설계 조건
# 1) 일반 사항
# 【 방음벽 】
# 방음벽
# 종류
# 흡응형 + 투명 방음벽 (토공부)
# 방음벽
# 지주 간격
SoundProof_Post_CTC := 2.0 m
# 방음벽
# 높이
H_wall := 7.0 m
# 【 방음벽 기초 콘크리트 】
# 방음벽 기초
# 높이
H_Cfooting := 2.0 m
# 방음벽 기초
# 폭
B_Cfooting := 0.5 m
# 방음벽 기초
# 지상돌출 높이
H_Cfooting.top := 1.0 m
# 방음벽 기초
# 지하 근입깊이
H_Cfooting.bot := H_Cfooting - H_Cfooting.top = 1 m
# 【 방음벽 기초 파일 】
# 파일의
# 벽체 근입깊이
L_pile_top := 0.5 m
# 파일의
# 하부지층 근입깊이
L_pile_bottom := 4.5 m
# 파일의
# 전체 길이
L_pile := L_pile_top + L_pile_bottom = 5 m
# 기초 파일
# 배치 간격
Pile_ctc := 1.5 m
# 2) 하중
# (1) 사하중
# 철근 콘크리트
r_c := 2.5*tonf/m^3
# 흙의 단위중량
r_soil := 1.9*tonf/m^3
# 콘크리트
# 단위중량
UnitWeight_Concrete := 2.5*tonf/m^3
# 방음판
# 자중
W_wall := 0.03*tonf/m^2
# (2) 활하중
# 상재 활하중
W_L := 1.0 ton*m^-2
# (3) 풍하중
# 풍하중
W_wind := 120 kgf*m^-2
# 3) 사용 재료 강도
# (1) 콘크리트
# 설계 기준 강도
f_ck := 240 kgf*cm^-2
# 탄성 계수
E_c := 2.7*10^5*kg*cm^-2
# (2) 철근
# 항복 강도
f_y := 3000 kgf*cm^-2
# 탄성계수
E_s := 2*10^6*kgf*cm^-2
# (3) 강재
# 항복 강도
# 탄성계수
# (4) Anchor bolt
# 4) 허용 응력
# (1) 콘크리트
# 허용 휨압축응력
f_ca := 0.4*f_ck = 96 kgf*cm^-2
# 허용 전단응력
τ_a := 0.08*sqrt(kgf*cm^-2)*sqrt(f_ck) = 1.23935 kgf*cm^-2
# (2) 철근
# 허용 인장응력
f_sa := 1500 kgf*cm^-2
# (3) 강재
# 허용 휨인장응력
f_ta.post := 1680 kgf*cm^-2
# 허용 전단응력
τ_a.post := 960 kgf*cm^-2
# (4) 용접부
# 허용 전단응력
τ_a.weld := 80 MPa = 815.773 kgf/cm^2
# SM400강재 공장 용접 기준
# 5) 하부 지반 조건
# 흙의 내부마찰각
ϕ_soil := 30 deg
# 흙의 점착력
c_soil := 0.0*tonf*m^-2
# 지반의 추정N치
N := 20
# 7) 참고 문헌
# 2 단면 가정
# 1) 방음벽
# 3.  방음벽 지주 설계
# 1) 사용 지주의 제원
# 【 단면 제원  】
H_post := 200 mm
B_post := 200 mm
t_web := 8 mm
t_flange := 12 mm
# 【 단면 특성 】
# 단위 길이당 중량
W_post := 49.90 kgf*m^-1
# 단면적
A_post := 63.53 cm^2
# 전단면적
A_w.post := 14.08 cm^2
H_a := τ_a.post*A_w.post = 13.5168 tonf
# 단면2차 모멘트
I_x.post := 4720 cm^4
I_y.post := 1600 cm^4
# 회전 반경
r_x.post := 8.62 cm
r_y.post := 5.02 cm
# 단면 계수
Z_x.post := 472 cm^3
M_a := f_ta.post*Z_x.post = 7.9296 tonf*m
Z_y.post := 160 cm^3
# 2) 사하중
# 【 입력 변수 】
# 방음벽 지주
# 단위 길이당 중량
W_post = 49.9 kgf/m
# 방음벽 지주
# 높이
H_wall = 7 m
# 방음벽 지주
# 설치 간격
CTC_post := SoundProof_Post_CTC = 2 m
# 방음판
# 단위 면적당 중량
W_wall = 30 kgf/m^2
# 【 부재별 사하중 】
# H-Post
W_d := W_post*H_wall = 0.3493 tonf
# 방음판
W_p := W_wall*H_wall*CTC_post = 0.42 tonf
# 사하중
# 합계
V_d := W_d + W_p = 769.3 kgf
# 3) 풍하중
# 방음벽 내측에 작용하는 하중
# 【 입력 변수 】
# 풍하중
# 강도
W_wind = 120 kgf/m^2
# 【 풍하중 】
# 수평력
H_wind := W_wind*(H_wall*CTC_post) = 1.68 tonf
# 모멘트
M_wind := H_wind*(1/2*H_wall) = 5.88 tonf*m
# 4 ) 설계 하중
# 연직 하중
V := V_d = 0.7693 tonf
# 수평 하중
H := H_wind = 1.68 tonf
# 모멘트
M := M_wind = 5.88 tonf*m
# 5) 방음벽 지주 휨 응력 검토
# 【 검토 조건 】
# 방음벽 지주
# 단면적
A := A_post = 63.53 cm^2
# 방음벽 지주
# 단면계수
Z_x := Z_x.post = 472 cm^3
# 방음벽 지주
# 허용 휨응력
f_a := f_ta.post = 1680 kgf/cm^2
# 【 작용 하중 】
# 방음벽 지주
# 연직 방향 설계 하중
V = 0.7693 tonf
# 방음벽 지주
# 설계 모멘트
M = 5.88 tonf*m
# 【 응력 검토 】
σ := V/A + M/Z_x = 1257.87 kgf/cm^2
f_a = 1680 kgf/cm^2
Bending_Stress_check :=
    "O.K" if σ < f_a
    "N.G" otherwise
    = "O.K"
# 6) 방음벽 지주 전단응력 검토
# 【 검토 조건 】
# 방음벽 지주
# 전단 단면적
A_w := A_w.post = 14.08 cm^2
# 방음벽 지주
# 허용 전단응력
τ_a := τ_a.post = 960 kgf/cm^2
# 【 작용 하중 】
# 방음벽 지주
# 설계 수평력
H = 1.68 tonf
# 【 응력 검토 】
τ := H/A_w = 119.318 kgf/cm^2
Stress_check :=
    "O.K" if τ < τ_a
    "N.G" otherwise
    = "O.K"
# 4.  방음벽 지주 용접부 설계
# 1) 응력 검토 조건
# 【 용접 치수 】
# 용접 각장
s_min := 6 mm
t_1 := t_flange = 12 mm
t_2 := 30 mm
sqrt(2 mm*t_2) = 7.74597 mm
s_use := 8 mm
s_check :=
    "O.K" if (s_use > s_min) and (t_1 > s_use > sqrt(2 mm*t_2))
    "N.G" otherwise
    = "O.K"
# 용접
# 목두께
a := 0.707*s_use = 5.656 mm
# 【 용접부 전단 단면적 】
L_weld := (200 mm + 4*90*mm) + (200 mm - 8 mm) = 0.752 m
# 플렌지
# 용접부의 단면적
A_weld := a*L_weld = 42.5331 cm^2
# 【 용접부  단면계수 】
# 수정 할 것
# 2) 방음벽 지주 용접부 휨 응력 검토
# 【 검토 조건 】 | 수정 할 것
# 인장력
T_1 := -V/2 + M/H_post = 29.0153 tonf  # [ 압축  (-) 인장 (+) ]
T_2 := -V/2 - M/H_post = -29.7846 tonf
# 【 용접 응력 검토 】
τ := T_1/A_weld = 682.182 kgf/cm^2
τ_a := 80 MPa = 815.773 kgf/cm^2
Weld_Bending_check :=
    "O.K" if τ < τ_a
    "N.G" otherwise
    = "O.K"
# 3) 방음벽 지주 용접부 전단웅력 검토
# 【 검토 조건 】
# 방음벽 지주
# 하단부의 수평력
H := H = 1.68 tonf  # [ 압축  (-) 인장 (+) ]
# 【 용접 치수 】
s_min := 6 mm
t_1 := t_web = 8 mm
t_2 := 30 mm
sqrt(2 mm*t_2) = 7.74597 mm
s_use := 8 mm
s_check :=
    "O.K" if (s_use > s_min) and (t_1 ≥ s_use ≥ sqrt(2 mm*t_2))
    "N.G" otherwise
    = "O.K"
a := 0.707*s_use = 5.656 mm
L_weld := (H_post - 2*t_flange)*2 = 352 mm
# 플렌지
# 용접부의 단면적
A_weld := a*L_weld = 19.9091 cm^2
# 【 용접 응력 검토 】
τ := H/A_weld = 84.3834 kgf/cm^2
τ_a := 80 MPa = 815.773 kgf/cm^2
Weld_Shear_check :=
    "O.K" if τ < τ_a
    "N.G" otherwise
    = "O.K"
# 5.  방음벽 지주 앵커 볼트 설계
# 1) Anchor Bolt 응력 검토  조건
# (1) 작용 하중
# 【 작용 하중 】
# 연직 하중
V = 0.7693 tonf
# 수평 하중
H = 1.68 tonf
# 모멘트
M = 5.88 tonf*m
# 2) Anchor Bolt 본수 검토
# 【 검토 조건 】
# 앵커 볼트
# 직경
D_bolt := 28 mm
# 베이스 플레이트
# 전체폭
D := 210 mm + 145 mm + 65 mm = 420 mm
# 베이스 플레이트
# 전체 길이
b := 420 mm
# 앵커 볼트에서
# 베이스 플레이트
# 플랜지까지의 거리
de := 65 mm = 65 mm
# 탄성 계수비
n := 15
# 인장측 앵커볼트의
# 총단면적
A_t := π*D_bolt^2/4 = 0.000615752 m^2
# 인장측 앵커볼트의
# 갯수
n_t := 3
# 【 하중 편심거리에 의한 응력 상태 분석 】
# 하중의
# 편심거리
e := M/V = 7643.31 mm
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D/6 = 70 mm
D/6 + de/3 = 91.6667 mm
f(x_n) := x_n^3 + 3*(e - D/2)*x_n^2 - 6*n*A_t/b*(e + D/2 - de)*(D - de - x_n)
x_n := 100 mm
x := root(f(x_n), x_n) = 106.711 mm
x_n := x = 10.6711 cm
σc := V/(b*D) + V*e/((b*D^2)/6) = 48.0552 kgf/cm^2
σc := 2*V/(3*b*(D/2 - e)) = -0.0164276 kgf/cm^2
σc := 2*V*(e + D/2 - de)/(b*x_n*(D - de - x_n/3)) = 83.7016 kgf/cm^2
# 【 베이스 플레이트의 하면의 최대 인장응력도 게산 】
# 베이스 플레이트 하면의
# 최대 압축응력도
σ_c :=
    (V/(b*D) + V*e/(b*D^2/6)) if e ≤ D/6
    (2*V/(3*b*(D/2 - e))) if ((D/6 + de/3) ≥ e > D/6)
    (2*V*(e + D/2 - de)/(b*x_n*(D - de - x_n/3))) otherwise
    = 83.7016 kgf/cm^2
# 【 앵커 볼트의 인장력 계산 】
# 앵커 볼트
# 허용 인장 응력
σ_a.bolt := 1400*kgf/cm^2
# 앵커 볼트의
# 인장력
Z := V*(e - D/2 + x_n/3)/(D - de - x_n/3) = 17.9877 tonf
# 앵커 볼트
# 1개당의 인장력
Z_bolt := Z/n_t = 5.99591 tonf
# 엥커 볼트
# 허용 인장력
Z_a.bolt := π*D_bolt^2/4*1400*kgf/cm^2 = 8.62053 tonf
Bolt_tention_Force_check :=
    "O.K" if Z_bolt < Z_a.bolt
    "N.G" otherwise
    = "O.K"
# 앵커 볼트
# 작용인장응력
σ_bolt := Z_bolt/(π*D_bolt^2/4) = 973.754 kgf/cm^2
Bolt_tention_Stress_check :=
    "O.K" if σ_bolt < σ_a.bolt
    "N.G" otherwise
    = "O.K"
# 3) Anchor Bolt 정착 길이 검토
# 【 검토 조건 】
# 앵커 볼트
# 주장 길이
DL_bolt := π*D_bolt = 87.9646 mm
# 허용
# 부착응력도
τ_a := (0.64*sqrt(kgf/cm^2))*sqrt(f_ck) = 9.91484 kgf/cm^2
# 【 정착 길이 검토 】
# 앵커
# 매입길이
L1 := Z_bolt/(τ_a*DL_bolt) = 687.482 mm
# 앵커
# 갈고리에 의한
# 매입길이
L2 := L1*2/3 = 458.322 mm
# 6.  방음벽 지주 Base Plate 검토
# (1) 콘크리트 지압응력 검토
# 【 콘크리트의 허용 지압응력 계산 】
# 지지하는
# 콘크리트의 전면적
A_c := 50 cm*50*cm = 250000 mm^2
# 지압을능 받는
# 재하면적
A_b := 40 cm*42*cm = 168000 mm^2
# 콘크리트
# 허용지압응력
f_ba := 0.25*sqrt(A_c/A_b)*f_ck = 73.1925 kgf/cm^2
# 【 작용하중 계산  】
# 연직 하중
V = 0.7693 tonf
# 수평 하중
H = 1.68 tonf
# 모멘트
M = 5.88 tonf*m
# 받침판
# 소요 면적
A_req := V
# (2) 받침판 응력 검토
# 7. 기초 콘크리트 단면 검토
# 【 사용 재료 】
# 콘크리트
# 설계기준강도
f_ck := kgf/cm^2
# 철근
# 항복강도
f_y = 3000 kgf/cm^2
# 강도감소계수
ϕ_f := 0.85
k1 := 0.85
ϕ_v := 0.75
# 【 검토 단면 】
# 단면 폭
B_section := 1000 mm = 100 cm
# 단면 높이
H_section := B_Cfooting = 50 cm
# 단면
# 인장측 피복두께
d' := 70 mm
# 단면
# 유효높이
d := H_section - d' = 430 mm
# 【 설계 하중 】
# 방음벽 하단의
# 모멘트
M = 5.88 tonf*m
# 방음벽 하단의
# 수평력
H = 1.68 tonf
M_footing := M + H*1.0*m = 7.56 tonf*m
# 기초 벽체에 작용하는 토압 미고려
H_footing := H + 0 = 1.68 tonf
# 기초 벽체에 작용하는 토압 미고려
# 계수
# 휨모멘트
Mu := 1.3*M_footing = 9.828 tonf*m
# 계수
# 전단력
Vu := 1.3*H_footing = 2.184 tonf
# 【 필요 철근량 계산 】
B := B_section = 100 cm
fy^2/(2*0.85*fck*B)*As^2 - Fy*d*As + Mu/ϕ_f == 0
a := fy^2/(2*0.85*fck*B)
b := -fy*d
c := Mu/ϕ_f
As1 := (-b + sqrt(b^2 - 4*a*c))/(2*a) = 57569.5 mm^2
As1 =  # error: This variable is undefined.
As2 := (-b - sqrt(b^2 - 4*a*c))/(2*a) = 910.482 mm^2
As2 =  # error
# 계산상
# 필요 철근량
As_req := min(As1, As2) = 910.482 mm^2
As_req =  # error
# 【 최소 및 최대 철근량 계산 】
# 계산상 필요한
# 철근비
ρ_req := As_req/(B*d) = 0.0021174
# 최소 철근비1
ρ_min1 := 1.4 MPa/fy = 0.00475868
# 최소 철근비2
ρ_min2 := 0.25*sqrt(MPa)*sqrt(fck)/fy = 0.00412253
# 최소 철근비3
ρ_min3 := 4/3*As_req/(B*d) = 0.0028232
# 최소 철근비
ρ_min := max(ρ_min1, ρ_min2) = 0.00475868
ρ_min :=
    max(ρ_min1, ρ_min2) if ρ_req > max(ρ_min1, ρ_min2)
    ρ_min3 otherwise
    = 0.0028232
As_min := ρ_min*(B*d) = 12.1398 cm^2
# 최대 철근비
ρ_max := 0.75*k1*ϕ_f*fck/fy*600 MPa/(600 MPa + fy) = 0.0290875
As_max := ρ_max*(B*d) = 125.076 cm^2
# 【 사용 철근량 】
# 철근
# 백근 간격
CTC := 200 mm
# 인장 철근
# 배근 갯수
N_As := 1000 mm/CTC = 5
# 사용
# 철근량
As_use := As_D16*N_As = 9.93 cm^2
# 사용
# 철근량 철근비
ρ_use := As_use/(B*d) = 0.23093 %
As_use = 9.93 cm^2
As_min := ρ_min*(B*d) = 12.1398 cm^2
As_max := ρ_max*(B*d) = 125.076 cm^2
As_check :=
    "O.K" if As_max > As_use > As_min
    "N.G" otherwise
    = "N.G"
# 최소 철근비 적용 오류
# 【 휨에 대한 검토 】
# 등가 직사각형
# 응력 블럭의
# 깊이
a := As_use*fy/(0.85*fck*B) = 14.6029 mm
# 설계 강도
ϕMn := 0.85*As_use*fy*(d - a/2) = 104.964 kN*m
Mu = 96.3798 kN*m
Moment_check :=
    "O.K" if ϕMn > Mu
    "N.G" otherwise
    = "O.K"
ϕMn/Mu =  # error
# 【 전단에 대한 검토 】
Vu = 2.184 tonf
B := B_section = 100 cm
# 콘크리트가
# 부담하는
# 전단강도
ϕVc := ϕ_v*(0.53*sqrt(kgf/cm^2))*sqrt(f_ck)*B*d = 1.70925 tonf
# 콘크리트가
# 부담하는
# 전단강도의 1/2
1/2*ϕVc = 0.854625 tonf
Shear_check :=
    "전단보강 불필요" if ϕVc > Vu
    "N.G" otherwise
    = "N.G"
# 【 수평 철근 검토 】
As_H.req := 0.0025*B*d = 10.75 cm^2
# 철근
# 백근 간격
CTC := 200 mm
# 인장 철근
# 배근 갯수
N_As := 1000 mm/CTC = 5
# 사용
# 철근량
As_H.use := As_D13*N_As*2 = 12.67 cm^2
As_check :=
    "O.K" if As_H.use > As_H.req
    "N.G" otherwise
    = "O.K"
# 8. 기초 Pile 검토
# 【 검토 조건 】
# 방음벽
# 지주 간격
SoundProof_Post_CTC
# 8.1 하중 계산
# (1) 콘크리트 기초의 하중
# 【 검토 조건 】
# 기초 벽체
# 폭
B_Cfooting = 0.5 m
# 기초 벽체
# 높이
H_Cfooting = 2 m
# 콘크리트
# 단위중량
r_c = 2.5 tonf/m^3
# 【 고정 하중 】
# 콘크리트 벽체의
# 고정 하중
Vc := B_Cfooting*H_Cfooting*1.0*m*r_c = 2.5 tonf
# (2) 기초 파일의 하중
# 【 검토 조건 】
# 파일의
# 벽체 근입깊이
L_pile_top := 0.5 m
# 파일의
# 하부지층 근입깊이
L_pile_bottom := 4.5 m
# 【 고정 하중 】
# 기초 파일의
# 고정 하중
Vp := 0.094*tf/m*(L_pile_top + L_pile_bottom)
Vp explicit, Vp, L_pile_top, L_pile_bottom → 0.094*tf/m*(0.5*m + 4.5*m) = 0.47 tonf
# (3) 방음벽에 의한 하중
# 방음벽에 작용하는 하중은 자중 및 풍하중을 고려한다.
# 【 검토 조건 】
# 방음벽
# 지주 길이
H_wall = 7 m
# 지주하중
V_post := 0.329*tonf/m  # 방음벽 지주의 중량을 지주 설치 간격으로 나누어 단위m당의 하중으로 환산 적용
# 판넬 하중
V_panel := 0.210*tonf/m  # 방음판넬 1장의 무게를 단위m^2으로 환산한 후 방음벽 높이를 곱하여 단위 m당으로 환산 적용
# 풍하중
# 강도
W_wind = 0.12 tonf/m^2
# 방음벽 기초
# 지상돌출 높이
H_Cfooting.top = 1 m
# 【 고정 하중 】
# 연직 하중
Vw := (V_post + V_panel)*1.0*m = 0.539 tonf
# 【 풍하중 (풍하중 배면 재하시)  】
# 수평 하중
Hw := (W_wind*(H_wall + H_Cfooting.top))*1.0*m = 0.96 tonf
# 모멘트 하중
Mw := Hw*(1/2*(H_wall + H_Cfooting.top) + H_Cfooting.bot) = 4.8 tonf*m
# (4) 토압 하중
# 주동 토압 계산은 Rankine식 ( 전면벽이 수직이고, 보강체 상부가 수평인 경우 ) 적용
# 【 검토 조건 】
# 뒷채움흙의
# 내부마찰각
ϕ_soil = 30 deg
# 뒷채움 흙의
# 단위중량
r_soil = 1.9 tonf/m^3
# 토압 계수
Ka := tan^2(45 deg - ϕ_soil/2) = 0.333333
# 토압
# 작용 높이
H := H_Cfooting.bot = 1 m
# 상재 하중
# 강도
q_soil := 1.0*tonf/m^2
# 【 주동 토압 계산 】
# ① 뒷채움흙에 의한 토압
# 토압
# 작용강도
Pa1 := 1/2*Ka*r_soil*H^2*1.0*m = 0.316667 tonf
# 토압
# 작용위치
y1 := 1/3*H = 0.333333 m
# 모멘트
Mo1 := Pa1*y1 = 0.105556 tonf*m
# ② 상재하중에 의한 토압
# 토압
# 작용강도
Pa2 := Ka*q_soil*H*1.0*m = 0.333333 tonf
# 토압
# 작용위치
y2 := 1/2*H = 0.5 m
# 모멘트
Mo2 := Pa2*y2 = 0.166667 tonf*m
# (5) 충돌 하중
V_co := 0.000*tonf
H_co := 0.000*tonf
M_co := 0.000*tonf*m
# 8.2 하중 조합
# 【 사하중 】
# 콘크리트 기초
# 자중
Vc = 2.5 tonf
# 기초 파일의
# 자중
Vp = 0.47 tonf
# 방음벽
Vw = 0.539 tonf
# 【 토압 하중 】
# 뒷채움흙에 의한
# 토압
Pa1 = 0.316667 tonf
Mo1 = 0.105556 tonf*m
# 상재하중에 의한
# 토압
Pa2 = 0.333333 tonf
Mo2 = 0.166667 tonf*m
# 【 풍하중 】
# 방음벽
Hw = 0.96 tonf
Mw = 4.8 tonf*m
# 【 충돌 하중 】
# 충돌 하중
V_co = 0
H_co = 0
M_co = 0
# 2) 하부 말뚝 기초 배치 간격에 대한 보정
CTC_pile := 1.5
# 【 사하중 】
# 콘크리트 기초
# 자중
Vc := CTC_pile*Vc = 3.75 tonf
# 기초 파일의
# 자중
Vp := Vp = 0.47 tonf
# 방음벽
Vw := CTC_pile*Vw = 0.8085 tonf
# 【 토압 하중 】
# 뒷채움흙에 의한
# 토압
Pa1 := CTC_pile*Pa1 = 0.475 tonf
Mo1 := CTC_pile*Mo1 = 0.158333 tonf*m
# 상재하중에 의한
# 토압
Pa2 := CTC_pile*Pa2 = 0.5 tonf
Mo2 := CTC_pile*Mo2 = 0.25 tonf*m
# 【 풍하중 】
# 방음벽
Hw := CTC_pile*Hw = 1.44 tonf
Mw := CTC_pile*Mw = 7.2 tonf*m
# 【 충돌 하중 】
# 충돌 하중
V_co := CTC_pile*V_co = 0 tonf
H_co := CTC_pile*H_co = 0 tonf
M_co := CTC_pile*M_co = 0 tonf*m
# 【 사하중 】
D_V := Vc + Vp + Vw = 5.0285 tonf
D_H := 0.000*tonf
D_M := 0.000*tonf*m
# 【 토압 하중 】
H_V := 0.000*tonf
H_H := Pa1 + Pa2 = 0.975 tonf
H_M := Mo1 + Mo2 = 0.408333 tonf*m
# 【 풍하중 】
W_V := 0.000*tonf
W_H := Hw = 1.44 tonf
W_M := Mw = 7.2 tonf*m
# 【 충돌 하중 】
CO_V := V_co = 0 tonf
CO_H := H_co = 0 tonf
CO_M := M_co = 0 tonf*m
# 【 하중 조합 】
LCB1_V := 1.0*D_V + 1.0*H_V + 1.0*W_V = 5.0285 tonf
LCB1_H := 1.0*D_H + 1.0*H_H + 1.0*W_H = 2.415 tonf
LCB1_M := 1.0*D_M + 1.0*H_M + 1.0*W_M = 7.60833 tonf*m
LCB2_V := 1.0*D_V + 1.0*H_V + 1.0*CO_V = 5.0285 tonf
LCB2_H := 1.0*D_H + 1.0*H_H + 1.0*CO_H = 0.975 tonf
LCB2_M := 1.0*D_M + 1.0*H_M + 1.0*CO_M = 0.408333 tonf*m
