# P4
1.890 m - (-4.974 m) = 6.864 m
# (1) Colorado State University
K_1 := 1.10  # 교각 전면부 형상에 대한 보정계수
K_2 := 2.30  # 흐름의 유입각에 대한 보정계수
K_3 := 1.10  # 하상조건에 대한 보정계수
K_4 := 1.00  # 하상 재료 크기에 대한 보정계수
D := 2.0  # 교각 폭
y := 1.76  # 교각 직 상류의 수심
Fr := 0.53  # 푸르드 수
y_s_CSU := 2.0*K_1*K_2*K_3*K_4*D^0.65*y^0.35*Fr^0.43 = 8.10179
2.0*K_1*K_2*K_3*K_4*(D/y)^0.65*Fr^0.43*y = 8.10179
# (2) Laursen - Toch
Ka := 0.9  # 교각 접근각도에 의한 수정계수
Ks := 1.0  # 교각 형상에 대한 수정계수
K := (Ka*Ks) = 0.9
b := D = 2  # 교각의 폭
y = 1.76
y_s_Lau_T := 1.5*K*b^0.70*y^0.3 = 2.59842
y_s_Lau_T := 1.35*(y/b)^0.3*b = 2.59842
# (2) Laursen
b = 2
y = 1.76
f(d_s) := 5.5*d_s/y*((d_s/(11.5*y) + 1)^1.7 - 1) - b/y
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d_s := 4
ds := root(f(d_s), d_s)
ds = 2.04522
y_s_Lau := ds = 2.04522
# (3) Froehlich
ϕ := 1.3  # 교각의 형상계수
b' := 2.83  # 투영 교각의 폭
b = 2  # 교각의 폭
y = 1.76
Fr = 0.53
D_50 := 0.03  # 평균 입경
y_s_Fro := (0.32*ϕ*(b'/b)^0.62*(y/b)^0.46*Fr^0.2*(b/D_50)^0.08 + 1)*b = 3.19901
# (4) Andru
h := y  # 교각 지점의 수심
y_s_Andru := 0.8*h = 1.408
# (5) Breusers
D = 2  # 교각의 폭
y_s_Bre := 1.4*D = 2.8
# (6) Neil
y = 1.76
b = 2
y_s_Neil := 1.5*(y/b)^0.3*b = 2.88713
# (7) 계산 결과
y_s_CSU = 8.10179
y_s_Lau = 2.04522
y_s_Neil = 2.88713
y_s_Fro = 3.19901
y_s_Andru = 1.408
y_s_Bre = 2.8
