## 국 부  세 굴  검 토
# (0) 검토 조건
# 제3공구 조만강교 부산방향
D := 2.0  # 교각 폭
y := 4.37  # 교각 직 상류의 수심
Fr := 0.24  # 푸르드 수
ϕ := 1.00  # 교각의 형상계수 ( Froehlich공식 )
b' := 4.00  # 투영 교각의 폭 ( Froehlich공식 )
D_50 := 0.15  # 평균 입경  ( Froehlich공식 )
# (1) Colorado State University
K_1 := 1.00  # 교각 전면부 형상에 대한 보정계수
K_2 := 1.00  # 흐름의 유입각에 대한 보정계수
K_3 := 1.10  # 하상조건에 대한 보정계수
K_4 := 1.00  # 하상 재료 크기에 대한 보정계수
D = 2  # 교각 폭
y = 4.37  # 교각 직 상류의 수심
Fr = 0.24  # 푸르드 수
y_s_CSU := 2.0*K_1*K_2*K_3*K_4*D^0.65*y^0.35*Fr^0.43 = 3.13149
2.0*K_1*K_2*K_3*K_4*(D/y)^0.65*Fr^0.43*y = 3.13149
# (2) Laursen - Toch
Ka := 0.9  # 교각 접근각도에 의한 수정계수
Ks := 1.0  # 교각 형상에 대한 수정계수
K := (Ka*Ks) = 0.9
b := D = 2  # 교각의 폭
y = 4.37
y_s_Lau_T := 1.5*K*b^0.70*y^0.3 = 3.41349
y_s_Lau_T := 1.35*(y/b)^0.3*b = 3.41349
1.5*0.9 = 1.35
# (2) Laursen
b = 2
y = 4.37
f(d_s) := 5.5*d_s/y*((d_s/(11.5*y) + 1)^1.7 - 1) - b/y
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d_s := 4
ds := root(f(d_s), d_s)
ds = 3.2425
y_s_Lau := ds = 3.2425
# (3) Froehlich
ϕ = 1  # 교각의 형상계수
b' = 4  # 투영 교각의 폭
b = 2  # 교각의 폭
y = 4.37
Fr = 0.24
D_50 = 0.15  # 평균 입경
y_s_Fro := (0.32*ϕ*(b'/b)^0.62*(y/b)^0.46*Fr^0.2*(b/D_50)^0.08 + 1)*b = 3.30318
# (4) Andru
h := y  # 교각 지점의 수심
y_s_Andru := 0.8*h = 3.496
# (5) Breusers
D = 2  # 교각의 폭
y_s_Bre := 1.4*D = 2.8
# (6) Neil
y = 4.37
b = 2
y_s_Neil := 1.5*(y/b)^0.3*b = 3.79277
# (7) 계산 결과
# 1. Colorado State University
y_s_CSU = 3.13149
# 2. Froehlich
y_s_Fro = 3.30318
# 3. Laursen
y_s_Lau = 3.2425
y_s := (y_s_CSU + y_s_Fro + y_s_Lau)/3 = 3.22572
y_s = 3.22572
y_s_Andru = 3.496
y_s_Bre = 2.8
y_s_Neil = 3.79277
