# 예제 1.1
kg = 1 N*s^2/m
# 【 문제 】
# 질량이 m := 68.1 kg인 낙하산병이 정지해 있는 열기구에서 낙하한다. 식(1.10)을 사용하여 낙하산이 펴지기 전까지의 속도를 게산하라. 항력계수는 c := 12.5*kg/sec이다.
# 【 풀이 】
# 매개변수값을 식(1.10)에 대입하면
v(t) := g*m/c*(1 - e^(-(c/m)*(t*sec)))
# 이를 이용하면 다음의 값을 얻는다.
t := 0, 2 .. 40
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t = [0; 2; 4; 6; 8; 10; 12; 14; 16; 18; 20; 22; 24; 26; 28; 30; 32; 34; 36; 38; 40]
v(t) = [0; 16.4161; 27.7881; 35.6659; 41.1232; 44.9036; 47.5224; 49.3366; 50.5933; 51.4639; 52.067; 52.4847; 52.7742; 52.9746; 53.1135; 53.2097; 53.2764; 53.3225; 53.3545; 53.3767; 53.392] m/s
