# 예제 4.1
kg = 1 N*s^2/m
# 【 문제 】
# 0차부터 4차까지의 Taylor급수 전개를 사용하여, x_i == 0에서 부터 h == 1로 하여 다음의 함수를 근사하라.
f(x) := (-0.1*x^4) + (-0.15*x^3) + (-0.5*x^2) + (-0.25*x) + 1.2
xi ≡ 0
xi1 ≡ 1
# 즉, x(i + 1) == 1에서의 함수값을 예측하라.
# 【 풀이 】
# 현재 함수의 형태를 알고 있으므로, 0부터 1 사이에서 f(x)값들을 계산해 낼수 있다. 그림(4.1)은 함수가 f(0)=1.2로 부터 시작하고 밑으로 휘어져서 f(1)=0.2의 값을 갖는다는 것을 보여준다. 따라서 예측하고자 하는 참값은 0.2가 된다.
h := xi1 - xi = 1
# 1차 미분
f1(x) := d^1/dx^1(f(x)) → -1.0*x + (-0.45*x^2) + (-0.4*x^3) - 0.25
# 2차 미분
f2(x) := d^1/dx^1(f1(x)) → -0.9*x + (-1.2*x^2) - 1.0
# 3차 미분
f3(x) := d^1/dx^1(f2(x)) → -2.4*x - 0.9
# 4차 미분
f4(x) := d^1/dx^1(f3(x)) → -2.4
# 5차 미분
f5(x) := d^1/dX^1(f4(X)) → 0
# 【  0차 근사 】
f(x[i + 1]) == f(x_i)
f(xi) = 1.2
fxi1 := f(0) = 1.2
# 0차 근사는 상수값을 준다.
# 이 공식을 이용하여 절단오차를 계산하면 x=1에서
E_t := f(1) - fxi1 = -1
# 【  1차 근사 】
f(x[i + 1]) == f(x_i) + d/dx(f(x_i))*(x[i + 1] - x[i])
f1(x) := d/dx(f(x)) → -1.0*x + (-0.45*x^2) + (-0.4*x^3) - 0.25
f1(xi) = -0.25
fxi1 := f(xi) + f1(xi)*h = 0.95
E_t := f(1) - fxi1 = -0.75
# 【  2차 근사 】
f1(x) := d/dx(f(x)) → -1.0*x + (-0.45*x^2) + (-0.4*x^3) - 0.25
f1(xi) = -0.25
f2(x) := d^2/dx^2(f(x)) → -0.9*x + (-1.2*x^2) - 1.0
f2(xi) = -1
fxi1 := f(xi) + f1(xi)*h + f2(xi)/2!*h^2 = 0.45
E_t := f(xi1) - fxi1 = -0.25
