# 【 예제 5.1 】
kgf = 9.80665 N
# 【 문제 】
# 그래프적인 접근법을 사용해서 질량 m := 68.1 kgf인 낙하산병이 자유낙하 10초후에 v := 40*m*sec^-1의 속도를 갖도록 하는 제동계수를 구하라 ( 단, 중력에 의한 가속도는 g := 9.8*m*sec^-2이다.
# 【 풀이 】 | 이 문제는 아래의  매개변수를 사용해서 식(PT2.4)의 근을 구하는 것이다.
# 【 매개변수 】
t := 10 sec
g = 9.8 m/s^2
v = 40 m/s
m = 68.1 kgf
f(c) := (g*m/c*(1 - e^(-(c/m)*t)) - v)
# 다양한 c 값들을 이 방정식의 우변에 대입해 f(c)의 값을 계산한다.
c := 4, 8 .. 20
f(c*kgf/sec) = [34.1148; 17.6534; 6.06694; -2.26876; -8.40063] m/s
c = [4; 8; 12; 16; 20]
f1 := 9.8*68.1/4*(1 - e^(-4/68.1*10)) - 40 = 34.1148
1 kgf = 9.80665 N
f0 := g*10*kgf = 98 kgf*m/s^2
f1 := (9.8*m/sec^2*68.1*kgf/(4*kgf/sec)*(1 - e^(-4*kgf/sec/(68.1 kgf)*10*sec)) - 40*m/sec) = 34.1148 m/s
f1 := (9.8*m/sec^2*68.1*kg/(4*kg/sec)*(1 - e^(-4*kg/sec/(68.1 kg)*10*sec)) - 40*m/sec) = 34.1148 m/s
f1 := (9.8*m/sec^2*68.1*N/(4*N/sec)*(1 - e^(-4*N/sec/(68.1 N)*10*sec)) - 40*m/sec) = 34.1148 m/s
v := 9.8*m/sec^2*68.1*kgf/(4*kgf/sec)*(1 - e^(-(4*kgf/sec/(68.1 kgf))*10*sec)) = 74.1148 m/s
74.115*m/sec - 40*m/sec = 34.115 m/s
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# f(c)의 점들이 그림 5.1에 그려져 있다. 함수곡선은 12와 16사이에서 x 축을 지난다. 그림을 잘 살펴보면 근의 대략적인 추정값은 14.75가 됨을 알 수 있다. 그래프적인 근의 추정값의 유효성은 식(E5.1.1)에 대입해 검사함으로써 알 수 있다.
f(14.75*kgf/sec) = 0.0589535 m/s
# 이 값은 0에 가깝다. 또한, 추정값과 에젱에서 주어진 매개변수값을 아래와 같이 식(PT2.4)에 대입함으로써 추정값을 검사할 수 있다.
v := 9.8*68.1/14.75*(1 - e^(-(14.75/68.1)*10)) = 40.059
# 이것은 우리가 원하는 낙하속도값 40*m/sec에 매우 가깝다.
c := 5 .. 20
f(c) := 667.38/c*(1 - e^(-0.146843*c)) - 40
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x := 3, 3.001 .. 5
f(x) := sin(10*x) + cos(3*x)
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x = [
    3; 3.001; 3.002; 3.003; 3.004; 3.005; 3.006; 3.007; 3.008; 3.009
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]
f(x) = [
    -1.89916; -1.8988; -1.89834; -1.89776; -1.89708; -1.8963; -1.8954; -1.89441; -1.8933; -1.89209
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]
