tonf := 1000 kgf
# 1. 설계 요약표
# 예제 A-3  ( 단면의 저항모멘트 )
# 【 문제 】
# 활하중 W_L := 2.3*tonf*m^-1,자중을 포함하지 않은 사하중 W_D := 1124 kgf*m^-1을 지지해야 할 지간 L := 9.6 m의 단순보가 있다.
#
# 이 보의 단면을 단철근 직사각형으로 결정하라.
#
# 하중은 모두 사용하중이다.
# f_ck := 210 kgf*cm^-2 , f_y := 3000 kgf*cm^-2  (SD30) 이다.
# 【 단면 제원  】
# b | : 단면의 폭
# d | : 단면의 유효높이
# 【 철근  】
# As | : 사용 철근량
# 【 작용력  】
# M | : 사용하중 상태 모멘트
# 【 사용 재료  】
f_ck = 210 kgf*cm^-2  # : 콘크리트 설계기준 강도
E_c := 15000*sqrt(kgf*cm^-2)*sqrt(f_ck)
E_c = 217371 kgf*cm^-2  # : 콘크리트의 탄성계수
f_y = 3000 kgf*cm^-2  # : 철근의 항복강도
E_s := 2000000 kgf*cm^-2  # : 철근의 탄성계수
# 【 풀이 】
# 단면에 대한 아무런 제약이 없으므로 균형단면이 되도록 설계 할 수 있다.
# 【 허용 응력 계산  】
# 콘크리트와 철근의 허용응력은 다음과 같다.
f_ca := 0.4*f_ck = 84 kgf/cm^2
# 콘크리트
# 허용 압축응력
f_sa := 1500*kgf/cm^2
# 철근
# 허용 인장응력
# 【 탄성게수비 】
n := trunc(E_s/E_c) = 9  # 탄성 계수비
# 【 균형단면의 계수 C1, C2 계산 】
C_1 := (n*f_ca + f_sa)/(n*f_ca)*sqrt(6*n/(3*f_sa + 2*n*f_ca)) = 0.282816 cm/kgf^(1/2)
C_2 := f_ca/(2*f_sa)*sqrt(6*n/(3*f_sa + 2*n*f_ca)) = 0.00265366 cm/kgf^(1/2)
# 【 균형단면의 중립축의 위치 】
k := n*f_ca/(n*f_ca + f_sa) = 0.335106  # 중립축비
x == k*d
# 【 균형단면 우력의 팔길이 】
z == j*d == d - k*d/2 == (1 - k/3)*d
j := 1 - k/3 = 0.888298
# 【 균형단면의 균형철근비  】
ρ_0 := k/2*f_ca/f_sa = 0.00938298
# 【 사용하중 모멘트  】
# 【 사하중 모멘트  】
# 보의 자중을 W_W := 1200 kgf*m^-1로 가정하면 사하중(고정하중)에 의한 휨모멘트는
M_D := 1/8*(W_D + W_W)*L^2 = 26.7725 tonf*m
W_D = 1.124 tonf*m^-1
W_W = 1.2 tonf*m^-1
L = 9.6 m
# 【 활하중 모멘트  】
M_L := 1/8*W_L*L^2 = 26.496 tonf*m
W_L = 2.3 tonf*m^-1
L = 9.6 m
# 【 사용하중 총모멘트  】
M := M_D + M_L = 53.2685 tonf*m
# 【 단면 계산 】
# b := 50 cm로 가정하고 식 (A.15)에 의하여 유효 높이 d를 계산한다.
d := C_1*sqrt(M/b) = 92.3113 cm
C_1 = 0.282816 cm/kgf^(1/2)
M = 53.2685 tonf*m
b = 50 cm
# 철근이 1단 배치 된다고 가정하면 보의 높이 h는 다음과 같이 될것이다.
h == d + 주철근지름의*1/2 + 스터럽의지름 + 철근피복
# 그런데 철근의 피복두께는 일반적으로 4cm 이상이고, 스트럽은 D10(지름 9.53mm) 또는 D13(지름 12.7mm)가 주로 쓰인다. 주철근으로 D29(지름 28.6mm)를 사용한다면 보의 높이 h는 유효높이 92.4cm보다 6.4cm~6.7cm가 더 커야 한다.
# 그러므로 보의 높이는 h := 92.4 + 6.7 = 99.1가 필요하다.
# 이에 대하여 보의 단면은 50 cm*100*cm로 하고 자중을 계산해 본다
# 철근 콘크리트의 단위중량은 rc := 2500*kgf*m^-3이므로
# 이 보의 자중은
rc := 2500 kgf*m^-3
W := rc*0.5*m*1*m = 1250 kgf/m
# 이것은 가정한 자중과 거의 같다.
# 따라서 보의 단면은 b := 50 cm , h := 100 cm 로 결정한다.
# 실제의 유효 깊이는
# 철근 피복 두께를 d' := 6.7 cm로 가정하면
d := h - d' = 93.3 cm
# 소요 철근량은 식 (A.18)로 부터
As := M/(f_sa*j*d) = 42.8488 cm^2
# As := 7*6.424*cm^2 = 44.968 cm^2 을 사용하기로 하고 이 철근들을 그림에서와 같이 1단으로 배치한다. 그러면 단면의 최소폭은 부록 표C-4로 부터 48 cm를 얻는다. 따라서 단면의 폭 b = 50 cm는 적당하다.
# 【 응력 검토 】
# 인장측 하단으로부터 철근 도심까지는
d_0 := 4 cm  # 피복두께
d_1 := 1.27 cm  # 스트럽 직경
d_2 := 2.86 cm  # 주철근 직경
d' := d_0 + d_1 + d_2*1/2 = 6.7 cm
# 여기서 스트럽 철근은 가정된 값이다. 그러면 유효 깊이는
d := h - d' = 93.3 cm
# 따라서, 중립축의 위치 x는 식(A.5)에 의하여
x := -n*As/b + n*As/b*sqrt(1 + 2*b*d/(n*As)) = 31.6034 cm
# 콘크리트 및 철근의 응력은 식 (A.7)로 부터
f_c := M/((1/2*b*x)*(d - x/3)) = 81.4605 kgf/cm^2
f_s := M/(As*(d - x/3)) = 1431.26 kgf/cm^2
# 따라서 각각 허용응력을 초과하지 않으므로 적당하다.
# 압축측
# 콘크리트의
# 저항모멘트
Mrc := (1/2*f_ca*b*x)*(d - x/3) = 54.9291 tonf*m
# 인장측
# 철근의
# 허용인장응력
Mrs := (f_sa*As)*(d - x/3) = 55.827 tonf*m
# 저항 모멘트
Mr := min(Mrc, Mrs) = 54.9291 tonf*m
# 따라서 이 단면은 최대 모멘트는 Mr = 54.9291 tonf*m 를 저항 할 수 있다.
