tonf := 1000 kgf
# 1. 설계 요약표
# 2. 설계 조건
# 1) 구조 형식
# 2) 재료 중량
# 3) 사용재료의 강도
# 4) 토압계산에 사용되는 흙의 단위중량
# 5) 지진 계수
# 6) 노면활하중
B_o := 11.7 m  # 암거의 전체폭
H_o := 3.8 m  # 암거의 전체 높이
B := 3.0 m  # 활하중의 점유폭
D := 1.0 m  # 토피 두께
W_1 := 0.2 m + D = 1.2 m  # 활하중의 종방향 분포폭
Pr := 96 kN  # 차륜 하중
i := 0.3  # 충격 계수
Pvl := 2*Pr*(1 + i)/(B*W_1) = 69.3333 kN/m^2
P := 2*Pr/(3.0 m) = 64 kN/m
Pvl := 2*P*(1 + i)*(B_o - D - 0.1 m)/B_o^2 = 12.8851 kN/m^2
Pvl :=
    2*Pr*(1 + i)/(B*W_1) if B_o ≤ W_1
    2*P*(1 + i)*(B_o - D - 0.1 m)/B_o^2 otherwise
    = 12.8851 kN/m^2
Pvl = 12.8851 kN/m^2
# 3. 단면 가정
