# 사용 기호
tonf := 1000 kgf
# 【 부재 치수 】
# b | : 판폭두께비 산정용 판의 폭
# b_f | : 플랜지 폭
# d | : 춤
# t | : 두께
# t_w | : 웨브 두께
# h_c | : 그림 4.1.1에서 규정한 웨브 치수
# h_w | : 그림 4.1.1에서 규정한 웨브 치수
# 【 부재 단면 특성 】
# A_g | : 부재의 총단면적
r
# : 단면2차반경
r == sqrt(I/A)
# I | : 단면2차모멘트
# 【 재료 물성치 】
# E_s | : 강재의 탄성계수
# 【 부재 강도 】
# F_cr | : 좌굴응력
# F_r | : 플랜지내의 잔류압축응력
# F_y | : 항복강도
# G | : 식(해4.2.2)에서 규정한 Alignment chart parameter
# G' | : 식(해4.3.1)에서 규정한 Alignment chart parameter
# 【 좌굴 길이 】
# K | : 좌굴 길이 계수
# KL | : 좌굴길이
# L | : 부재 길이
# 【 압축 강도 】
# P | : 축방향력
# P_n | : 공칭 압축 강도
# P_u | : 소요 압축 강도
# ϕ_c*P_n | : 설계 압축강도
# ϕ_c | : 압축재의 강도감소계수
# 【 세장 변수 】
# λ_c | : 압축재의 세장변수
# λ_p | : 콤펙트 요소의 판두께비 제한값
# λ_r | : 비콤펙트 요소의 판폭두께비의 제한값
# 【 변형 】
# Δ | : 압축 변형량
