# 사용 기호
tonf := 1000 kgf
# 【 부재 치수 】
# b | : 판폭두께비 산정용 판의 폭
# b_f | : 플랜지 폭
# d | : 춤
# t | : 두께
# t_w | : 웨브 두께
# h_c | : 그림 4.1.1에서 규정한 웨브 치수
# h_w | : 그림 4.1.1에서 규정한 웨브 치수
# 【 부재 단면 특성 】
# A_g | : 부재의 총단면적
r
# : 단면2차반경
r == sqrt(I/A)
# I | : 단면2차모멘트
# 【 재료 물성치 】
# E_s | : 강재의 탄성계수
# 【 좌굴 길이 】
# K | : 좌굴 길이 계수
# KL | : 좌굴길이
# L | : 부재 길이 , 부재의 비지지 길이
# 【 세장 변수 】
# λ_c | : 압축재의 세장변수
λ_c == F_y/F_cr
λ_c == F_y/F_cr == F_y/(π^2*E/(K*L/r)^2) == K*L/r*sqrt(F_y/(π^2*E)) == K*L/(r*π)*sqrt(F_y/E_d)
# λ_p | : 콤펙트 요소의 판두께비 제한값
# λ_r | : 비콤펙트 요소의 판폭두께비의 제한값
# 【 부재 강도 】
# F_cr | : 오일러의 좌굴응력
F_cr == P_cr/A == (n^2*π^2*E*I/L^2)*(1/A) == π^2*E/(L/r)^2
F_cr == P_cr/A == π^2*E/(L/r)^2
# F_r | : 플랜지내의 잔류압축응력
# F_y | : 항복강도
# G | : 식(해4.2.2)에서 규정한 Alignment chart parameter
# : 보의 강성과 기둥 강성의 강성비
# G' | : 식(해4.3.1)에서 규정한 Alignment chart parameter
# 【 압축 강도 】
# P | : 축방향력
# P_n | : 공칭 압축 강도
P_n == A_g*F_cr
# P_u | : 소요 압축 강도
# ϕ_c*P_n | : 설계 압축강도
# ϕ_c | : 압축재의 강도감소계수
# P_cr | : 오일러의 좌굴하중
n
# : 좌굴 형태 계수
P_cr == n^2*π^2*E*I/L^2
# 【 변형 】
# Δ | : 압축 변형량
Δ == P*L/(E_s*A_s)
k^2 == P/(E*I)
E*I*y'' + P*y == 0
E*I/(E*I)*y'' + P/(E*I)*y == 0
y'' + k^2*y == 0
y == A*sin(k*x) + B*cos(k*x)
y(0) == 0
y(L) == 0
