# 예제 A-1
tonf := 1000 kgf
# 【 문제 】
# b := 30 cm , d := 50 cm , As := 15.20 cm^2인 단철근 직사각형 단면의 보가 있다. 이 단면에 사용하중에 의한 휨모멘트가 M := 9*tonf*m이 작용할 때, 콘크리트 및 철근의 응려을 계산하라. f_ck := 210 kgf*cm^-2 , f_y := 3000 kgf*cm^-2  (SD30) 이다.
b = 30 cm
d = 50 cm
As = 15.2 cm^2
M = 9 tonf*m
E_s := 2000000 kgf*cm^-2
E_c := 15000*sqrt(kgf*cm^-2)*sqrt(f_ck) = 217371 kgf*cm^-2
# 【 풀이 】
# 탄성 계수비
n := trunc(E_s/E_c) = 9
# 철근비
ρ := As/(b*d) = 0.0101333
# 압축측 연단에서
# 중립축까지의 거리
x := -n*As/b + n*As/b*sqrt(1 + 2*b*d/(n*As)) = 17.2756 cm
# 콘크리트의 응력
f_c := 2*M/(b*x*(d - x/3)) = 78.5034 kgf/cm^2
# 철근의 응력
f_s := M/(As*(d - x/3)) = 1338.35 kgf/cm^2
