# 예제 A-2  ( 단면의 저항모멘트 )
tonf := 1000 kgf
# 【 문제 】
# b := 30 cm , d := 50 cm , As := 15.20 cm^2인 단철근 직사각형 단면의 보가 있다.
#
# 이 단면에 사용하중에 의한 휨모멘트가 M := 9*tonf*m이 작용할 때, 단면의 저항 모멘트를구하시오
# f_ck := 210 kgf*cm^-2 , f_y := 3000 kgf*cm^-2  (SD30) 이다.
# 【 단면 제원  】
b = 30 cm  # : 단면의 폭
d = 50 cm  # : 단면의 유효높이
# 【 철근  】
As = 15.2 cm^2  # : 사용 철근량
# 【 작용력  】
M = 9 tonf*m  # : 사용하중 상태 모멘트
# 【 사용 재료  】
f_ck = 210 kgf*cm^-2  # : 콘크리트 설계기준 강도
E_c := 15000*sqrt(kgf*cm^-2)*sqrt(f_ck)
E_c = 217371 kgf*cm^-2  # : 콘크리트의 탄성계수
f_y = 3000 kgf*cm^-2  # : 철근의 항복강도
E_s := 2000000 kgf*cm^-2  # : 철근의 탄성계수
# 【 풀이 】
# 【 중립축의 위치  】
# 탄성 계수비
n := trunc(E_s/E_c) = 9
# 압축측 연단에서
# 중립축까지의
# 거리
x := -n*As/b + n*As/b*sqrt(1 + 2*b*d/(n*As)) = 17.2756 cm
# 【 허용 응력 계산  】
# 콘크리트
# 허용 압축응력
f_ca := 0.4*f_ck = 84 kgf/cm^2
# 철근
# 허용 인장응력
f_sa := 1500*kgf/cm^2
# 【 저항 모멘트 계산 】
# 압축측
# 콘크리트의
# 저항모멘트
Mrc := (1/2*f_ca*b*x)*(d - x/3) = 9.63016 tonf*m
# 인장측
# 철근의
# 허용인장응력
Mrs := (f_sa*As)*(d - x/3) = 10.0871 tonf*m
# 저항 모멘트
Mr := min(Mrc, Mrs) = 9.63016 tonf*m
# 따라서 이 단면은 최대 모멘트는 Mr = 9.63016 tonf*m 를 저항 할 수 있다.
