# 3.1 개요
# 【 사용 기호의 설명 】
# f_ck | 콘크리트의 설계기준 강도
# f_y | 철근의 항복강도
# E_c | 콘크리트의  탄성계수
E_c == 4700*sqrt(f_ck)*MPa
# E_s | 철근의 탄성계수
E_s := 200000 MPa = 200000 MPa
# ε_u | 철근 콘크리트보의 최대 압축 변형율
ε_u := 0.003
# ε_y | 철근의 항복 변형율
ε_y == f_y/E_s
Q
# 단면내의 임의 점에서의 단면1차모멘트.
# 즉, 전단응력을 구하고자하는 임의 점 바깥의 면적에 대한 중립축으로부터의 단면1차모멘트
# I | 중립축에 대한 단면2차모멘트
# b | 단면의 폭
# c | 보의 압축연단에서 중립축까지의 거리
k
# 탄성응력 상태에서 압축연단에서 중립축까지의 거리는 통상적으로 유효깊이의 일부로서 k*d로 표현된다.
#
# 일단 콘크리트에 균열이 발생하면, 인장철근 아래에 있는 위치한 부분은 효과를 상실하며, 이것이 보의 유효깊이를 d로하는 이유가 된다.
#
# c == k*d 로 계산되는 경우
j
# C와 T로 구성되는 짝힘 사이의 내부모멘트의 팔길이이다.
# j*d == d - k*d/3
# k*d/3은 압축력C의 작용점에서 안축측연단까지의 거리이다.
# a | 등가응력직사각형의 깊이
# 3.2 균질보의 휨
# 휨 및 전단에 관계되는 기본 가정은 다음과 같다.
# 1. 하중이 작용하기 전에 평면이었던 단면은 하중이 작용하는 상태에서도 평면을 유지한다. 이것은 보에서 단위 변형률이 중립축의 위와 아래에서 중립축으로 부터의 거리에 비례하는것을 의미한다.
# 5. 중립면에서 수평전단응력과 수직전단응력이 같고 휨응력도 0이기 때문에, 그 평면의 임의 점에서의 경사 인장응력과 압축응력은 수평축과 45도의 각을 이루고, 각각의 크기는 그 점에서의 전단응력과 같다.
# 【 중립면에서의 주응력 】
# 휨응력의 크기
f := 10 MPa
# 전단응력의 크기
v := 10 MPa
# 주응력의 크기
t_1 := f/2 + sqrt(f^2/4 + v^2) = 16.1803 MPa
t_2 := f/2 - sqrt(f^2/4 + v^2) = -6.18034 MPa
# 주응력의 경사각
tan(2*α) == 2*v/f
2*v/f = 2
α := atan(2*v/f)/2 = 31.7175 deg
tan(2*31.717*deg) = 1.99992
# 【 중립면에서의 주응력 】
# 휨응력의 크기
f := 10 MPa
# 전단응력의 크기
v := 0 MPa
# 주응력의 크기
t_1 := f/2 + sqrt(f^2/4 + v^2) = 10 MPa
t_2 := f/2 - sqrt(f^2/4 + v^2) = 0 MPa
# 주응력의 경사각
tan(2*α) == 2*v/f
2*v/f = 0
α := atan(2*v/f)/2 = 0 deg
tan(2*31.717*deg) = 1.99992
# 3.3 철근콘크리트 보의 거동
# 철근 콘크리트보는 작용하는 하중이 0으로부터 점진적으로 증가하여 보를 파괴시키는 하중단계에 이르는 동안, 몇단계의 중요한 거동으로 구분할 수 있다.
# 【 낮은 하중 단계에의 거동 】
# 인장측 연단에서의 콘크리트에 작용하는  최대 인장응력이 "콘크리트의 휨인장강도" 보다 작을 때에는, 보의 전체 단면이 인장과 압축 응력에 저항하는데 유효하다.
#
# 이때 단면 중립축을 기준으로 한쪽은 압축을 받고 다른 한 쪽은 인장을 받는다.
#
# 또한 인장측에 설치된 철근은 같은 위치의 콘크리트와 동일한 양의 변형을 일으키며 이에 따른 인장응력을 받는다.
#
# 이 단계에서 콘크리트에 작용하는 응력의 값은 작고 변형률에 비례한다.
# 【 콘크리트 인장응력이 인장강도에 도달하는 단계 】
# 하중이 더 증가하면, 콘크리트의 인장응력은 곧 콘크리트 인장강도에 도달하게 되고 이 단계에서 인장측에 인장균열이 발생한다. 균열은 빠르고 점진적으로 인장 하면에서 중립면 쪽으로 전파된다.
#
# 잘 설계된 보라면 이러한 균열의 폭은 매우 작으며, 따라서 부식보호 측면이나 미관적인 관점에서 별문제가 되지 않는다. 그러나 균열의 존재는 하중을 받고 있는 보의 거동에 많은 영향을 미친다.
#
# 균열 단면에서 콘크리트는 어떠한 인장응력도 받지 못하며, 철근이 전체 인장을 부담하게 된다. 중간 단계의 하중에서 콘크리트의 압축응력이 대략 f_y/2를 넘지 않으면, 응력과 변형률은 계속적으로 거의 비례한다.
# 중간 단계에서 하중이 더욱 증가하게 되면, 응력과 변형률은 이에 상응하여 증가하지만, 더 이상 비례하지 않는다. 즉, 응력과 변형율 사이의 비선형 관계는 콘크리트의 응력-변형율 곡선에 의해 결정된다.
#
# 그러므로 균질보에서 처럼, 보의 압축부에서의 콘크리트의 응력분포는 응력-변형률곡선과 같은 모양을 가진다.
# 그림 3.2f는 극한하중에 근접한 보에서 변형률과 응력의 분포를 보여준다.
# 【 보가 최대 하중능력에 도달한 경우 】
# 최종적으로 보가 최대 하중능력에 도달하면, 파괴는 두가지 방법중 하나의 형태로 발생한다.
# 【 인장철근의 인장파괴 】
# 인장철근이 상대적으로 적은 양이 배치되면, 인장철근이 먼저항복점에 도달한다.
#
# 철근이 항복하면 보의 심각한 처짐 발생과 동시에 인장 균열의 폭은 눈에 띄게 넓어지고, 위 쪽으로 전파된다. 이 상태에서, 남아 있는 콘크리트 압축부의 변형률은 콘크리트가 압축파쇄되는 정도까지 증가하며, 철근 항복하중 보다 조금 더 큰 하중상태에서 2차 압축파과가 잇따라 일어난다. 그러므로, 철근에서 항복점의 도달은 실제적으로 철근콘크리트보의 저항능력을 결정한다.
#
# 철근의 항복 파괴는 점진적이며, 항복 파괴 시 눈에 띄는 처짐의 증가와 균열 폭 및 균열 길이의 증가 등과 같은 현상이 선행되어 경고를 주게 된다.
# 【 콘크리트의 압축파쇄 】
# 상대적으로 많은 양의 철근이 배근된다면, 철근이 항복을 시작하기 전에 콘크리트의 압축응력이 압축강도에 도달하게 된다. 이 때, 압축변형률이 커지면서 콘크리트는 압축파괴에 의해 파괴된다.
#
# 이러한 압축파괴가 발생하는 정확한 기준은 아직 알려져 있지 않지만, 압축을 받는 직사각형 보에서 콘크리트의 변형률이 대략 0.003~0.004의 값에 도달할 때 파괴가 일어난다고 관찰 되었다.
#
# 콘크리트의 압축파괴는갑작스럽고, 대부분 폭발적인 성질을 지니며, 경고 없이 발생하여 위험하다. 이러한 이유로 콘크리트의 압축파괴보다는 철근의 항복에 의한 파괴가 유발되도록 보를 설계하여야 한다.
# A. 탄성응력상태 및 단면에서 균열이 발생하지 않은 경우
# 콘크리트에 발생하는 인장응력이 휨인장강도보다 작은 한도 내에서는 인장균열이 발생하지 않는다. 이때 응력과 변형률 분포는 그림 3.2c에 나타난 바와 같다.
f == M*y/I  # ( 3.2 )
f_max == M*c/I == M/S  # ( 3.3 )
v == V*Q/(I*b)  # ( 3.4 )
# 예제 3.1
b := 250 mm
f_ck := 27 MPa
E_c := 4700*sqrt(MPa)*sqrt(f_ck) = 24421.9 MPa
h := 650 mm
f_bck := 3.5 MPa
d := 600 mm
f_y := 400 MPa
E_s := 2.0*10^5*MPa
A_s := 1520 mm^2
n := floor(E_s/E_c) = 8
M := 60 kN*m
# 【 철근의 환산단면적 】
nA_s := (n - 1)*A_s = 10640 mm^2
# 【 단면1차모멘트에 의한 중립축의 계산 】
Q1 == (b*y)*y/2
Q2 == nA_s*(d - y) + (b*(h - y))*(h - y)/2
f(y) := (b*y)*y/2 - ((nA_s*(d - y)) + b*(h - y)*(h - y)/2)
y := 100 mm  # ( 2차방정식 풀이를 위한 초기치 가정값 )
y_top := root(f(y), y, 0 mm, 650 mm)
y_top = 341.9 mm  # 중립축에서 상연까지의 거리
y_bot := h - y_top = 308.1 mm  # 중립축에서 하연까지의 거리
# 【 중립축에 대한 단면2차모멘트 】
I_c_top := (b*y_top^3/12) + (b*y_top)*(y_top/2)^2 = 3.33054e9 mm^4
I_c_bot := (b*y_bot^3/12) + (b*y_bot)*(y_bot/2)^2 = 2.43722e9 mm^4
I_s := nA_s*(d - y_bot)^2 = 906585323 mm^4
I := I_c_top + I_c_bot + I_s = 6.67435e9 mm^4
# 【 연단에서의 응력 】
# 부재 상부 연단에서의
# 콘크리트의 압축응력
f_c := M/I*y_top = 3.07355 MPa
# 부재 하부 연단에서의
# 콘크리트의 인장응력
f_ct := M/I*y_bot = 2.76971 MPa
# 철근의 인장응력
f_s := n*M/I*(d - y_top) = 18.5618 MPa
# 【 계산 결과 】
f_c예제1 := f_c = 3.07355 MPa
f_s예제1 := f_s = 18.5618 MPa
I_비균열단면 := I = 6.67435e9 mm^4
# B. 탄성응력상태 및 균열단면의 경우
# 균열단면 :  인장측 연단의 콘크리트에서의 인장응력이
# 콘크리트의 파괴계수를 초과하면 균열이 발생한다.
#
# 탄성응력상태 : 콘크리트의 압축응력이 대략0.5*f_ck보다 작은 경우,
# 철근은 항복점에 도달하지 않고,
# 두재료는 계속 탄성적으로 거동한다.
#
# 이 상황은 일반적으로 사용하중상태에서 나타나며. 이 단계에서, 인장균열은 중립축으로 진행된다.
# 【 압축연단에서 중립축까지의 거리 】
kd
# 압축연단에서 중립축까지의 거리는 통상적으로 유효깊이 d의 일부로서 (k*d)로서 표현된다.
#
# ( 일단 콘크리트에 균열이 발생하면, 인장 철근 아래에 위치한 부분은 효과를 상실하며, 이것이 보의 유효깊이를 d로 하는 이유가 된다 )
# 【 중립축의 위치 계산 】
# 중립축의 위치는, 중립축에 대한 인장면적의 1차모멘트와 압축면적의 1차모멘트가 같도록 함으로, 다음과 같이 얻어진다.
# 압축면적의
# 중립축에 대한
# 1차모멘트
Ac == (b*kd)*kd/2
# 인장면적의
# 중립축에 대한
# 1차모멘트
At == (n*As)*(d - kd)
# 인장력을 받는 모든 콘크리트는 균열이 발생한다고 가정한다. 따라서 인장면적 산정 시 콘크리트의 면적은 고려하지 않는다.
b*kd^2/2 - n*A_s*(d - kd) == 0  # ( 3.5 )
# 위의 2차방정식을 풀면, kd를 얻을 수 있고, 이값을 이용하여 환산단면의 단면2차모멘트와 기타 계수를 결정할 수 있다.
# 중립축의 위치 c=kd를  계산하면 단면에 작용하는 압축력과 인장력을 구할 수 있다. 즉, 탄성상태에서 압축응력은 압축연단에서 최대값 fc를 갖고 중립축으로부터 거리에 따라 선형적으로 분포한다.
# 【 총압축력과 총인장력의 계산 】
# 총압축력
C == f_c/2*b*kd
# 총인장력
T == A_s*f_s  # ( 3.6 )
# 이 두 힘이 수치적으로 같다는 조건은 중립축의 위치를 결정하는 과정에서 이미 반영하였다. (중립축에 비례하므로)
# 평형조건에 따라 C와 T로 구성되는 짝힘은 외부에서 작용하는 휨모멘트M과 같다.
# 【 압축력 C의 작용점에 대한 모멘트  】
M == T*(j*d) == A_s*f_s*j*d  # ( 3.7 )
# j*d | C와 T사이의 내부모멘트의 팔길이이다.
# 【 철근의 응력  】
# 식 (3.7)로부터 철근의 응력은 다음과 같이 표현된다.
f_s == M/(A_s*j*d)  # ( 3.8 )
# 【 인장력 T의 작용점에 대한 모멘트  】
M == C*(j*d)
M == 1/2*f_c*b*kd*(j*d) == f_c/2*k*j*b*d^2
# ( 3.9 )
# 【 콘크리트의 응력  】
# 위 식으로 부터 콘크리트의 응력은 다음과 같다.
f_c == 2*M/(k*j*b*d^2)  # (3.10)
# 【 k와 j의 계산  】
ρ == As/(b*d)  # ( 3.11 )
k == sqrt((ρ*n)^2 + 2*ρ*n) - ρ*n  # ( 3.12 )
j == 1 - k/3  # ( 3.13 )
# 예제 3.2  ( 균열 단면의 경우 )
# 예제 3.1의 보가 휨모멘트 M := 120 kN*m를 받는다고 보아 관련되는 단면계수와 응력을 계산하여라.
# 모멘트M = 120 kN*m이 작용하게되면 콘크리트의 인장강도를 훨씬 넘어 균열이 발생하게 되고, 따라서 해석방법이 균열단면의 경우로 바꿔어야 한다.
# 식 (3.5)에 주어진 값 b = 0.25 m,n = 8,A_s = 1520 mm^2 을 대입하면
# 【 압축연단에서 중립축 까지의 거리 】
f(kd) := b*kd^2/2 - n*A_s*(d - kd)
kd := 100 mm
kd := root(f(kd), kd, 0 mm, 650 mm)
kd = 197.802 mm
k := kd/d = 0.32967
j := 1 - k/3 = 0.89011
I_c_top := (b*kd^3/12) + (b*kd)*(kd/2)^2 = 644925485 mm^4
I_c_bot := 0.000 = 0 mm^4
I_s := nA_s*(d - kd)^2 = 1.72116e9 mm^4
I := I_c_top + I_c_bot + I_s = 2.36609e9 mm^4
# 【 철근의 응력 】
f_s := M/(A_s*(j*d)) = 147.823 MPa
# 【 콘크리트의 응력 】
f_c := 2*M/(k*j*b*d^2) = 9.08753 MPa
# 앞의 예제에서 계산된 1/2의 휨모멘트를 받는 보의 값과 결과를 비교하여 보면, 다음과 같은 사항을 알 수 있다.
#
# (1)  중립면은 위쪽으로 옮겨져
# 부재 상단으로부터 거리는 y_top = 341.9 mm 에서
# kd = 197.802 mm 로 변하였다.
#
# (2) 휨모멘트는 단지 두배가 되었지만 철근의 응력은
# f_s예제1 = 18.5618 MPa 에서
# f_s = 147.823 MPa로
# 약 f_s/f_s예제1 = 7.96382 배가 증가하였고,
# 콘크리트 압축강도는
# f_c예제1 = 3.07355 MPa에서
# f_c = 9.08753 MPa로
# f_c/f_c예제1 = 2.95668 배가 증가하였다.
#
# (3) 균열 환산단면의 단면2차모멘트는
# I = 2.36609e9 mm^4로  쉽게 계산되며,
#
# 비균열단면의 단면2차모멘트
# I_비균열단면 = 6.67435e9 mm^4값 보다 휠씬 작아졌다.
# C. 휨강도
# f_av | 파괴가 발생하기전의 평균압축응력
α == f_av/f_ck
# 총 압축력
C == (α*f_ck)*(b*c)
# 【 압축력 C의 작용위치 ( 압축측 연단에서 ) 】
# 보의 압축연단에서 중립축까지의 거리가 c일때 압축력 C의 작용위치는 c의 일부분 즉, β*c로 표현할 수 있다.
# c | 보의 압축연단에서 중립축 까지의 거리
(β*c)
# 압축력 C의 작용위치
# 보의 압축연단에서 중립축 까지의 거리가 c일때 압축력 C의 작용위치는 c의 일부분 즉, β*c 로 표현할 수 있다.
# 따라서 특정강도에 대한 콘크리트의 압축응력의 효과를 정의하기 위해서는 α와β만이 필요하다.
C == T
# 즉,
(α*f_ck)*(b*c) == A_s*f_s
# 또한, C와 T이 짝힘에 의한 휨모멘트는 다음과 같이 표현된다.
M == T*z == A_s*f_s*(d - β*c)  # ( 3.17 )
# 또는
M == C*z == α*f_ck*(b*c)*(d - β*c)
# ( 3.18 )
# 【 철근의 인장파괴 기준 】
# 철근이 항복에 의한 인장 파괴를 일으킬때, 철근응력의 응력은  f_s == f_y 이다. 이 값을 (3.16)에 대입하면, 중립축 까지의 거리를 구할 수 있다.
c == A_s*f_y/(α*f_ck*b)  # ( 3.19 a )
# A_s == ρ*(b*d) 관계를 이용하면 인장파괴가 발생할 때, 중립축까지의 거리는 다음과 같이 표현된다.
c == ρ*f_y*d/(α*f_ck)  # ( 3.19 b )
# 공칭휨강도 M_n은 c의 값과 f_s == f_y를 식 (3.17)에 대입하여 얻을 수 있다. 즉,
M_n == T*z
M_n == (A_s*f_y)*(d - β*c)
M_n == ρ*f_y*b*d^2*(1 - β*f_y*ρ/(α*f_ck))  # ( 3.20 a )
# α와 β의 값을 이용하면, 앞의 식은 다음과 같이 표현된다.
α := 0.72
β := 0.425
β/α = 0.590278
M_n == ρ*f_y*b*d^2*(1 - 0.59*ρ*f_y/f_ck)  # ( 3.20 b )
# 【 콘크리트의 압축파괴 기준 】
# 압축파괴에 대한 기준은 앞에서 정의한 바와 같이 콘크리트의압축 변형율이 ε == 0.003 일 때이다.
# ε_u | 압축측 연단에서의 콘크리트의 변형율
# ε_s | 인장측 철근위치에서의 변형율
# 철근이 항복점에 도달하지 않은 상태에서는 철근응력f_s 는 훅크의 법칙에 따라서 철근의 변형율(ε_s )에 비례한다. 즉,
f_s == ε_s*E_s
f_s == (ε_u*(d - c)/c)*E_s  # ( 3.21 )
# 이 f_s를 식 (3.16)에 대입하면,
α*f_ck*(b*c) == A_s*f_s
(α*f_ck)*(b*c) == A_s*(ε_u*(d - c)/c)*E_s
# ( 3.22 )
(α*f_ck*b)*c^2 + (A_s*ε_u*E_s)*c - (A_s*ε_u*d*E_s) == 0
# 위의 2차방정식을 주어진 보에서 유일한 미지수인 c에 관해 풀고, 이 c로 부터 철근의 응력  f_s가 결정되면, 콘크리트의 압축파쇄로 인한 파괴가 발생하는 과다 철근 보의 공칭휨강도는 식(3.17)과 (3.18)에 의해 구할 수 있다.
# 【 균형 철근비 】
# 콘크리트의 압축파괴는 폭발적이고 경고가 없이 갑작스럽게 발생한다고 지적한바 있다.
#
# 따라서, 콘크리트의 파쇄보다는 철근의 항복이 점진적으로 발생하도록 유도하여 파괴 직전에 적절한 경고를 줄수 있도록 충분히 적은 양의 철근을 배치하는 것이 필요하다. 이는 철근비 ρ := A_s/(b*d)를 어떤 한계 값보다 낮게 유지하므로서 얻을 수 있다.
#
# 이 값을 이른바 "균형철근비"라고 부르며, 이는 철근콘크리트가 인장 철근의 항복과 콘크리트의 압축파쇄가 동시에 발생하도록 하는데 필요한 철근량이다.
#
# 이때의 중립축은 철근이 항복하는 것과 동시에 콘크리트의 압축변형율이 한계값인 ε_u := 0.003에 도달하도록 위치하게 된다.
# 【 중립축의 위치 】
# 식 (3.21)에서 f_s == f_y로 놓고, f_y/E_s를 항복변형율 ε_y로 표현하면, 철근의 항복시작과 콘크리트의 파쇄가 동시에 일어나도록 하는 중립축의 위치 c의 값을 구할 수 있다. 즉,
c == ε_u/(ε_u + ε_y)*d  # ( 3.23 )
# 이 c의 값을 식 (3.16)에 A_s*f_s == ρ*b*d*f_y와 함께 대입하면, 균형철근비 ρ_b를 구할 수 있다.
ρ_b == α*f_ck/f_y*ε_u/(ε_u + ε_y)  # ( 3.24 )
# 실제 부재 설계시에는 철근비는 식(3.24)에 의해 주어진 균형철근비보다 충분히 작도록 하며, 이는 연성파괴를 유도하는데 필수적인 요소가 된다.
# 예제 3.3  ( 공칭휨강도 )
# 예제 3.1과 3.2의 보가 파괴되는 공칭휨강도 M_n을 계산하라.
# 【 검토 조건 】
b = 250 mm
d = 600 mm
A_s = 1520 mm^2
# 【 철근비 】
ρ := A_s/(b*d) = 0.0101333
# 【 균형철근비 】
f_ck = 27 MPa
f_y = 400 MPa
α = 0.72
ε_u = 0.003
ε_y := f_y/E_s = 0.002
ρ_b := α*f_ck/f_y*ε_u/(ε_u + ε_y) = 0.02916
# 【 공칭 휨강도 】
# 이 보의 철근비는 ρ = 0.0101333이다.
# 균형철근비는 ρ_b = 0.02916이다.
#
# 이 보에서의 실제 배치된 철근량이 균형철근비보다 작기 때문에, 이보는 철근의 항복에 의한 인장파괴가 먼저 시작하여 공칭휨강도에 도달한다.
# 따라서 식(3.20b)에서 구해지는 공칭휨강도는 다음과 같다
M_n := ρ*f_y*b*d^2*(1 - 0.59*ρ*f_y/f_ck) = 332.489 kN*m
# 【압축연단에서 중립축 까지의 거리 】
# 보가 공칭 휨강도에 도달하였을때,중립축 까지의 거리는, 식3.19b)로 부터,
c := ρ*f_y*d/(α*f_ck) = 125.103 mm
# 3.4 인장철근으로 보강된 직사각형 보의 설계
# 일반 사용하중 상태에서의 적절한 거동
# 콘크리트의 압축 응력 분포는 실제 기하학적 모양은 매우 다양하다. 그러나 사실상 다음 두가지 (1) 콘크리트에 작용하는 총압축력 C 와 (2) 콘크리트에 작요하는 총 압축력의 작용 위치만 알면 응력분포 모양을 정확하게 알 필요는 없다. 이러한 두 값에 대한 정보는 실험 결과로부터 알 수 있고, 두개의 매개변수 α와 β로 나타낼수 있다.
# A. 등가 직사각형 응력 분포
# B. 균형 철근비
# C. 과소 철근보
# D. 최소 철근비
# 예제 3.4  ( 보의 휨강도 )
# 등가 직사각형 응력분포를 사용하여, 이전에 해석했던 예제3.3의 보의 휨강도를 계산하여라.
# 【 균형 철근비 】
# 등가 직가각형 응력분포 이론에 따라 이 보의 응력분포와 변형률은 그림 3.9와 같다. 균형철근비는 식(3.28b)에 의해 다음과 같이 계산되며
ρ_b == 0.85*β_1*f_.ck/f_y*600 MPa/(600 MPa + f_y)
f_ck = 27 MPa
f_y = 400 MPa
# 【 등가응력직사각형의 깊이 계수 】
β_1 :=
    0.85 if f_ck ≤ 28 MPa
    max(0.85 - (f_ck - 28 MPa)*0.007/MPa, 0.65) otherwise
    = 0.85
# 【 균형 철근비 】
ρ_b := 0.85*β_1*f_ck/f_y*600 MPa/(600 MPa + f_y) = 0.0292612
# 이 값과 실제 철근비인 ρ = 0.0101333을 비교하면 부재는 과소 철근 보임을 알 수 있으며 따라서 철근의 항복에 의해 파괴될것이다.
# 【 등가응력직사각형의 깊이 】
# C=T 에서
C == 0.85*f_ck*a*b
T == A_s*f_y
a := A_s*f_y/(0.85*f_ck*b) = 105.969 mm
# 【 보의 휨강도 】
C := 0.85*f_ck*a*b = 608 kN
T := A_s*f_y = 608 kN
M_n := A_s*f_y*(d - a/2) = 332.585 kN*m
# 【 압축연단에서 중립축 까지의 거리 】
c := a/β_1 = 0.12467 m
# E. 직사각형보의 설계 예제
# F. 과다 철근 보
