W82 := 5*10^6
ΔPSI := 1.9
Z_R := -1.645
S_0 := 0.35
M_R := 350
f(SN) := Z_R*S_0 + 9.36*log(SN + 1) + (-0.2 + log(ΔPSI/(4.2 - 1.5))/(0.4 + 1094/(SN + 1)^5.19) + 2.32*log(M_R) - 5.4) + (-log(W82))
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SN := 1
SN := root(f(SN), SN, 0, 10)
SN = 4.98972
SN := -5 .. 10
W82 := 18.6*10^6
ΔPSI := 2.1
Z_R := -1.645
S_0 := 0.35
M_R := 400
f(SN) := Z_R*S_0 + 9.36*log(SN + 1) + (-0.2 + log(ΔPSI/(4.2 - 1.5))/(0.4 + 1094/(SN + 1)^5.19) + 2.32*log(M_R) - 5.4) + (-log(W82))
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SN := 1
SN := root(f(SN), SN, 0, 10)
SN = 5.55664
