## 연속철근 콘크리트 포장
# 1. 개요
# AASHTO '81 잠정지침
# AASHTO '86 철근 설계
# CRCP의 설계
# 【 사용 기호의 설명 】
# f_ck | 콘크리트의 설계기준 강도
# f_y | 철근의 항복강도
# E_c | 콘크리트의  탄성계수
E_c == 4700*sqrt(f_ck)*MPa
# E_s | 철근의 탄성계수
E_s := 200000 MPa = 200000 MPa
# ε_u | 철근 콘크리트보의 최대 압축 변형율
ε_u := 0.003
# ε_y | 철근의 항복 변형율
ε_y == f_y/E_s
Q
# 단면내의 임의 점에서의 단면1차모멘트.
# 즉, 전단응력을 구하고자하는 임의 점 바깥의 면적에 대한 중립축으로부터의 단면1차모멘트
# I | 중립축에 대한 단면2차모멘트
# b | 단면의 폭
# c | 보의 압축연단에서 중립축까지의 거리
