tonf := 1000 kgf
## 철근콘크리트 원형단면의 강도 검토
# 0. 검토 조건
# 【 사용 재료의 강도 특성 】
f_ck := 28 MPa  # : 콘크리트의 설계기준 강도
f_y := 400 MPa  # : 철근의 항복강도
E_s := 2*10^5*MPa  # : 철근의 탄성계수
# 【 사용 재료의 변형율 특성 】
ε_c := 0.003  # : 압축측 연단에서의 콘크리트의 극한 변형율
ε_y := f_y/E_s = 0.002  # : 인장측 연단에서의 철근의 극한 변형률
# 【 단면 특성 】
R := 20 cm  # : 단면의 반지름
d' := 6 cm  # : 단면의 철근 피복 두께
# 【 철근 배근 】
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D29
N_s := 8
α_CTC := 360/N_s*deg = 45 deg
# 1. 단면의 유효높이
# 【 단면의 유효높이 계산 】
S := R - d' = 14 cm
S' := S*cos(22.5 deg) = 12.9343 cm
S' = 12.9343 cm
d := R + S' = 32.9343 cm
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S'
d = 32.9343 cm
# 2. 중립축의 위치
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# 【 중립축에서 압축측 연단까지의 거리 】
ε_y := f_y/E_s = 0.002
c_b/d == 0.003/(0.003 + ε_y) == 0.003/(0.003 + f_y/E_s) == 600/(600 + f_y)
c_b := 600 MPa/(600 MPa + f_y)*d = 19.7606 cm  # ε_y  # ε_c
# 【 단면의 도심에 대한 중립축의 편심 거리 】
e := R - c_b = 0.239412 cm
# 【 중립축에서 최외측 인장철근 까지의 거리 】
s_b := S' + e = 13.1737 cm
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ε_y
ε_c
d = 32.9343 cm
e = 0.239412 cm
c_b = 19.7606 cm
s_b = 13.1737 cm
c_b = 19.7606 cm
s_b = 13.1737 cm
d = 32.9343 cm
c_b + s_b = 32.9343 cm
# 3. 콘크리트의 압축력
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# 【 등가 응력 블럭의 깊이 】
a_b := 0.85*c_b = 16.7965 cm
# 【 압축을 받는 면적 계산 】 | R
α
α := cos^-1((R - a_b)/R) = 80.7829 deg
α = 1.40993 rad
A := R^2*(α - cos(α)*sin(α)) = 500.729 cm^2  # x  # Z
# 【 압축을 받는 면적의 도심 】 | a_b
x := 2/3*R*sin^2(α)/(α - sin(α)*cos(α)) = 10.3779 cm
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Z := R - x = 9.62212 cm
# 【 압축력 】
C_c := 0.85*f_ck*A = 1191.73 kN
C_c = 121.523 tonf
e_c := x = 10.3779 cm
a_b = 16.7965 cm
d = 32.9343 cm
# 4. 인장철근의 인장력
# 【 T1에 대하여 】
A_s.t1 := 6.424 cm^2*2 = 12.848 cm^2  # : 철근의 단면적
α_s.t1 := 22.5 deg = 22.5 deg  # : 철근의 경사각
A_s := A_s.t1 = 12.848 cm^2
α_s := α_s.t1 = 22.5 deg
S_t := (R - d')*cos(α_s) + e = 13.1737 cm  # : 인장측 철근의 중립축 까지의 거리
s_b = 13.1737 cm  # : 중립축에서 인장측 최외측 철근 연단까지의 거리
ε_y = 0.002  # : 인장측 연단에서의 철근의 극한 변형률
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ε_t := ε_y*S_t/s_b = 0.002  # : 인장측 철근의 변형율
f_s := E_s*ε_t = 400 MPa  # : 인장측 철근의 인장응력
T_s := A_s*f_s = 513.92 kN  # : 인장측 철근의 인장력
e_s.t1 := (R - d')*cos(α_s) = 12.9343 cm
A_s.t1 = 12.848 cm^2
α_s.t1 = 22.5 deg
T_s.t1 := T_s = 513.92 kN
e_s.t1 = 12.9343 cm
# T_1 | T_2 | C_2 | C_1
# 【 T2에 대하여 】
A_s.t2 := 6.424 cm^2*2 = 12.848 cm^2  # : 철근의 단면적
α_s.t2 := 22.5 deg + 45 deg = 67.5 deg  # : 철근의 경사각
A_s := A_s.t2 = 12.848 cm^2
α_s := α_s.t2 = 67.5 deg
S_t := (R - d')*cos(α_s) + e = 5.59698 cm  # : 인장측 철근의 중립축 까지의 거리
s_b = 13.1737 cm  # : 중립축에서 인장측 최외측 철근 연단까지의 거리
ε_y = 0.002  # : 인장측 연단에서의 철근의 극한 변형률
ε_t := ε_y*S_t/s_b = 0.000849719  # : 인장측 철근의 변형율
f_s := E_s*ε_t = 169.944 MPa  # : 인장측 철근의 인장응력
T_s := A_s*f_s = 218.344 kN  # : 인장측 철근의 인장력
e_s.t2 := (R - d')*cos(α_s) = 5.35757 cm
A_s.t2 = 12.848 cm^2
α_s.t2 = 67.5 deg
T_s.t2 := T_s = 218.344 kN
e_s.t2 = 5.35757 cm
# 5. 압축 철근의 압축력
# 【 CS1에 대하여 】
A_s.c1 := 6.424 cm^2*2 = 12.848 cm^2  # : 철근의 단면적
α_s.c1 := 22.5 deg = 22.5 deg  # : 철근의 경사각
A_s := A_s.c1 = 12.848 cm^2
α_s := α_s.c1 = 22.5 deg
S_s := (R - d')*cos(α_s) - e = 12.6949 cm  # : 압축측 철근의 중립축 까지의 거리
c_b = 19.7606 cm  # : 중립축에서 압축측 연단까지의 거리
ε_c = 0.003  # : 압축측 연단에서의 콘크리트의 극한 변형률
ε_s := ε_c*S_s/c_b = 0.00192731  # : 압축측 철근의 변형율
f_s := E_s*ε_s = 385.461 MPa  # : 압축측 철근의 압축응력
f_s :=
    f_s if f_s ≤ f_y
    f_y otherwise
    = 385.461 MPa
C_s := A_s*(f_s - 0.85*f_ck) = 464.662 kN  # : 압축측 철근의 압축력
# ( 압축철근의 응력은 압축철근으로 대치되는 콘크리트의 면적을 고려하기 위해 감소시킨다 )
e_s.c1 := (R - d')*cos(α_s) = 12.9343 cm  # : 압축측 철근의 단면의 중립축에 대한 편심거리
A_s.c1 = 12.848 cm^2
α_s.c1 = 22.5 deg
C_s.c1 := C_s = 464.662 kN
e_s.c1 = 12.9343 cm
# 【 CS2에 대하여 】
A_s.c2 := 6.424 cm^2*2 = 12.848 cm^2  # : 철근의 단면적
α_s.c2 := 22.5 deg + 45 deg = 67.5 deg  # : 철근의 경사각
A_s := A_s.c2 = 12.848 cm^2
α_s := α_s.c2 = 67.5 deg
S_s := (R - d')*cos(α_s) - e = 5.11816 cm  # : 압축측 철근의 중립축 까지의 거리
c_b = 19.7606 cm  # : 중립축에서 압축측 연단까지의 거리
ε_c = 0.003  # : 압축측 연단에서의 콘크리트의 극한 변형률
ε_s := ε_c*S_s/c_b = 0.000777025  # : 압축측 철근의 변형율
f_s := E_s*ε_s = 155.405 MPa  # : 압축측 철근의 압축응력
f_s :=
    f_s if f_s ≤ f_y
    f_y otherwise
    = 155.405 MPa
C_s := A_s*(f_s - 0.85*f_ck) = 169.086 kN  # : 압축측 철근의 압축력
# ( 압축철근의 응력은 압축철근으로 대치되는 콘크리트의 면적을 고려하기 위해 감소시킨다 )
e_s.c2 := (R - d')*cos(α_s) = 5.35757 cm
A_s.c2 = 12.848 cm^2
α_s.c2 = 67.5 deg
C_s.c2 := C_s = 169.086 kN
e_s.c2 = 5.35757 cm
# 6. 평형 하중
P_b == C_c + C_s - T
C_c = 1191.73 kN
C_s := C_s.c1 + C_s.c2 = 633.748 kN
T := T_s.t1 + T_s.t2 = 732.264 kN
P_b := C_c + C_s - T = 1093.22 kN
# 7. 평형 모멘트
M_Cc := C_c*x = 123.677 kN*m
C_s.c1 = 464.662 kN
e_s.c1 = 12.9343 cm
C_s.c2 = 169.086 kN
e_s.c2 = 5.35757 cm
M_Cs := C_s.c1*e_s.c1 + C_s.c2*e_s.c2 = 69.1598 kN*m
T_s.t1 = 513.92 kN
e_s.t1 = 12.9343 cm
T_s.t2 = 218.344 kN
e_s.t2 = 5.35757 cm
M_Ts := T_s.t1*e_s.t1 + T_s.t2*e_s.t2 = 78.1699 kN*m
M_b := M_Cc + M_Cs + M_Ts = 271.006 kN*m
e_b := M_b/P_b = 24.7898 cm
P_b = 1093.22 kN
M_b = 271.006 kN*m
e_b = 24.7898 cm
P_b = 111.477 tonf
M_b = 27.635 tonf*m
e_b = 24.7898 cm
M_b := 11.72*10.5 + 4.6*13 + 1.63*5.5 + 5.14*13 + 2.262*5.5 = 271.086
e_b := 267.61/10.6 = 25.2462
