## 주 각 의  설 계
tonf := 1000 kgf
tf := 1000 kgf
# 【 사용 재료 】
f_ck := 240*kgf/cm^2
F_y := 2400*kgf/cm^2
# 【 작용 하중 】
# 수평력
H := 21*tonf
# 연직력
V := 60*tonf
# 편심 거리
e := 21 cm
# 모멘트
M := V*e = 12.6 tonf*m
M = 12.6 tf*m
V = 60 tf
H = 21 tf
# 【 베이스 플레이트 】
# 베이스 플레이트
# 전체폭
D := 600 mm
# 베이스 플레이트
# 전체 길이
b := 450 mm
u := (D - 350 mm)/2 = 125 mm  # 350mm H형강 사용
# 앵커 볼트에서
# 베이스 플레이트
# 플랜지까지의 거리
de := u - 25 mm = 100 mm
g := u - de = 25 mm
d := D - de = 500 mm
# 【 앵커 볼트 】
# 앵커 볼트
# 직경
D_bolt := 24 mm
# 인장측 앵커볼트의
# 갯수
n_t := 2
# 인장측 앵커볼트의
# 총단면적
A_t := π*D_bolt^2/4*n_t = 9.04779 cm^2
# 탄성 계수비
n := 15
# 【 베이스 플레이트의 하면의 압축응력도  계산 】
f(xn) := xn^3 + 3*(e - D/2)*xn^2 - 6*n*A_t/b*(e + D/2 - de)*(D - de - xn)
xn := 10 mm  # :  xn의 가정 값
x := root(f(xn), xn) = 355.175 mm
xn := x = 35.5175 cm
x_n :=
    D if e ≤ (D/6)
    xn otherwise
    = 355.175 mm
σc := V/(b*D) + V*e/((b*D^2)/6) = 68.8889 kgf/cm^2
σc := 2*V/(3*b*(D/2 - e)) = 98.7654 kgf/cm^2
σc := 2*V*(e + D/2 - de)/(b*x_n*(D - de - x_n/3)) = 80.6663 kgf/cm^2
# 베이스 플레이트 하면의
# 최대 압축응력도
σ_c :=
    (V/(b*D) + V*e/(b*D^2/6)) if e ≤ D/6
    (2*V/(3*b*(D/2 - e))) if ((D/6 + de/3) ≥ e > D/6)
    (2*V*(e + D/2 - de)/(b*x_n*(D - de - x_n/3))) otherwise
σ_c = 80.6663 kgf/cm^2
σ_ca := 1.33*0.3*f_ck = 95.76 kgf/cm^2
콘크리트_지압응력_검토 :=
    "O.K" if σ_c < σ_ca
    "N.G" otherwise
    = "O.K"
# 【 앵커 볼트의 인장력 계산 】
# 인장측
# 앵커 볼트
# 전체 인장력
Z :=
    0*tonf if e ≤ D/6
    0*tonf if ((D/6 + de/3) ≥ e > D/6)
    (V*(e - D/2 + x_n/3)/(d - x_n/3)) otherwise
Z = 4.46402 tonf
# 인장측
# 앵커 볼트
# 1개당의 인장력
Z_bolt := Z/n_t = 2.23201 tonf
Z_bolt = 2.23201 tf
# 앵커 볼트
# 작용인장응력
σ_bolt := Z_bolt/(π*D_bolt^2/4) = 493.382 kgf/cm^2
# 앵커 볼트
# 허용 인장 응력
σ_a.bolt := 1400*kgf/cm^2
# 엥커 볼트
# 1개당
# 허용 인장력
Z_a.bolt := π*D_bolt^2/4*1400*kgf/cm^2 = 6.33345 tonf
앵커볼트_인장력_검토 :=
    "O.K" if Z_bolt < Z_a.bolt
    "N.G" otherwise
    = "O.K"
앵커볼트_인장응력_검토 :=
    "O.K" if σ_bolt < σ_a.bolt
    "N.G" otherwise
    = "O.K"
# 【 마찰에 의한 허용 전단력 계산 】
0.4*V = 24 tonf
# 인장측
# 앵커 볼트
# 전체 인장력
H_a :=
    0.4*V if e ≤ D/6
    0.4*V if ((D/6 + de/3) ≥ e > D/6)
    0.4*(Z + V) otherwise
H_a = 25.7856 tonf
# 【 베이스 플레이트 두께 계산 】
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# 지주 연단에서
# 베이스플레이트
# 연단까지의 거리
u = 125 mm
R := 250 mm
g = 25 mm
σ_c = 80.6663 kgf/cm^2
F_y = 2400 kgf/cm^2
f_b := 1.33*F_y/1.3 = 2455.38 kgf/cm^2
x_n = 35.5175 cm
t_1 := u*sqrt(3*σ_c/f_b*(1 - u/(3*x_n))) = 3.68689 cm
t_2 := sqrt(6*Z*g/(f_b*(R + 2*g))) = 9.53428 mm
t := max(t_1, t_2) = 36.8689 mm
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