# 【 검토 조건 】
fck := 24 MPa
As_D32 := 7.942 cm^2
fy := 300 MPa
As_D29 := 6.424 cm^2
ϕ := 0.85
k1 := 0.85
B := 1000 mm
H := 1300 mm
d' := 200 mm
d := H - d' = 1100 mm
Mu := 1181.7 kN*m
Vu := 521.7 kN
# 【 필요 철근량 계산 】
fy^2/(2*0.85*fck*B)*As^2 - Fy*d*As + Mu/ϕ == 0
a := fy^2/(2*0.85*fck*B)
b := -fy*d
c := Mu/ϕ
As1 := (-b + sqrt(b^2 - 4*a*c))/(2*a) = 145261 mm^2
As2 := (-b - sqrt(b^2 - 4*a*c))/(2*a) = 4338.66 mm^2
As_req := min(As1, As2) = 4338.66 mm^2
As_req = 43.3866 cm^2
ρ_min1 := 1.4 MPa/fy = 0.00466667
ρ_min2 := 0.25*sqrt(MPa)*sqrt(fck)/fy = 0.00408248
ρ_min := max(ρ_min1, ρ_min2) = 0.00466667
ρ_max := 0.75*k1*ϕ*fck/fy*600 MPa/(600 MPa + fy) = 0.0289
# 【 사용 철근량 】
CTC := 1000 mm/(125 mm) = 8
As_use := As_D32*CTC = 63.536 cm^2
ρ_use := As_use/(B*d) = 0.005776
As_use = 63.536 cm^2
As_min := ρ_min*(B*d) = 51.3333 cm^2
As_max := ρ_max*(B*d) = 317.9 cm^2
# 【 휨에 대한 검토 】
a := As_use*fy/(0.85*fck*B) = 93.4353 mm
ϕMn := 0.85*As_use*fy*(d - a/2) = 1706.49 kN*m
Mu = 1181.7 kN*m
As_check :=
    "O.K" if ϕMn > Mu
    "N.G" otherwise
    = "O.K"
ϕMn/Mu = 144.41 %
# 【 사용 철근량 】
CTC := 1000 mm/(125 mm) = 8
As_use := As_D29*CTC = 51.392 cm^2
ρ_use := As_use/(B*d) = 0.004672
As_use = 51.392 cm^2
As_min := ρ_min*(B*d) = 51.3333 cm^2
As_max := ρ_max*(B*d) = 317.9 cm^2
4/3*As_req = 57.8488 cm^2
# 【 휨에 대한 검토 】
a := As_use*fy/(0.85*fck*B) = 75.5765 mm
ϕMn := 0.85*As_use*fy*(d - a/2) = 1392.02 kN*m
Mu = 1181.7 kN*m
As_check :=
    "O.K" if ϕMn > Mu
    "N.G" otherwise
    = "O.K"
ϕMn/Mu = 117.798 %
