tonf := 1000 kgf
## 아트캐노피 지붕 구조검토
# 1. 설계 단면력 산정
# 【 사하중 】
w_D := (2.5*tonf/m^3)*0.2*m*1.0*m = 0.5 tonf/m
L := 0.3 m/2 + 7.050 m + 0.3 m/2 = 7.35 m
M_D := w_D*L^2/8 = 3.37641 tonf*m
V_D := w_D*L/2 = 1.8375 tonf
# 【 활하중 】
w_L := 2*kN/m^2*1.0*m = 0.203943 tonf/m  # : 적재물이 거의 없는 지붕  # 별첨 참조
M_L := w_L*L^2/8 = 1.37719 tonf*m
V_D := w_L*L/2 = 0.749491 tonf
# 【 하중 조합 】
Mu_1 := 1.4*M_D = 4.72697 tonf*m
Mu_2 := 1.2*M_D + 1.6*M_L = 6.25519 tonf*m
Mu := max(Mu_1, Mu_2) = 6.25519 tonf*m
Vu := 1.4*V_D = 1.04929 tonf
# 2. 철근 콘크리트 단면 검토
# 【 검토 조건 】
fck := 24 MPa
fy := 300 MPa
ϕ := 0.85
k1 := 0.85
B := 1000 mm
H := 200 mm
d' := 50 mm
d := H - d' = 150 mm
Mu = 61.3425 kN*m
Vu = 10.29 kN
# 【 필요 철근량 계산 】
fy^2/(2*0.85*fck*B)*As^2 - Fy*d*As + Mu/ϕ == 0
a := fy^2/(2*0.85*fck*B)
b := -fy*d
c := Mu/ϕ
As1 := (-b + sqrt(b^2 - 4*a*c))/(2*a) = 18645.4 mm^2
As2 := (-b - sqrt(b^2 - 4*a*c))/(2*a) = 1754.65 mm^2
As_req := min(As1, As2) = 1754.65 mm^2
As_req = 17.5465 cm^2
# 【 철근비 】
ρ_min1 := 1.4 MPa/fy = 0.00466667
ρ_min2 := 0.25*sqrt(MPa)*sqrt(fck)/fy = 0.00408248
ρ_min := max(ρ_min1, ρ_min2) = 0.00466667
ρ_max := 0.75*k1*ϕ*fck/fy*600 MPa/(600 MPa + fy) = 0.0289
# 【 사용 철근량 】
As_D19 := 2.865 cm^2
CTC := 100 mm
As_N := 1000 mm/CTC = 10
As_D19 := 1.986 cm^2
As_use := As_D19*As_N = 19.86 cm^2
ρ_use := As_use/(B*d) = 0.01324
As_use = 19.86 cm^2
As_min := ρ_min*(B*d) = 7 cm^2
As_max := ρ_max*(B*d) = 43.35 cm^2
As_check :=
    "O.K" if As_use > As_req
    "N.G" otherwise
    = "O.K"
# 【 휨에 대한 검토 】
a := As_use*fy/(0.85*fck*B) = 29.2059 mm
ϕMn := 0.85*As_use*fy*(d - a/2) = 68.5691 kN*m
Mu = 61.3425 kN*m
Moment_check :=
    "O.K" if ϕMn > Mu
    "N.G" otherwise
    = "O.K"
ϕMn/Mu = 111.781 %
1950 - 1250 - 500 = 200
