tonf := 1000 kgf
## 아트캐노피 지붕 구조검토
# 1. 주거더(H형강) 검토
# 1.1 검토 조건
L := 0.3 m/2 + 7.050 m + 0.3 m/2 = 7.35 m
# 【 사하중 】
w_D := (2.5*tonf/m^3)*0.2*m*1.95*m = 0.975 tonf/m
M_D := w_D*L^2/8 = 6.58399 tonf*m
V_D := w_D*L/2 = 3.58313 tonf
# 【 활하중 】
w_L := 2*kN/m^2*1.95*m = 0.397689 tonf/m  # : 적재물이 거의 없는 지붕  # 별첨 참조
M_L := w_L*L^2/8 = 2.68552 tonf*m
V_D := w_L*L/2 = 1.46151 tonf
# 【 하중 조합 】
M := 1.0*M_D + 1.0*M_L = 9.26951 tonf*m
Vu := 1.1*V_D = 1.60766 tonf
# 1.2 H형강 단면 검토
# 【 검토 조건 】
f_a := 1400*kgf/cm^2
Zreq := M/(f_a*3) = 220703 mm^3
# 【 H형강 휨응력 검토 】( 194×150×6×9 Beam)
Z_200 := 2.77*10^5*mm^3
N := 3
Z := Z_200 = 277 cm^3
f := M/(Z*N) = 1115.46 kgf/cm^2
Moment_check :=
    "O.K" if f_a > f
    "N.G" otherwise
    = "O.K"
f/f_a = 79.6761 %
# 【 H형강 휨응력 검토 】( 200×200×8×12  Beam)
Z_200 := 4.72*10^5*mm^3
N := 2
Z := Z_200 = 472 cm^3
f := M/(Z*N) = 981.94 kgf/cm^2
Moment_check :=
    "O.K" if f_a > f
    "N.G" otherwise
    = "O.K"
f/f_a = 70.1386 %
# 2. 바닥판 검토
# 2.1 설계 단면력 산정
# 【 사하중 】
w_D := (2.5*tonf/m^3)*0.2*m*1.0*m = 0.5 tonf/m
L := 1.950 m = 1.95 m
M_D := w_D*L^2/8 = 0.237656 tonf*m
V_D := w_D*L/2 = 0.4875 tonf
# 【 활하중 】
w_L := 2*kN/m^2*1.0*m = 0.203943 tonf/m  # : 적재물이 거의 없는 지붕  # 별첨 참조
M_L := w_L*L^2/8 = 0.0969368 tonf*m
V_D := w_L*L/2 = 0.198845 tonf
# 【 하중 조합 】
Mu_1 := 1.4*M_D = 0.332719 tonf*m
Mu_2 := 1.2*M_D + 1.6*M_L = 0.440286 tonf*m
Mu := max(Mu_1, Mu_2) = 0.440286 tonf*m
Vu := 1.4*V_D = 0.278383 tonf
# 2.2 철근 콘크리트 단면 검토
# 【 검토 조건 】
fck := 24 MPa
fy := 300 MPa
ϕ := 0.85
k1 := 0.85
B := 1000 mm
H := 200 mm
d' := 50 mm
d := H - d' = 150 mm
Mu = 4.31773 kN*m
Vu = 2.73 kN
# 【 필요 철근량 계산 】
fy^2/(2*0.85*fck*B)*As^2 - Fy*d*As + Mu/ϕ == 0
a := fy^2/(2*0.85*fck*B)
b := -fy*d
c := Mu/ϕ
As1 := (-b + sqrt(b^2 - 4*a*c))/(2*a) = 20286.5 mm^2
As2 := (-b - sqrt(b^2 - 4*a*c))/(2*a) = 113.514 mm^2
As_req := min(As1, As2) = 113.514 mm^2
As_req = 1.13514 cm^2
# 【 철근비 】
ρ_min1 := 1.4 MPa/fy = 0.00466667
ρ_min2 := 0.25*sqrt(MPa)*sqrt(fck)/fy = 0.00408248
ρ_min := max(ρ_min1, ρ_min2) = 0.00466667
ρ_max := 0.75*k1*ϕ*fck/fy*600 MPa/(600 MPa + fy) = 0.0289
As_D13 := 1.267 cm^2
# 【 사용 철근량 】
As_D16 := 1.986 cm^2
As_D19 := 2.865 cm^2
CTC := 200 mm
As_N := 1000 mm/CTC = 5
As_D13 := 1.986 cm^2
As_use := As_D19*As_N = 14.325 cm^2
ρ_use := As_use/(B*d) = 0.00955
As_use = 14.325 cm^2
As_min := ρ_min*(B*d) = 7 cm^2
As_max := ρ_max*(B*d) = 43.35 cm^2
As_check :=
    "O.K" if As_use > As_req
    "N.G" otherwise
    = "O.K"
# 【 휨에 대한 검토 】
a := As_use*fy/(0.85*fck*B) = 21.0662 mm
ϕMn := 0.85*As_use*fy*(d - a/2) = 50.9455 kN*m
Mu = 4.31773 kN*m
Moment_check :=
    "O.K" if ϕMn > Mu
    "N.G" otherwise
    = "O.K"
ϕMn/Mu = 1179.91 %
