tonf := 1000 kgf
## Title :
# 【 강도 조건 】
fck := 24 MPa
fy := 400 MPa
ϕ_f := 0.85
k1 := 0.85
# 【 단면 제원 】
B := 1000 mm  # : 단면의 폭
H := 400 mm  # : 단면의 높이
d' := 90 mm  # : 단면의 피복 두께
d := H - d' = 310 mm  # : 단면의 유효높이
# 【 하중 조건 】
Mu := 54.519 kN*m  # : 모멘트
Mu = 5.55939 tonf*m
Vu := 0.0 kN  # : 전단력
Vu = 0 tonf
# 【 필요 철근량 계산 】
fy^2/(2*0.85*fck*B)*As^2 - fy*d*As + Mu/ϕ == 0
a := fy^2/(2*0.85*fck*B)
b := -fy*d
c := Mu/ϕ_f
As1 := (-b + sqrt(b^2 - 4*a*c))/(2*a) = 31094 mm^2
As2 := (-b - sqrt(b^2 - 4*a*c))/(2*a) = 526.008 mm^2
As_req := min(As1, As2) = 526.008 mm^2
As_req = 5.26008 cm^2
# 【 사용 철근량 】
CTC := 1000 mm/(125 mm) = 8  # : 철근 배치 간격
As_use := As_D16*4 + As_D13*4 = 1301.2 mm^2  # : 사용 철근량
As_use/As_req = 247.372 %  # : 필요철근량 대비 사용 철근량의 비율
# 【 최소 철근비 계산 】
ρ_min1 := 1.4 MPa/fy = 0.0035  # : 콘크리트 구조설계기준 (6.3.1)
ρ_min2 := 0.25*sqrt(MPa)*sqrt(fck)/fy = 0.00306186  # : 콘크리트 구조설계기준 (6.3.2)
ρ_min := max(ρ_min1, ρ_min2) = 0.0035  # : 최소철근비
# 【 최대 철근비 계산 】
ρ_max := 0.75*k1*ϕ_f*fck/fy*600 MPa/(600 MPa + fy) = 0.0195075  # : 최대 철근비
# 【 사용 철근비 계산 】
B = 1000 mm
d = 310 mm
ρ_use := As_use/(B*d) = 0.00419742  # : 사용 철근비
# 【 철근량 】
As_use = 13.012 cm^2  # : 사용 철근량
As_min := ρ_min*(B*d) = 10.85 cm^2  # : 최소 철근량
As_max := ρ_max*(B*d) = 60.4733 cm^2  # : 최대 철근량
# 【 철근비 검토 】
As_ratio_check :=
    "O.K" if ρ_max > ρ_use and As_use > As_req*4/3
    "N.G" otherwise
    = "O.K"
# 【 휨에 대한 검토 】
a := As_use*fy/(0.85*fck*B) = 25.5137 mm
ϕMn := 0.85*As_use*fy*(d - a/2) = 131.503 kN*m
Mu = 54.519 kN*m
# 【 휨에 대한 검토 】
As_check :=
    "O.K" if ϕMn > Mu
    "N.G" otherwise
    = "O.K"
ϕMn/Mu = 241.205 %
# 【 사용 철근 단면적 】
As_D32 ≡ 7.942 cm^2
As_D29 ≡ 6.424 cm^2
As_D25 ≡ 5.067 cm^2
As_D22 ≡ 3.871 cm^2
As_D19 ≡ 2.865 cm^2
As_D16 ≡ 1.986 cm^2
As_D13 ≡ 1.267 cm^2
