tonf := 1000 kgf
ORIGIN := 1
# 【 검토 조건 】
D_p := 0.6 m
A_p := 1510 cm^2
E_p := 400000*kgf/cm^2
I_p := 510000 cm^4
L := 12 m
β := 0.3293 m^-1
# 【 말뚝 배치 제원 】
# 말뚝 열수
P_n := 4
x[1] := -2.25 m
θ[1] := 0
n[1] := 4
x[2] := -0.75 m
θ[2] := 0
n[2] := 4
x[3] := 0.75 m
θ_3 := 0
n[3] := 4
x[4] := 2.25 m
θ[4] := 0
n[4] := 4
# 【 말뚝 축방향 스프링정수 】
a := 0.016*(L/D_p) + 0.11 = 0.43
K_v := a*A_p*E_p/L = 21643.3 tonf/m
# 【 말뚝축직각방향 스프링정수 】
E := E_p = 3.92266e10 Pa
I := I_p = 0.0051 m^4
K_1 := 4*E*I*β^3 = 2913.84 tonf/m
K_2 := 2*E*I*β^2 = 4424.29 tonf
K_3 := 2*E*I*β^2 = 4424.29 tonf
K_4 := 2*E*I*β = 13435.4 tonf*m
# 【 삼원 연립방정식의 계수 계산 】
A_xx := sum((K_1*cos^2(θ[i]) + K_v*sin^2(θ[i]))*n[i], i = 1 .. P_n) = 46621.4 tonf/m
A_xy := sum(((K_v - K_1)*sin(θ[i])*cos(θ[i]))*n[i], i = 1 .. P_n) = 0 tonf/m
A_xα := sum(((K_v - K_1)*x[i]*sin(θ[i])*cos(θ[i]) + (-K_2*cos(θ[i])))*n[i], i = 1 .. P_n)/m = -70788.6 tonf/m
A_yx := A_xy = 0 tonf/m
A_yy := sum((K_v*cos^2(θ[i]) + K_1*sin^2(θ[i]))*n[i], i = 1 .. P_n) = 346293 tonf/m
A_yα := sum(((K_v*cos^2(θ[i]) + K_1*sin^2(θ[i]))*x[i] + K_2*sin(θ[i]))*n[i]/m, i = 1 .. P_n) = 0 tonf/m
A_αx := A_xα = -70788.6 tonf/m
A_αy := A_yα = 0 tonf/m
A_αα := sum(((K_v*cos^2(θ[i]) + K_1*sin^2(θ[i]))*x[i]^2 + (K_2 + K_3)*x[i]*sin(θ[i]) + K_4)*n[i]/m^2, i = 1 .. P_n) = 1188917 tonf/m
A := [A_xx, A_xy, A_xα; A_yx, A_yy, A_yα; A_αx, A_αy, A_αα]
A = [46621.4, 0, -70788.6; 0, 346293, 0; -70788.6, 0, 1188917] tonf/m
C := [168.53*tonf*m; 876.44*tonf*m; 1110.99*tonf*m]
B := A^-1*C = [0.00553401; 0.00253092; 0.00126395] m^2
δ_x := B[1]/m = 0.00553401 m
δ_x = 5.53401 mm
δ_y := B[2]/m = 0.00253092 m
δ_y = 2.53092 mm
α := B[3]/m^2*rad = 0.00126395 rad
α = 0.0724192 deg
δx[1] := δ_x*cos(θ[1]) - (δ_y + α*x[1])*sin(θ[1]) = 0.00553401 m
Ans :=
    i ← 1
    for i ∈ P_n
        δx[i] ← d_x*cos(θ[i])
    δx[i]
Pn[1] := K_v*□  # error: This placeholder is empty.
