## 변위법에 의한 말뚝기초의 설계
tonf := 1000 kgf
ORIGIN := 1
# 【 검토 조건 】
D_p := 0.6 m
t_p := 12 mm
Δt := 2 mm
A_p := π*D_p^2/4 - π*(D_p - 2*t_p)^2/4 = 221.671 cm^2
I_p := π*(D_p - 2*Δt)^4/64 - π*(D_p - 2*t_p)^4/64 = 79045.9 cm^4
E_p := 21000000*tonf/m^2
L := 12 m
# 【 말뚝 배치 제원 】
# 말뚝 열수
P_n := 4
x[1] := 1.5 m + 1.5/2*m = 2.25 m
θ[1] := 0
n[1] := 6
x[2] := 1.5 m/2 = 0.75 m
θ[2] := 0
n[2] := 6
x[3] := -1.5 m/2 = -0.75 m
θ_3 := 0
n[3] := 6
x[4] := -(1.5 + 1.5/2)*m = -2.25 m
θ[4] := 0
n[4] := 6
x = [2.25; 0.75; -0.75; -2.25] m
θ = [0; 0; 0; 0]
n = [6; 6; 6; 6]
# 【 지반 제원 】
β := 0.3293 m^-1
α := 0.2
N := 6
Eo := 28*kgf/cm^2*N = 168 kgf/cm^2
# 【 말뚝 축방향 스프링정수 】
a := 0.016*(L/D_p) + 0.11 = 0.43
K_v := a*A_p*E_p/L = 16680.7 tonf/m
# 【 말뚝축직각방향 스프링정수 】
E := E_p = 205939650000 Pa
I := I_p = 0.000790459 m^4
K_1 := 4*E*I*β^3 = 2371.01 tonf/m
K_2 := 2*E*I*β^2 = 3600.08 tonf
K_3 := 2*E*I*β^2 = 3600.08 tonf
K_4 := 2*E*I*β = 10932.5 tonf*m
# 【 삼원 연립방정식의 계수 계산 】
A_xx := sum((K_1*cos^2(θ[i]) + K_v*sin^2(θ[i]))*n[i], i = 1 .. P_n) = 56904.3 tonf/m
A_xy := sum(((K_v - K_1)*sin(θ[i])*cos(θ[i]))*n[i], i = 1 .. P_n) = 0 tonf/m
A_xα := sum(((K_v - K_1)*x[i]*sin(θ[i])*cos(θ[i]) + (-K_2*cos(θ[i])))*n[i], i = 1 .. P_n)/m = -86401.9 tonf/m
A_yx := A_xy = 0 tonf/m
A_yy := sum((K_v*cos^2(θ[i]) + K_1*sin^2(θ[i]))*n[i], i = 1 .. P_n) = 400337 tonf/m
A_yα := sum(((K_v*cos^2(θ[i]) + K_1*sin^2(θ[i]))*x[i] + K_2*sin(θ[i]))*n[i]/m, i = 1 .. P_n) = 0 tonf/m
A_αx := A_xα = -86401.9 tonf/m
A_αy := A_yα = 0 tonf/m
A_αα := sum(((K_v*cos^2(θ[i]) + K_1*sin^2(θ[i]))*x[i]^2 + (K_2 + K_3)*x[i]*sin(θ[i]) + K_4)*n[i]/m^2, i = 1 .. P_n) = 1388329 tonf/m
# 【 말뚝군 도심에서의 변위량 】
A := [A_xx, A_xy, A_xα; A_yx, A_yy, A_yα; A_αx, A_αy, A_αα]
A = [56904.3, 0, -86401.9; 0, 400337, 0; -86401.9, 0, 1388329] tonf/m
C := [168.53*tonf*m; 876.44*tonf*m; 1110.99*tonf*m]
B := A^-1*C = [0.00461256; 0.00218925; 0.0010873] m^2
δ_x := B[1]/m = 0.00461256 m
δ_x = 4.61256 mm
δ_y := B[2]/m = 0.00218925 m
δ_y = 2.18925 mm
α := B[3]/m^2*rad = 0.0010873 rad
α = 0.0622974 deg
# 【 각 말뚝 두부 X 방향 변위량 】
δx[1] := δ_x*cos(θ[1]) - (δ_y + α*x[1])*sin(θ[1]) = 0.00461256 m
δx[2] := δ_x*cos(θ[2]) - (δ_y + α*x[2])*sin(θ[2]) = 0.00461256 m
δx[3] := δ_x*cos(θ[3]) - (δ_y + α*x[3])*sin(θ[3]) = 0.00461256 m
δx[4] := δ_x*cos(θ[4]) - (δ_y + α*x[4])*sin(θ[4]) = 0.00461256 m
i := 1 .. P_n
δx[i] := δ_x*cos(θ[i]) - (δ_y + α*x[i])*sin(θ[i])
δx = [0.00461256; 0.00461256; 0.00461256; 0.00461256] m
# 【 각 말뚝 두부 Y 방향 변위량 】
δy[1] := δ_x*sin(θ[1]) + (δ_y + α*x[1])*cos(θ[1]) = 0.00463567 m
δy[2] := δ_x*sin(θ[2]) + (δ_y + α*x[2])*cos(θ[2]) = 0.00300472 m
δy[3] := δ_x*sin(θ[3]) + (δ_y + α*x[3])*cos(θ[3]) = 0.00137378 m
δy[4] := δ_x*sin(θ[4]) + (δ_y + α*x[4])*cos(θ[4]) = -0.000257161 m
i := 1 .. P_n
δx[i] := δ_x*sin(θ[i]) + (δ_y + α*x[i])*cos(θ[i])
δx = [0.00463567; 0.00300472; 0.00137378; -0.000257161] m
# 【 각 말뚝 반력 계산 】
i := 1 .. P_n
Pn[i] := K_v*δy[i]
Pn = [77.3263; 50.121; 22.9157; -4.28963] tonf
Ph[i] := K_1*δx[i] - K_2*α
Ph = [7.07687; 3.20989; -0.657095; -4.52408] tonf
Mt[i] := -K_3*δx[i] + K_4*α
Mt = [-4.80189; 1.06963; 6.94115; 12.8127] tonf*m
m = 1 m
β = 0.3293 1/m
E = 21000000 tonf/m^2
H := Ph[1] = 7.07687 tonf
M_t := Mt[1] = -4.80189 tonf*m
ho := -M_t/H = 0.678533 m
z := 1 .. 10
# 【 말뚝 각부의 변위량 】
z := 0 .. 10
Y[z + 1] := H/(2*E*I*β^3)*e^(-(β*z*m))*((1 + β*ho)*cos(β*z*m) + (-β*ho*sin(β*z*m)))
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Y = [7.30333; 4.66158; 2.56692; 1.08226; 0.144963; -0.362777; -0.568965; -0.586906; -0.504616; -0.383288; -0.260686] mm
# 【 말뚝 각부의 모멘트 】
z := 0 .. 10
M1[z + 1] := -H/β*e^(-β*(z*m))*(β*ho*cos(β*(z*m)) + (1 + β*ho)*sin(β*(z*m)))
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M1 = [-4.80189; -9.38592; -10.294; -9.1578; -7.14082; -4.98268; -3.08822; -1.62583; -0.615256; 0.00379415; 0.323607] tonf*m
