## 변위법에 의한 말뚝기초의 설계
tonf := 1000 kgf
ORIGIN := 1
# 【 검토 조건 】
D_p := 0.6 m
t_p := 12 mm
Δt := 2 mm
A_p := π*(D_p - (2*Δt))^2/4 - π*(D_p - 2*t_p)^2/4 = 184.097 cm^2
I_p := π*(D_p - 2*Δt)^4/64 - π*(D_p - 2*t_p)^4/64 = 79045.9 cm^4
E_p := 21000000*tonf/m^2
L := 17.8 m
z_max := trunc(L/m) = 17
# 【 작용하중 】
H_o := 141.2*tonf*m
V_o := 1113.8*tonf*m
M_o := 225*tonf*m
# 【 말뚝 배치 제원 】
# 【 말뚝 열수 】
P_n := 4
# 【 말뚝 배치 】
x[1] := 1.5 m + 1.5/2*m = 2.25 m
θ[1] := 0
n[1] := 6
x[2] := 1.5 m/2 = 0.75 m
θ[2] := 0
n[2] := 6
x[3] := -1.5 m/2 = -0.75 m
θ_3 := 0
n[3] := 6
x[4] := -(1.5 + 1.5/2)*m = -2.25 m
θ[4] := 0
n[4] := 6
x = [2.25; 0.75; -0.75; -2.25] m
θ = [0; 0; 0; 0]
n = [6; 6; 6; 6]
# 【 지반 제원 】
# 【 계산 조건 】
E_p = 2100000 kgf/cm^2
D_p = 0.6 m
I_p = 79045.9 cm^4
α := 0.2
N := 6
Eo := 28*kgf/cm^2*N = 168 kgf/cm^2
# 횡방향 지반반력계수
k := 0.5*kgf/cm^3 = 500 tonf/m^3
# 말뚝의 특성치
β := nthroot(k*D_p/(4*E_p*I_p), 4) = 0.259263 m^-1
# 【 말뚝 축방향 스프링정수 】
# 【 계산 조건 】
A_p = 184.097 cm^2
E_p = 2100000 kgf/cm^2
L = 17.8 m
D_p = 0.6 m
a := 0.027*(L/D_p) + 0.20 = 1.001
# 【 말뚝 축방향 스프링정수 】
K_v := a*A_p*E_p/L = 21741.1 tonf/m
K_v = 21741.1 tonf/m
# 【 말뚝축직각방향 스프링정수 】
E := E_p = 2100000 kgf/cm^2
I := I_p = 79045.9 cm^4
K_1 := 4*E*I*β^3 = 1157.13 tonf/m
K_2 := 2*E*I*β^2 = 2231.57 tonf
K_3 := 2*E*I*β^2 = 2231.57 tonf
K_4 := 2*E*I*β = 8607.34 tonf*m
K_1 = 1157.13 tonf/m
K_2 = 2231.57 tonf
K_3 = 2231.57 tonf
K_4 = 8607.34 tonf*m
# 【 삼원 연립방정식의 계수 계산 】
A_xx := sum((K_1*cos^2(θ[i]) + K_v*sin^2(θ[i]))*n[i], i = 1 .. P_n) = 27771 tonf/m
A_xy := sum(((K_v - K_1)*sin(θ[i])*cos(θ[i]))*n[i], i = 1 .. P_n) = 0 tonf/m
A_xα := sum(((K_v - K_1)*x[i]*sin(θ[i])*cos(θ[i]) + (-K_2*cos(θ[i])))*n[i], i = 1 .. P_n)/m = -53557.6 tonf/m
A_yx := A_xy = 0 tonf/m
A_yy := sum((K_v*cos^2(θ[i]) + K_1*sin^2(θ[i]))*n[i], i = 1 .. P_n) = 521786 tonf/m
A_yα := sum(((K_v*cos^2(θ[i]) + K_1*sin^2(θ[i]))*x[i] + K_2*sin(θ[i]))*n[i]/m, i = 1 .. P_n) = 0 tonf/m
A_αx := A_xα = -53557.6 tonf/m
A_αy := A_yα = 0 tonf/m
A_αα := sum(((K_v*cos^2(θ[i]) + K_1*sin^2(θ[i]))*x[i]^2 + (K_2 + K_3)*x[i]*sin(θ[i]) + K_4)*n[i]/m^2, i = 1 .. P_n) = 1674098 tonf/m
# 【 말뚝군 도심에서의 변위량 】
A := [A_xx, A_xy, A_xα; A_yx, A_yy, A_yα; A_αx, A_αy, A_αα]
A = [27771, 0, -53557.6; 0, 521786, 0; -53557.6, 0, 1674098] tonf/m
H_o = 141.2 tonf*m
C := [H_o; V_o; M_o]
V_o = 1113.8 tonf*m
M_o = 225 tonf*m
B := A^-1*C = [0.005695; 0.00213459; 0.000316595] m^2
δ_x := B[1]/m = 0.005695 m
δ_x = 5.695 mm
δ_y := B[2]/m = 0.00213459 m
δ_y = 2.13459 mm
α := B[3]/m^2 = 0.000316595 rad
α = 0.0181395 deg
# 【 각 말뚝 두부 X 방향 변위량 】
δx[1] := δ_x*cos(θ[1]) - (δ_y + α*x[1])*sin(θ[1]) = 0.005695 m
δx[2] := δ_x*cos(θ[2]) - (δ_y + α*x[2])*sin(θ[2]) = 0.005695 m
δx[3] := δ_x*cos(θ[3]) - (δ_y + α*x[3])*sin(θ[3]) = 0.005695 m
δx[4] := δ_x*cos(θ[4]) - (δ_y + α*x[4])*sin(θ[4]) = 0.005695 m
i := 1 .. P_n
δx[i] := δ_x*cos(θ[i]) - (δ_y + α*x[i])*sin(θ[i])
δx = [5.695; 5.695; 5.695; 5.695] mm
# 【 각 말뚝 두부 Y 방향 변위량 】
δy[1] := δ_x*sin(θ[1]) + (δ_y + α*x[1])*cos(θ[1]) = 0.00284693 m
δy[2] := δ_x*sin(θ[2]) + (δ_y + α*x[2])*cos(θ[2]) = 0.00237204 m
δy[3] := δ_x*sin(θ[3]) + (δ_y + α*x[3])*cos(θ[3]) = 0.00189715 m
δy[4] := δ_x*sin(θ[4]) + (δ_y + α*x[4])*cos(θ[4]) = 0.00142225 m
i := 1 .. P_n
δy[i] := δ_x*sin(θ[i]) + (δ_y + α*x[i])*cos(θ[i])
δy = [2.84693; 2.37204; 1.89715; 1.42225] mm
# 【 각 말뚝 반력 계산 】
i := 1 .. P_n
Pn[i] := K_v*δy[i]
Pn = [61.8953; 51.5707; 41.246; 30.9213] tonf
K_v*δy[1] = 61.8953 tonf
K_v*δy[2] = 51.5707 tonf
K_v*δy[3] = 41.246 tonf
K_v*δy[4] = 30.9213 tonf
Ph[i] := K_1*δx[i] - K_2*α
Ph = [5.88333; 5.88333; 5.88333; 5.88333] tonf
K_1 = 1157.13 tonf/m
K_2 = 2231.57 tonf
α = 0.000316595 rad
δx[1] = 0.005695 m
K_1*δx[1] - K_2*α = 5.88333 tonf
Mt[i] := -K_3*δx[i] + K_4*α
Mt = [-9.98374; -9.98374; -9.98374; -9.98374] tonf*m
m = 1 m
β = 0.259263 1/m
E = 21000000 tonf/m^2
H := Ph[1] = 5.88333 tonf
H = 5.88333 tonf
M_t := Mt[1] = -9.98374 tonf*m
M_t = -9.98374 tonf*m
ho := M_t/H = -1.69695 m
z := 1 .. 17
## 말 뚝 기 본 계
# 【 말뚝 머리 경사각 】
α1 := H/(2*E*I*β^2) + M_t/(E*I*β)
α1 = 0.000316595 rad
# 【 말뚝 머리 휨모멘트 】
Mo := -M_t = 9.98374 tonf*m
Mo = 9.98374 tonf*m
# 【 지중부 최대 휨모멘트 발생 위치 】
Lm := 1/β*tan^-1(1/(1 + 2*β*ho))
Lm = 5.59772 m
# 【 지중부 최대 휨모멘트  】
Mm := -H/(2*β)*sqrt((1 + 2*β*ho)^2 + 1)*e^(-β*Lm)
Mm = -2.67718 tonf*m
# 【 변형각이 0이 되는 깊이  】
L_0 := 1/β*tan^-1(-(1 + 2*β*ho)) = -0.460972 m
L_0 := 3*π/(4*β) = 9.08804 m
# 【 말뚝 각부의 변위량 】
z := 0 .. z_max
Y[z + 1] := H/(2*E*I*β^3)*e^(-(β*z*m))*((1 + β*ho)*cos(β*z*m) + (-β*ho*sin(β*z*m)))
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Y = [5.695; 5.13253; 4.26522; 3.30638; 2.3925; 1.6002; 0.96247; 0.482927; 0.147312; -0.0677933; -0.188834; -0.241313; -0.247526; -0.225549; -0.189067; -0.147733; -0.107797; -0.072838] mm
# 【 말뚝 각부의 모멘트 】
z := 0 .. z_max
M[z + 1] := -H/β*e^(-β*(z*m))*(β*ho*cos(β*(z*m)) + (1 + β*ho)*sin(β*(z*m)))
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M = [9.98374; 4.93215; 1.41282; -0.829138; -2.07798; -2.60599; -2.65003; -2.40136; -2.00419; -1.55982; -1.13344; -0.761994; -0.461792; -0.23515; -0.0758146; 0.0269178; 0.0852921; 0.1112] tonf*m
# 【 말뚝 각부의 전단력 】
z := 0 .. z_max
S[z + 1] := -H*e^(-β*(z*m))*(cos(β*(z*m)) + (-(1 + 2*β*ho)*sin(β*(z*m))))
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S = [-5.88333; -4.24822; -2.83399; -1.69798; -0.845468; -0.250179; 0.130206; 0.343179; 0.434384; 0.443627; 0.403111; 0.337171; 0.262935; 0.19146; 0.129043; 0.0784938; 0.0402545; 0.0133112] tonf
## 말 뚝 머 리  강  결
# 【 말뚝 머리 변위 】
δ := H*m/(4*E*I*β^2) = 0.00131821 m
δ = 0.00131821 m
# 【 말뚝 머리 경사각 】
α := 0
α = 0 rad
# 【 말뚝 머리 휨모멘트 】
Mo := H/(2*β) = 11.3463 tonf*m
Mo = 11.3463 tonf*m
# 【 지중부 최대 휨모멘트 발생 위치 】
Lm := π/(2*β) = 6.0587 m
Lm = 6.0587 m
# 【 지중부 최대 휨모멘트  】
Mm := -H/(2*β)*e^(-π/2) = -2.35866 tonf*m
Mm = -2.35866 tonf*m
# 【 변형각이 0이 되는 깊이  】
L := π/β = 12.1174 m
L = 12.1174 m
# 【 말뚝 각부의 변위량 】
z := 0 .. z_max
Y[z + 1] := H/(4*E*I*β^3)*e^(-(β*(z*m)))*(cos(β*(z*m)) + sin(β*(z*m)))
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Y = [5.08444; 4.79793; 4.12964; 3.30336; 2.46872; 1.71569; 1.08936; 0.603447; 0.251535; 0.0159145; -0.126024; -0.197461; -0.219511; -0.209869; -0.182357; -0.14706; -0.11079; -0.0777014] mm
# 【 말뚝 각부의 모멘트 】
z := 0 .. z_max
M[z + 1] := -H/(2*β)*e^(-β*(z*m))*(sin(β*(z*m)) + cos(β*(z*m)))
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M = [-11.3463; -10.7069; -9.21557; -7.37167; -5.50912; -3.82868; -2.43099; -1.34663; -0.561316; -0.0355143; 0.281231; 0.440647; 0.489853; 0.468336; 0.406942; 0.328175; 0.247234; 0.173396] tonf*m
# 【 말뚝 각부의 전단력 】
z := 0 .. z_max
S[z + 1] := -H*e^(-β*(z*m))*cos(β*(z*m))
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S = [-5.88333; -4.38798; -3.04246; -1.92574; -1.06109; -0.4362; -0.0188964; 0.231525; 0.356609; 0.394091; 0.375527; 0.325519; 0.261977; 0.196969; 0.137831; 0.0883222; 0.049683; 0.0215235] tonf
## 말 뚝 머 리  힌  지
# 【 말뚝 머리 변위 】
δ := H*m/(2*E*I*β^2) = 0.00263641 m
δ = 0.00263641 m
# 【 말뚝 머리 경사각 】
α := H/(2*E*I*β^2) = 0.00263641
α = 0.00263641 rad
# 【 말뚝 머리 휨모멘트 】
Mo := 0
Mo = 0 tonf*m
# 【 지중부 최대 휨모멘트 발생 위치 】
Lm := π/(4*β) = 3.02935 m
Lm = 3.02935 m
# 【 지중부 최대 휨모멘트  】
Mm := -H/β*e^(-π/4)*sin(π/4) = -7.316 tonf*m
Mm = -7.316 tonf*m
# 【 변형각이 0이 되는 깊이  】
L := 3*π/(4*β) = 9.08804 m
L = 9.08804 m
e^0 = 1
# 【 말뚝 각부의 모멘트 】
sin(0) = 0
m = 1 m
z := 0 .. z_max
M[z + 1] := -H/β*e^(-β*(z*m))*sin(β*(z*m))
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M = [0; -4.48901; -6.69609; -7.31557; -6.92554; -5.9749; -4.78909; -3.58628; -2.4981; -1.59107; -0.885978; -0.374262; -0.0307637; 0.176945; 0.28226; 0.315684; 0.302837; 0.263774] tonf*m
