## 변위법에 의한 말뚝기초의 설계
tonf := 1000 kgf
ORIGIN := 1
# 1 검토 조건
# 【 말뚝 제원 】
# 말뚝 직경
D_p := 508 mm
# 말뚝 두께
t_p := 12 mm
# 말뚝 부식 두께
Δt := 2 mm
A_p := π*(D_p - (2*Δt))^2/4 - π*(D_p - 2*t_p)^2/4 = 155.195 cm^2
I_p := π*(D_p - 2*Δt)^4/64 - π*(D_p - 2*t_p)^4/64 = 47360.8 cm^4
E_p := 21000000*tonf/m^2
# 【 말뚝 길이 】
L := 32.2 m
z_max := trunc(L/m) = 32
# 【 작용하중 】
H_o := 3103.858 kN*m
V_o := 21100.467 kN*m
M_o := 13504.296 kN*m
# 【 tonf 단위 】
H_o = 316.505 tonf*m
V_o = 2151.65 tonf*m
M_o = 1377.05 tonf*m
# 【 N 단위 】
H_o = 3103.86 kN*m
V_o = 21100.5 kN*m
M_o = 13504.3 kN*m
# 【 말뚝 배치 제원 】
# 【 말뚝 열수 】
P_n := 3
# 【 말뚝 배치 】
x[1] := 1.6 m = 1.6 m
x[2] := 0.3 m = 0.3 m
x[3] := -1.6 m = -1.6 m
# 【 말뚝 경사각 】
θ[1] := 0
θ[2] := 0
θ[3] := 0
# 【 말뚝 본수 】
n[1] := 11
n[2] := 11
n[3] := 11
x = [1.6; 0.3; -1.6] m
θ = [0; 0; 0]
n = [11; 11; 11]
# 【 지반 제원 】
# 【 계산 조건 】
E_p = 2100000 kgf/cm^2  # 말뚝의 탄성계수
D_p = 0.508 m  # 말뚝의 직경
I_p = 47360.8 cm^4  # 말뚝의 단면2차 모멘트
# 【 지반 조건 】
N_s := 3  # 지반의 N치
# 【 말뚝 특성치  】
# K_H값을 구하는데 있어서 β값을 구하는 식 자체에K_H 항이 들어 있으므로 간단히 구할 수 없다. 따라서, β값을 가정하여 수평방향 지반반력계수(K_H)를 산정하고 β == nthroot(K_H*D/(4*E*i), 4)식에 대입하여 값을 산출한다.
# 가정한 β값과 계산식에 의한 β값의 오차가 1% 미만이면 채택하고, 그렇지 않으면 위의 과정을 반복하여 산정한다.
# 【 검토 조건 】
# 말뚝
# 직경
D := D_p = 0.508 m
D = 50.8 cm
# 말뚝
# 탄성계수
E := E_p = 205939650 kN*m^-2
E = 2100000 kgf*cm^-2
# 말뚝
# 단면2차모멘트
I := I_p = 0.000473608 m^4
I = 47360.8 cm^4
# 지반의 N치
N_s := N_s
# 【 수평방향 지반반력계수  】
# 기초의 특성치
# 가정값
β := 0.333552 m^-1
# 지반반력계수
# 추정에 따른 계수
α := 1.0
# 지반 탄성계수
E_o := 28*(kgf/cm^2)*N_s = 8237.59 kN*m^-2
E_o = 84 kgf*cm^-2
# 수평지반반력계수
# 지름 300mm의 강체원판에 의한 평판재하시험의 값에 상당하는
# 수평방향 지반반력계수
K_Ho := (1/(30 cm))*α*E_o = 27458.6 kN/m^3
K_Ho = 2.8 kgf*cm^-3
# 하중 작용방향에
# 직교하는
# 기초환산재하폭
B_H := sqrt(D/β) = 1.2341 m
# 수평지반반력계수
K_H := K_Ho*(B_H/(0.3 m))^(-3/4) = 9506.2 kN*m^-3
K_H = 0.969363 kgf*cm^-3
# 기초의 특성치
β := nthroot((K_H*D/(4*E*I)), 4) = 0.333552 m^-1
1/β = 2.99804 m
# 【 수평방향 지반반력계수 검산  】
β1 := 1/2.998*m^-1
β1 := (((1/(30 cm))*α*E_o)*(sqrt(D/β1)/(30 cm))^(-3/4)*D/(4*E*I))^(1/4) = 0.333552 m^-1
1/β1 = 2.99803 m
# 【 말뚝 축방향 스프링정수 】
# 【 계산 조건 】
A_p = 155.195 cm^2
E_p = 2100000 kgf/cm^2
L = 32.2 m
D_p = 0.508 m
# 보정 계수
a := 0.009*(L/D_p) + 0.390 = 0.960472
# 【 말뚝 축방향 스프링정수 】
K_v := a*A_p*E_p/L = 9721.32 tonf/m
K_v = 9721.32 tonf/m
# 【 말뚝축직각방향 스프링정수 】
E := E_p = 2100000 kgf/cm^2
I := I_p = 47360.8 cm^4
β = 0.333552 1/m
K_1 := 4*E*I*β^3 = 1476.34 tonf/m
K_2 := 2*E*I*β^2 = 2213.06 tonf
K_3 := 2*E*I*β^2 = 2213.06 tonf
K_4 := 2*E*I*β = 6634.85 tonf*m
K_1 = 1476.34 tonf/m
K_2 = 2213.06 tonf
K_3 = 2213.06 tonf
K_4 = 6634.85 tonf*m
# 【 삼원 연립방정식의 계수 계산 】
A_xx := sum((K_1*cos^2(θ[i]) + K_v*sin^2(θ[i]))*n[i], i = 1 .. P_n) = 48719.3 tonf/m
A_xy := sum(((K_v - K_1)*sin(θ[i])*cos(θ[i]))*n[i], i = 1 .. P_n) = 0 tonf/m
A_xα := sum(((K_v - K_1)*x[i]*sin(θ[i])*cos(θ[i]) + (-K_2*cos(θ[i])))*n[i], i = 1 .. P_n)/m = -73031.1 tonf/m
A_xx = 477773 kN/m
A_xy = 0 kN/m
A_xα = -716191 kN/m
A_yx := A_xy = 0 tonf/m
A_yy := sum((K_v*cos^2(θ[i]) + K_1*sin^2(θ[i]))*n[i], i = 1 .. P_n) = 320803 tonf/m
A_yα := sum(((K_v*cos^2(θ[i]) + K_1*sin^2(θ[i]))*x[i] + K_2*sin(θ[i]))*n[i]/m, i = 1 .. P_n) = 32080.3 tonf/m
A_yx = 0 kN/m
A_yy = 3146008 kN/m
A_yα = 314601 kN/m
A_αx := A_xα = -73031.1 tonf/m
A_αy := A_yα = 32080.3 tonf/m
A_αα := sum(((K_v*cos^2(θ[i]) + K_1*sin^2(θ[i]))*x[i]^2 + (K_2 + K_3)*x[i]*sin(θ[i]) + K_4)*n[i]/m^2, i = 1 .. P_n) = 776079 tonf/m
A_αx = -716191 kN/m
A_αy = 314601 kN/m
A_αα = 7610732 kN/m
# 【 말뚝군 도심에서의 변위량 】
A := [A_xx, A_xy, A_xα; A_yx, A_yy, A_yα; A_αx, A_αy, A_αα]
A = [48719.3, 0, -73031.1; 0, 320803, 32080.3; -73031.1, 32080.3, 776079] tonf/m
H_o = 316.505 tonf*m
C := [H_o; V_o; M_o]
V_o = 2151.65 tonf*m
M_o = 1377.05 tonf*m
B := A^-1*C = [0.010194; 0.0064604; 0.00246661] m^2
δ_x := B[1]/m = 0.010194 m
δ_x = 10.194 mm
δ_y := B[2]/m = 0.0064604 m
δ_y = 6.4604 mm
α := B[3]/m^2 = 0.00246661 rad
α = 0.141326 deg
# 【 각 말뚝 두부 X 방향 변위량 】
δx[1] := δ_x*cos(θ[1]) - (δ_y + α*x[1])*sin(θ[1]) = 0.010194 m
δx[2] := δ_x*cos(θ[2]) - (δ_y + α*x[2])*sin(θ[2]) = 0.010194 m
δx[3] := δ_x*cos(θ[3]) - (δ_y + α*x[3])*sin(θ[3]) = 0.010194 m
δx[4] := δ_x*cos(θ[4]) - (δ_y + α*x[4])*sin(θ[4])  # error: This array index is invalid for this array.
i := 1 .. P_n
δx[i] := δ_x*cos(θ[i]) - (δ_y + α*x[i])*sin(θ[i])
δx = [10.194; 10.194; 10.194] mm
# 【 각 말뚝 두부 Y 방향 변위량 】
δy[1] := δ_x*sin(θ[1]) + (δ_y + α*x[1])*cos(θ[1]) = 0.010407 m
δy[2] := δ_x*sin(θ[2]) + (δ_y + α*x[2])*cos(θ[2]) = 0.00720038 m
δy[3] := δ_x*sin(θ[3]) + (δ_y + α*x[3])*cos(θ[3]) = 0.00251383 m
δy[4] := δ_x*sin(θ[4]) + (δ_y + α*x[4])*cos(θ[4])  # error: This array index is invalid for this array.
i := 1 .. P_n
δy[i] := δ_x*sin(θ[i]) + (δ_y + α*x[i])*cos(θ[i])
δy = [10.407; 7.20038; 2.51383] mm
# 【 각 말뚝 반력 계산 】
i := 1 .. P_n
Pn[i] := K_v*δy[i]
Pn = [101.17; 69.9972; 24.4377] tonf
K_v*δy[1] = 101.17 tonf
K_v*δy[2] = 69.9972 tonf
K_v*δy[3] = 24.4377 tonf
K_v*δy[4] = tonf  # error: This array index is invalid for this array.
Ph[i] := K_1*δx[i] - K_2*α
Ph = [9.59107; 9.59107; 9.59107] tonf
K_1 = 1476.34 tonf/m
K_2 = 2213.06 tonf
α = 0.00246661 rad
δx[1] = 0.010194 m
K_1*δx[1] - K_2*α = 9.59107 tonf
Mt[i] := -K_3*δx[i] + K_4*α
Mt = [-6.19441; -6.19441; -6.19441] tonf*m
# 2. 말뚝 본체의 설계
m = 1 m
β = 0.333552 1/m
E = 21000000 tonf/m^2
H := Ph[1] = 9.59107 tonf
H = 9.59107 tonf
M_t := Mt[1] = -6.19441 tonf*m
M_t = -6.19441 tonf*m
ho := M_t/H = -0.645851 m
z := 1 .. 17
## 말 뚝 기 본 계
# 【 말뚝 머리 경사각 】
α1 := H/(2*E*I*β^2) + M_t/(E*I*β)
α1 = 0.00246661 rad
# 【 말뚝 머리 휨모멘트 】
Mo := -M_t = 6.19441 tonf*m
Mo = 6.19441 tonf*m
# 【 지중부 최대 휨모멘트 발생 위치 】
Lm := 1/β*tan^-1(1/(1 + 2*β*ho))
Lm = 3.15804 m
# 【 지중부 최대 휨모멘트  】
Mm := -H/(2*β)*sqrt((1 + 2*β*ho)^2 + 1)*e^(-β*Lm)
Mm = -5.76945 tonf*m
# 【 변형각이 0이 되는 깊이  】
L_0 := 1/β*tan^-1(-(1 + 2*β*ho)) = -1.55127 m
L_0 := 3*π/(4*β) = 7.06396 m
# 【 말뚝 각부의 변위량 】
z := 0 .. z_max
Y[z + 1] := H/(2*E*I*β^3)*e^(-(β*z*m))*((1 + β*ho)*cos(β*z*m) + (-β*ho*sin(β*z*m)))
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Y = [
    10.194; 7.55673; 4.99869; 2.88909; 1.34591; 0.339415; -0.231218; -0.487205; -0.540911; -0.482247
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] mm
# 【 말뚝 각부의 모멘트 】
z := 0 .. z_max
M[z + 1] := -H/β*e^(-β*(z*m))*(β*ho*cos(β*(z*m)) + (1 + β*ho)*sin(β*(z*m)))
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M = [
    6.19441; -1.09831; -4.66581; -5.75285; -5.39366; -4.34953; -3.12034; -1.99212; -1.09556; -0.460814
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] tonf*m
# 【 말뚝 각부의 전단력 】
z := 0 .. z_max
S[z + 1] := -H*e^(-β*(z*m))*(cos(β*(z*m)) + (-(1 + 2*β*ho)*sin(β*(z*m))))
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S = [
    -9.59107; -5.21182; -2.1336; -0.213771; 0.80555; 1.20025; 1.21147; 1.02412; 0.764712; 0.509686
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] tonf
## 말 뚝 머 리  강  결
# 【 말뚝 머리 변위 】
δ := H*m/(4*E*I*β^2) = 0.00216692 m
δ = 0.00216692 m
# 【 말뚝 머리 경사각 】
α := 0
α = 0 rad
# 【 말뚝 머리 휨모멘트 】
Mo := H/(2*β) = 14.3772 tonf*m
Mo = 14.3772 tonf*m
# 【 지중부 최대 휨모멘트 발생 위치 】
Lm := π/(2*β) = 4.70931 m
Lm = 4.70931 m
# 【 지중부 최대 휨모멘트  】
Mm := -H/(2*β)*e^(-π/2) = -2.98873 tonf*m
Mm = -2.98873 tonf*m
# 【 변형각이 0이 되는 깊이  】
L := π/β = 9.41861 m
L = 9.41861 m
# 【 말뚝 각부의 변위량 】
z := 0 .. z_max
Y[z + 1] := H/(4*E*I*β^3)*e^(-(β*(z*m)))*(cos(β*(z*m)) + sin(β*(z*m)))
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Y = [
    6.49651; 5.92114; 4.68199; 3.29971; 2.06434; 1.10128; 0.431489; 0.0189758; -0.195748; -0.274739
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] mm
# 【 말뚝 각부의 모멘트 】
z := 0 .. z_max
M[z + 1] := -H/(2*β)*e^(-β*(z*m))*(sin(β*(z*m)) + cos(β*(z*m)))
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M = [
    -14.3772; -13.1039; -10.3615; -7.30247; -4.56851; -2.4372; -0.954914; -0.0419947; 0.433203; 0.608015
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] tonf*m
# 【 말뚝 각부의 전단력 】
z := 0 .. z_max
S[z + 1] := -H*e^(-β*(z*m))*cos(β*(z*m))
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S = [
    -9.59107; -6.49212; -3.86686; -1.90319; -0.59206; 0.175182; 0.540999; 0.642495; 0.592162; 0.471936
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] tonf
## 말 뚝 머 리  힌  지
# 【 말뚝 머리 변위 】
δ := H*m/(2*E*I*β^2) = 0.00433384 m
δ = 0.00433384 m
# 【 말뚝 머리 경사각 】
α := H/(2*E*I*β^2) = 0.00433384
α = 0.00433384 rad
# 【 말뚝 머리 휨모멘트 】
Mo := 0
Mo = 0 tonf*m
# 【 지중부 최대 휨모멘트 발생 위치 】
Lm := π/(4*β) = 2.35465 m
Lm = 2.35465 m
# 【 지중부 최대 휨모멘트  】
Mm := -H/β*e^(-π/4)*sin(π/4) = -9.27033 tonf*m
Mm = -9.27033 tonf*m
# 【 변형각이 0이 되는 깊이  】
L := 3*π/(4*β) = 7.06396 m
L = 7.06396 m
# 【 말뚝 각부의 모멘트 】
m = 1 m
z := 0 .. z_max
M[z + 1] := -H/β*e^(-β*(z*m))*sin(β*(z*m))
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M = [
    0; -6.74411; -9.13007; -8.89912; -7.362; -5.3996; -3.53176; -2.01021; -0.908917; -0.198851
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] tonf*m
