## 변위법에 의한 말뚝기초의 설계
tonf := 1000 kgf
ORIGIN := 1
# 1 검토 조건
# 【 말뚝 제원 】
# 말뚝 직경
D_p := 500 mm
# 말뚝 두께
t_p := 12 mm
# 말뚝 부식 두께
Δt := 2 mm
A_p := π*(D_p - (2*Δt))^2/4 - π*(D_p - 2*t_p)^2/4 = 152.681 cm^2
I_p := π*(D_p - 2*Δt)^4/64 - π*(D_p - 2*t_p)^4/64 = 45097.5 cm^4
E_p := 21000000*tonf/m^2
# 【 말뚝 길이 】
L := 18.9 m
z_max := trunc(L/m) = 18
# 【 작용하중 】
H_o := 5135.532 kN*m
V_o := 16333.417 kN*m
M_o := 7676.706 kN*m
# 【 tonf 단위 】
H_o = 523.679 tonf*m
V_o = 1665.55 tonf*m
M_o = 782.806 tonf*m
# 【 N 단위 】
H_o = 5135.53 kN*m
V_o = 16333.4 kN*m
M_o = 7676.71 kN*m
# 【 말뚝 배치 제원 】
# 【 말뚝 열수 】
P_n := 4
# 【 말뚝 배치 】
x[1] := 1.3 m + 1.6 m/2 = 2.1 m
x[2] := 1.6 m/2 = 0.8 m
x[3] := -1.6 m/2 = -0.8 m
x[4] := -1.3 m + (-1.6 m/2) = -2.1 m
# 【 말뚝 경사각 】
θ[1] := 0
θ[2] := 0
θ[3] := 0
θ[4] := 0
# 【 말뚝 본수 】
n[1] := 11
n[2] := 11
n[3] := 11
n[4] := 11
x = [2.1; 0.8; -0.8; -2.1] m
θ = [0; 0; 0; 0]
n = [11; 11; 11; 11]
# 【 지반 제원 】
# 【 계산 조건 】
E_p = 2100000 kgf/cm^2  # 말뚝의 탄성계수
D_p = 0.5 m  # 말뚝의 직경
I_p = 45097.5 cm^4  # 말뚝의 단면2차 모멘트
# 【 지반 조건 】
N_s := 15  # 지반의 N치
# 【 말뚝 특성치  】
# K_H값을 구하는데 있어서 β값을 구하는 식 자체에K_H 항이 들어 있으므로 간단히 구할 수 없다. 따라서, β값을 가정하여 수평방향 지반반력계수(K_H)를 산정하고 β == nthroot(K_H*D/(4*E*i), 4)식에 대입하여 값을 산출한다.
# 가정한 β값과 계산식에 의한 β값의 오차가 1% 미만이면 채택하고, 그렇지 않으면 위의 과정을 반복하여 산정한다.
# 【 검토 조건 】
# 말뚝
# 직경
D := D_p = 0.5 m
D = 50 cm
# 말뚝
# 탄성계수
E := E_p = 205939650 kN*m^-2
E = 2100000 kgf*cm^-2
# 말뚝
# 단면2차모멘트
I := I_p = 0.000450975 m^4
I = 45097.5 cm^4
# 지반의 N치
N_s := N_s = 15
# 【 수평방향 지반반력계수  】
# 기초의 특성치
# 가정값
β := 0.397782 m^-1
# 지반반력계수
# 추정에 따른 계수
α := 1.0
# 지반 탄성계수
E_o := 28*(kgf/cm^2)*N_s = 41187.9 kN*m^-2
E_o := 15 MPa
# 수평지반반력계수
# 지름 300mm의 강체원판에 의한 평판재하시험의 값에 상당하는
# 수평방향 지반반력계수
K_Ho := (1/(30 cm))*α*E_o = 50000 kN/m^3
K_Ho = 5.09858 kgf*cm^-3
# 하중 작용방향에
# 직교하는
# 기초환산재하폭
B_H := sqrt(D/β) = 1.12115 m
# 수평지반반력계수
K_H := K_Ho*(B_H/(0.3 m))^(-3/4) = 18602.2 kN*m^-3
K_H = 1.8969 kgf*cm^-3
# 기초의 특성치
β := nthroot((K_H*D/(4*E*I)), 4) = 0.397782 m^-1
1/β = 2.51394 m
# 【 수평방향 지반반력계수 검산  】
β1 := 1/2.514*m^-1
β1 := (((1/(30 cm))*α*E_o)*(sqrt(D/β1)/(30 cm))^(-3/4)*D/(4*E*I))^(1/4) = 0.397781 m^-1
1/β1 = 2.51394 m
# 【 말뚝 축방향 스프링정수 】
# 【 계산 조건 】
A_p = 152.681 cm^2
E_p = 2100000 kgf/cm^2
L = 18.9 m
D_p = 0.5 m
L := 19 m
# 보정 계수
a := 0.013*(L/D_p) + 0.53 = 1.024
# 【 말뚝 축방향 스프링정수 】
K_v := a*A_p*E_p/L = 17280.3 tonf/m
K_v = 169462 kN/m
K_v := 133554.87*kN/m
1/(1/196934.55 + 1/414984.24) = 133555
# 【 말뚝축직각방향 스프링정수 】
E := E_p = 2100000 kgf/cm^2
I := I_p = 45097.5 cm^4
β = 0.397782 1/m
K_1 := 4*E*I*β^3 = 2384.34 tonf/m
K_2 := 2*E*I*β^2 = 2997.04 tonf
K_3 := 2*E*I*β^2 = 2997.04 tonf
K_4 := 2*E*I*β = 7534.37 tonf*m
K_1 = 23382.4 kN/m
K_2 = 29390.9 kN
K_3 = 29390.9 kN
K_4 = 73887 kN*m
# 【 삼원 연립방정식의 계수 계산 】
A_xx := sum((K_1*cos^2(θ[i]) + K_v*sin^2(θ[i]))*n[i], i = 1 .. P_n) = 104911 tonf/m
A_xy := sum(((K_v - K_1)*sin(θ[i])*cos(θ[i]))*n[i], i = 1 .. P_n) = 0 tonf/m
A_xα := sum(((K_v - K_1)*x[i]*sin(θ[i])*cos(θ[i]) + (-K_2*cos(θ[i])))*n[i], i = 1 .. P_n)/m = -131870 tonf/m
A_xx = 1028825 kN/m
A_xy = 0 kN/m
A_xα = -1293201 kN/m
A_yx := A_xy = 0 tonf/m
A_yy := sum((K_v*cos^2(θ[i]) + K_1*sin^2(θ[i]))*n[i], i = 1 .. P_n) = 599227 tonf/m
A_yα := sum(((K_v*cos^2(θ[i]) + K_1*sin^2(θ[i]))*x[i] + K_2*sin(θ[i]))*n[i]/m, i = 1 .. P_n) = 0 tonf/m
A_yx = 0 kN/m
A_yy = 5876414 kN/m
A_yα = 0 kN/m
A_αx := A_xα = -131870 tonf/m
A_αy := A_yα = 0 tonf/m
A_αα := sum(((K_v*cos^2(θ[i]) + K_1*sin^2(θ[i]))*x[i]^2 + (K_2 + K_3)*x[i]*sin(θ[i]) + K_4)*n[i]/m^2, i = 1 .. P_n) = 1844562 tonf/m
A_αx = -1293201 kN/m
A_αy = 0 kN/m
A_αα = 18088973 kN/m
# 【 말뚝군 도심에서의 변위량 】
A := [A_xx, A_xy, A_xα; A_yx, A_yy, A_yα; A_αx, A_αy, A_αα]
A = [104911, 0, -131870; 0, 599227, 0; -131870, 0, 1844562] tonf/m
H_o = 523.679 tonf*m
C := [H_o; V_o; M_o]
V_o = 1665.55 tonf*m
M_o = 782.806 tonf*m
B := A^-1*C = [0.00607061; 0.00277949; 0.00085838] m^2
δ_x := B[1]/m = 0.00607061 m
δ_x = 6.07061 mm
δ_y := B[2]/m = 0.00277949 m
δ_y = 2.77949 mm
α := B[3]/m^2 = 0.00085838 rad
α = 0.0491816 deg
# 【 각 말뚝 두부 X 방향 변위량 】
δx[1] := δ_x*cos(θ[1]) - (δ_y + α*x[1])*sin(θ[1]) = 0.00607061 m
δx[2] := δ_x*cos(θ[2]) - (δ_y + α*x[2])*sin(θ[2]) = 0.00607061 m
δx[3] := δ_x*cos(θ[3]) - (δ_y + α*x[3])*sin(θ[3]) = 0.00607061 m
δx[4] := δ_x*cos(θ[4]) - (δ_y + α*x[4])*sin(θ[4]) = 0.00607061 m
i := 1 .. P_n
δx[i] := δ_x*cos(θ[i]) - (δ_y + α*x[i])*sin(θ[i])
δx = [6.07061; 6.07061; 6.07061; 6.07061] mm
# 【 각 말뚝 두부 Y 방향 변위량 】
δy[1] := δ_x*sin(θ[1]) + (δ_y + α*x[1])*cos(θ[1]) = 0.00458209 m
δy[2] := δ_x*sin(θ[2]) + (δ_y + α*x[2])*cos(θ[2]) = 0.00346619 m
δy[3] := δ_x*sin(θ[3]) + (δ_y + α*x[3])*cos(θ[3]) = 0.00209278 m
δy[4] := δ_x*sin(θ[4]) + (δ_y + α*x[4])*cos(θ[4]) = 0.000976888 m
i := 1 .. P_n
δy[i] := δ_x*sin(θ[i]) + (δ_y + α*x[i])*cos(θ[i])
δy = [4.58209; 3.46619; 2.09278; 0.976888] mm
# 【 각 말뚝 반력 계산 】
i := 1 .. P_n
Pn[i] := K_v*δy[i]
Pn = [611.96; 462.927; 279.501; 130.468] kN
K_v*δy[1] = 62.4025 tonf
K_v*δy[2] = 47.2054 tonf
K_v*δy[3] = 28.5012 tonf
K_v*δy[4] = 13.3041 tonf
Ph[i] := K_1*δx[i] - K_2*α
Ph = [116.717; 116.717; 116.717; 116.717] kN
K_1 = 2384.34 tonf/m
K_2 = 2997.04 tonf
α = 0.00085838 rad
δx[1] = 0.00607061 m
K_1*δx[1] - K_2*α = 11.9018 tonf
Mt[i] := -K_3*δx[i] + K_4*α
Mt = [-114.998; -114.998; -114.998; -114.998] kN*m
# 2. 말뚝 본체의 설계
m = 1 m
β = 0.397782 1/m
E = 21000000 tonf/m^2
H := Ph[1] = 11.9018 tonf
H = 11.9018 tonf
M_t := Mt[1] = -11.7265 tonf*m
M_t = -11.7265 tonf*m
ho := M_t/H = -0.985272 m
z := 1 .. 17
## 말 뚝 기 본 계
# 【 말뚝 머리 경사각 】
α1 := H/(2*E*I*β^2) + M_t/(E*I*β)
α1 = 0.00085838 rad
# 【 말뚝 머리 휨모멘트 】
Mo := -M_t = 11.7265 tonf*m
Mo = 11.7265 tonf*m
# 【 지중부 최대 휨모멘트 발생 위치 】
Lm := 1/β*tan^-1(1/(1 + 2*β*ho))
Lm = 3.41372 m
# 【 지중부 최대 휨모멘트  】
Mm := -H/(2*β)*sqrt((1 + 2*β*ho)^2 + 1)*e^(-β*Lm)
Mm = -3.93655 tonf*m
# 【 변형각이 0이 되는 깊이  】
L_0 := 1/β*tan^-1(-(1 + 2*β*ho)) = -0.535161 m
L_0 := 3*π/(4*β) = 5.92333 m
# 【 말뚝 각부의 변위량 】
z := 0 .. z_max
Y[z + 1] := H/(2*E*I*β^3)*e^(-(β*z*m))*((1 + β*ho)*cos(β*z*m) + (-β*ho*sin(β*z*m)))
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Y = [6.07061; 4.77811; 3.17886; 1.78121; 0.771692; 0.151998; -0.160004; -0.266799; -0.258273; -0.199511; -0.130572; -0.0716957; -0.0298797; -0.00465417; 0.00772034; 0.0116638; 0.0109637; 0.00831665; 0.00535372] mm
# 【 말뚝 각부의 모멘트 】
z := 0 .. z_max
M[z + 1] := -H/β*e^(-β*(z*m))*(β*ho*cos(β*(z*m)) + (1 + β*ho)*sin(β*(z*m)))
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M = [114.998; 24.7919; -21.1915; -37.4394; -36.8122; -28.7023; -18.9395; -10.5065; -4.46656; -0.790926; 1.03615; 1.64045; 1.5644; 1.19746; 0.777254; 0.422345; 0.172368; 0.0228986; -0.0494295] kN*m
# 【 말뚝 각부의 전단력 】
z := 0 .. z_max
S[z + 1] := -H*e^(-β*(z*m))*(cos(β*(z*m)) + (-(1 + 2*β*ho)*sin(β*(z*m))))
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S = [-11.9018; -6.70193; -2.93016; -0.604864; 0.573209; 0.983031; 0.958986; 0.744238; 0.489079; 0.269933; 0.113635; 0.0189326; -0.0278344; -0.0430236; -0.0407313; -0.0310366; -0.0200623; -0.0108437; -0.00437755] tonf
## 말 뚝 머 리  강  결
# 【 말뚝 머리 변위 】
δ := H*m/(4*E*I*β^2) = 0.00198559 m
δ = 0.00198559 m
# 【 말뚝 머리 경사각 】
α := 0
α = 0 rad
# 【 말뚝 머리 휨모멘트 】
Mo := H/(2*β) = 14.9602 tonf*m
Mo = 14.9602 tonf*m
# 【 지중부 최대 휨모멘트 발생 위치 】
Lm := π/(2*β) = 3.94888 m
Lm = 3.94888 m
# 【 지중부 최대 휨모멘트  】
Mm := -H/(2*β)*e^(-π/2) = -3.10991 tonf*m
Mm = -3.10991 tonf*m
# 【 변형각이 0이 되는 깊이  】
L := π/β = 7.89777 m
L = 7.89777 m
# 【 말뚝 각부의 변위량 】
z := 0 .. z_max
Y[z + 1] := H/(4*E*I*β^3)*e^(-(β*(z*m)))*(cos(β*(z*m)) + sin(β*(z*m)))
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Y = [4.99165; 4.39064; 3.18586; 1.96475; 0.995894; 0.346879; -0.0197902; -0.18107; -0.215362; -0.185049; -0.132024; -0.0800215; -0.0395377; -0.0128599; 0.00191466; 0.00817574; 0.00926323; 0.00778454; 0.00546204] mm
# 【 말뚝 각부의 모멘트 】
z := 0 .. z_max
M[z + 1] := -H/(2*β)*e^(-β*(z*m))*(sin(β*(z*m)) + cos(β*(z*m)))
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M = [-14.9602; -13.1589; -9.54817; -5.88844; -2.98473; -1.03961; 0.059312; 0.542675; 0.645447; 0.554599; 0.39568; 0.239828; 0.118496; 0.0385418; -0.0057383; -0.024503; -0.0277623; -0.0233306; -0.01637] tonf*m
# 【 말뚝 각부의 전단력 】
z := 0 .. z_max
S[z + 1] := -H*e^(-β*(z*m))*cos(β*(z*m))
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S = [-11.9018; -7.37143; -3.75948; -1.32998; 0.04929; 0.661312; 0.796928; 0.688695; 0.493419; 0.300377; 0.149387; 0.0494791; -0.00613202; -0.029927; -0.0343033; -0.0289851; -0.0204221; -0.0122153; -0.00591421] tonf
## 말 뚝 머 리  힌  지
# 【 말뚝 머리 변위 】
δ := H*m/(2*E*I*β^2) = 0.00397118 m
δ = 0.00397118 m
# 【 말뚝 머리 경사각 】
α := H/(2*E*I*β^2) = 0.00397118
α = 0.00397118 rad
# 【 말뚝 머리 휨모멘트 】
Mo := 0
Mo = 0 tonf*m
# 【 지중부 최대 휨모멘트 발생 위치 】
Lm := π/(4*β) = 1.97444 m
Lm = 1.97444 m
# 【 지중부 최대 휨모멘트  】
Mm := -H/β*e^(-π/4)*sin(π/4) = -9.64623 tonf*m
Mm = -9.64623 tonf*m
# 【 변형각이 0이 되는 깊이  】
L := 3*π/(4*β) = 5.92333 m
L = 5.92333 m
# 【 말뚝 각부의 모멘트 】
m = 1 m
z := 0 .. z_max
M[z + 1] := -H/β*e^(-β*(z*m))*sin(β*(z*m))
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M = [0; -7.78652; -9.64524; -8.43339; -6.09338; -3.74172; -1.8848; -0.645987; 0.0504702; 0.354069; 0.41581; 0.355268; 0.252408; 0.152318; 0.0747599; 0.0238606; -0.00418474; -0.0159526; -0.017872] tonf*m
