tonf := 1000 kgf
ORIGIN := 1
## 변위법에 의한 말뚝기초의 설계
# 【 사용 기호 】
# H | 말뚝의 축직각방향력
# Mt | 말뚝 머리에 작용하는 모멘트
# D_B | 말뚝의 지름
# E | 말뚝의 탄성계수
# I | 말뚝의 단면2차모멘트
# K_1 | 말뚝머리부를 말뚝 축직각방향으로 단위량 만큼 변위 시킬때 말뚝머리부에 작용시켜야 할 축직각방향력
K_2
# 말뚝머리부를 단위량 만크 회전시킬때
# 말뚝머리에 작용시켜야 할 축직각방향력
# K_3 | 말뚝머리부를 말뚝 축직각방향으로 단위량 만큼 변위 시킬때 말뚝머리부에 작용시켜야 할 휨모멘트
K_4
# 말뚝머리부를 단위량 만크 회전시킬때
# 말뚝머리에 작용시켜야 할 휨모멘트
# 1 검토 조건
# 【 말뚝 제원 (강관) 】
# 말뚝 직경
D_p := 500 mm
# 말뚝 두께
t_p := 12 mm
# 말뚝 부식 두께
Δt := 2 mm
A_p := π*(D_p - (2*Δt))^2/4 - π*(D_p - 2*t_p)^2/4 = 0.0152681 m^2
I_p := π*(D_p - 2*Δt)^4/64 - π*(D_p - 2*t_p)^4/64 = 45097.5 cm^4
E_p := 210000 MPa = 2141404 kgf/cm^2
L_p := 3.5 m
# 【 말뚝 제원 ( PHC)  】
D_phc := 500 mm
t_phc := 80 mm
Δt_phc := 0 mm
A_phc := π*(D_phc - (2*Δt_phc))^2/4 + (-π*(D_phc - 2*t_phc)^2/4) = 0.105558 m^2
I_phc := π*(D_phc - 2*Δt_phc)^4/64 + (-π*(D_phc - 2*t_phc)^4/64) = 241199 cm^4
E_phc := 40000 MPa = 407886 kgf/cm^2
L_phc := 15.4 m
# 【 말뚝 길이 】
L_p = 3.5 m
L_phc = 15.4 m
L := L_p + L_phc = 18.9 m
# 말뚝 깊이별 계산
# 분할 갯수
CalNo := 15
# 말둑 깊이의
# 증분
DelLen := L/CalNo = 1.26 m
z_max := trunc(L/m) = 18
z_max := CalNo = 15
# 【 작용하중 】
V_o := 16333.417 kN*m
H_o := 5135.532 kN*m
M_o := 7676.706 kN*m
# 【 tonf 단위 】
H_o = 523.679 tonf*m
V_o = 1665.55 tonf*m
M_o = 782.806 tonf*m
# 【 N 단위 】
H_o = 5135.53 kN*m
V_o = 16333.4 kN*m
M_o = 7676.71 kN*m
# 【 말뚝 배치 제원 】
# 【 말뚝 열수 】
P_n := 4
# 【 말뚝 배치 】
x[1] := 2.1 m = 2.1 m
x[2] := 0.8 m = 0.8 m
x[3] := -0.8 m = -0.8 m
x[4] := -2.1 m = -2.1 m
# 【 말뚝 경사각 】
θ[1] := 0
θ[2] := 0
θ[3] := 0
θ[4] := 0
# 【 말뚝 본수 】
n[1] := 11
n[2] := 11
n[3] := 11
n[4] := 11
x = [2.1; 0.8; -0.8; -2.1] m
θ = [0; 0; 0; 0]
n = [11; 11; 11; 11]
# 1.1 말뚝 특성치 계산
# 【 지반 제원 】
# 【 계산 조건 】
E_p = 2141404 kgf/cm^2  # 말뚝의 탄성계수
D_p = 0.5 m  # 말뚝의 직경
I_p = 45097.5 cm^4  # 말뚝의 단면2차 모멘트
# 【 지반 조건 】
N_s := 15  # 지반의 N치
# 【 말뚝 특성치  】
# K_H값을 구하는데 있어서 β값을 구하는 식 자체에K_H 항이 들어 있으므로 간단히 구할 수 없다. 따라서, β값을 가정하여 수평방향 지반반력계수(K_H)를 산정하고 β == nthroot(K_H*D/(4*E*i), 4)식에 대입하여 값을 산출한다.
# 가정한 β값과 계산식에 의한 β값의 오차가 1% 미만이면 채택하고, 그렇지 않으면 위의 과정을 반복하여 산정한다.
# 【 검토 조건 】
# 말뚝
# 직경
D := D_p = 0.5 m
D = 50 cm
# 말뚝
# 탄성계수
E := E_p = 210000000 kN*m^-2
E = 2141404 kgf*cm^-2
# 말뚝
# 단면2차모멘트
I := I_p = 0.000450975 m^4
I = 45097.5 cm^4
# 지반의 N치
N_s := N_s
# 【 수평방향 지반반력계수  】
# 기초의 특성치
# 가정값
β := 0.5256 m^-1
# 지반반력계수
# 추정에 따른 계수
α := 1.0
# 지반 탄성계수
E_o := 28*(kgf/cm^2)*N_s = 41.1879 MPa
E_o = 420 kgf*cm^-2
# 수평지반반력계수
# 지름 300mm의 강체원판에 의한 평판재하시험의 값에 상당하는
# 수평방향 지반반력계수
K_Ho := (1/(30 cm))*α*E_o = 137293 kN/m^3
K_Ho = 14 kgf*cm^-3
# 하중 작용방향에
# 직교하는
# 기초환산재하폭
B_H := sqrt(D/β) = 0.975343 m
# 수평지반반력계수
K_H := K_Ho*(B_H/(0.3 m))^(-3/4) = 56705 kN*m^-3
K_H = 5.7823 kgf*cm^-3
# 기초의 특성치
β := nthroot((K_H*D/(4*E*I)), 4) = 0.523046 m^-1
1/β = 1.91188 m
# 【 수평방향 지반반력계수 검산  】
β1 := 1/1.903*m^-1
β1 := (((1/(30 cm))*α*E_o)*(sqrt(D/β1)/(30 cm))^(-3/4)*D/(4*E*I))^(1/4) = 0.523035 m^-1
1/β1 = 1.91192 m
β := 0.395646 m^-1
# 【 수평방향 지반반력계수  】
D_p = 0.5 m
E_p = 210000 MPa
I_p = 0.000450975 m^4
# 지반반력계수
# 추정에 따른 계수
α := 1.0
E_o := 1.0 MPa*N_s = 15 MPa
β := ((α*E_o)^8*D_p^5/((0.3 m)^2*2^16*(E_p*I_p)^8))^(1/29) = 0.395646 1/m
# 【 말뚝 축방향 스프링정수 】
# 【 계산 조건 】
A_p = 152.681 cm^2
E_p = 2141404 kgf/cm^2
L = 18.9 m
D_p = 0.5 m
# 보정 계수
a := 0.009*(L/D_p) + 0.390 = 0.7302
# 【 말뚝 축방향 스프링정수 】
K_v := a*A_p*E_p/L = 12631.8 tonf/m
K_v = 12631.8 tonf/m
# 【 검토 조건 】
# 【 강관 말뚝 제원 】
D_p = 0.5 m
E_p = 210000 MPa
A_p = 0.0152681 m^2
L_p = 3.5 m
# 【 PHC 말뚝 제원 】
D_phc = 0.5 m
E_phc = 40000 MPa
A_phc = 0.105558 m^2
L_phc = 15.4 m
# 【 축방향 스프링 정수의 검산 】
# 【 축방향 스프링 정수 】
K_v := (E_p*A_p*E_phc*A_phc)/(E_phc*A_phc*L_p + E_p*A_p*L_phc) = 211020 kN/m
# 1.2 축방향 스프링 정수
# 【 축방향 스프링 정수의 검산 】
a_p := 0.01*(L_p/D_p) + 0.36 = 0.43
A_p = 0.0152681 m^2
E_p = 210000 MPa
L_p = 3.5 m
K_v.p := a_p*A_p*E_p/L_p = 393918 kN/m
# 강관의
# 축방향 스프링정수
K_v.p := 393914.4*kN/m
a_phc := 0.01*(L_phc/D_phc) + 0.36 = 0.668
A_phc = 0.105558 m^2
E_phc = 40000 MPa
L_phc = 15.4 m
K_v.phc := a_phc*A_phc*E_phc/L_phc = 183149 kN/m
# PHC말뚝의
# 축방향 스프링 정수
K_v.phc := 188254.55*kN/m
# 합성말뚝의
# 축방향 스프링 정수
K_v.comp := 1/(1/K_v.p + 1/K_v.phc) = 127379 kN/m
K_v := K_v.comp = 127379 kN/m
# 1.3 말뚝 축직각방향 스프링 정수
# 【 말뚝축직각방향 스프링정수 】
E := E_p = 2141404 kgf/cm^2
I := I_p = 45097.5 cm^4
β = 0.395646 1/m
K_1 := 4*E*I*β^3 = 23461.2 kN/m
K_2 := 2*E*I*β^2 = 29649.3 kN
K_3 := 2*E*I*β^2 = 29649.3 kN
K_4 := 2*E*I*β = 74939 kN*m
K_1 = 2392.38 tonf/m
K_2 = 3023.39 tonf
K_3 = 3023.39 tonf
K_4 = 7641.66 tonf*m
# 1.4 삼원 연립방정식의 계수 계산
# 【 삼원 연립방정식의 계수 계산 】
A_xx := sum((K_1*cos^2(θ[i]) + K_v*sin^2(θ[i]))*n[i], i = 1 .. P_n) = 105265 tonf/m
A_xy := sum(((K_v - K_1)*sin(θ[i])*cos(θ[i]))*n[i], i = 1 .. P_n) = 0 tonf/m
A_xα := sum(((K_v - K_1)*x[i]*sin(θ[i])*cos(θ[i]) + (-K_2*cos(θ[i])))*n[i], i = 1 .. P_n)/m = -133029 tonf/m
A_xx = 1032294 kN/m
A_xy = 0 kN/m
A_xα = -1304569 kN/m
A_yx := A_xy = 0 tonf/m
A_yy := sum((K_v*cos^2(θ[i]) + K_1*sin^2(θ[i]))*n[i], i = 1 .. P_n) = 571519 tonf/m
A_yα := sum(((K_v*cos^2(θ[i]) + K_1*sin^2(θ[i]))*x[i] + K_2*sin(θ[i]))*n[i]/m, i = 1 .. P_n) = 0 tonf/m
A_yx = 0 kN/m
A_yy = 5604682 kN/m
A_yα = 0 kN/m
K_v = 127379 kN/m
K_1 = 23461.2 kN/m
(K_v*cos^2(θ[1]) + K_1*sin^2(θ[1]))*11 + (K_v*cos^2(θ[2]) + K_1*sin^2(θ[2]))*11 + (K_v*cos^2(θ[3]) + K_1*sin^2(θ[3]))*11 + (K_v*cos^2(θ[4]) + K_1*sin^2(θ[4]))*11 = 5604682 kN/m
5604681.9/(4*11) = 127379
A_αx := A_xα = -133029 tonf/m
A_αy := A_yα = 0 tonf/m
A_αα := sum(((K_v*cos^2(θ[i]) + K_1*sin^2(θ[i]))*x[i]^2 + (K_2 + K_3)*x[i]*sin(θ[i]) + K_4)*n[i]/m^2, i = 1 .. P_n) = 1779317 tonf/m
A_αx = -1304569 kN/m
A_αy = 0 kN/m
A_αα = 17449140 kN/m
((K_v*cos^2(θ[1]) + K_1*sin^2(θ[1]))*x[1]^2 + (K_2 + K_3)*x[1]*sin(θ[1]) + K_4)*11 + ((K_v*cos^2(θ[2]) + K_1*sin^2(θ[2]))*x[2]^2 + (K_2 + K_3)*x[2]*sin(θ[2]) + K_4)*11 + ((K_v*cos^2(θ[3]) + K_1*sin^2(θ[3]))*x[3]^2 + (K_2 + K_3)*x[3]*sin(θ[3]) + K_4)*11 + ((K_v*cos^2(θ[4]) + K_1*sin^2(θ[4]))*x[4]^2 + (K_2 + K_3)*x[4]*sin(θ[4]) + K_4)*11 = 17449140 kN*m
# 1.4 말뚝군 도심에서의 변위량
# 【 말뚝군 도심에서의 변위량 】
A := [A_xx, A_xy, A_xα; A_yx, A_yy, A_yα; A_αx, A_αy, A_αα]
A = [105265, 0, -133029; 0, 571519, 0; -133029, 0, 1779317] tonf/m
H_o = 523.679 tonf*m
C := [H_o; V_o; M_o]
V_o = 1665.55 tonf*m
M_o = 782.806 tonf*m
B := A^-1*C = [0.00610796; 0.00291425; 0.000896604] m^2
δ_x := B[1]/m = 0.00610796 m
δ_x = 6.10796 mm
δ_y := B[2]/m = 0.00291425 m
δ_y = 2.91425 mm
α := B[3]/m^2 = 0.000896604 rad
α = 0.0513716 deg
# 【 각 말뚝 두부 X 방향 변위량 】
δx[1] := δ_x*cos(θ[1]) - (δ_y + α*x[1])*sin(θ[1]) = 0.00610796 m
δx[2] := δ_x*cos(θ[2]) - (δ_y + α*x[2])*sin(θ[2]) = 0.00610796 m
δx[3] := δ_x*cos(θ[3]) - (δ_y + α*x[3])*sin(θ[3]) = 0.00610796 m
δx[4] := δ_x*cos(θ[4]) - (δ_y + α*x[4])*sin(θ[4]) = 0.00610796 m
i := 1 .. P_n
δx[i] := δ_x*cos(θ[i]) - (δ_y + α*x[i])*sin(θ[i])
δx = [6.10796; 6.10796; 6.10796; 6.10796] mm
δx = [0.00610796; 0.00610796; 0.00610796; 0.00610796] m
# 【 각 말뚝 두부 Y 방향 변위량 】
δy[1] := δ_x*sin(θ[1]) + (δ_y + α*x[1])*cos(θ[1]) = 0.00479711 m
δy[2] := δ_x*sin(θ[2]) + (δ_y + α*x[2])*cos(θ[2]) = 0.00363153 m
δy[3] := δ_x*sin(θ[3]) + (δ_y + α*x[3])*cos(θ[3]) = 0.00219696 m
δy[4] := δ_x*sin(θ[4]) + (δ_y + α*x[4])*cos(θ[4]) = 0.00103138 m
i := 1 .. P_n
δy[i] := δ_x*sin(θ[i]) + (δ_y + α*x[i])*cos(θ[i])
δy = [4.79711; 3.63153; 2.19696; 1.03138] mm
δy = [0.00479711; 0.00363153; 0.00219696; 0.00103138] m
# 1.5 각 말뚝 반력 계산
# 【 각 말뚝 반력 계산 】
i := 1 .. P_n
Pn[i] := K_v*δy[i]
Pn = [62.31; 47.1701; 28.5365; 13.3966] tonf
K_v*δy[1] = 62.31 tonf
K_v*δy[2] = 47.1701 tonf
K_v*δy[3] = 28.5365 tonf
K_v*δy[4] = 13.3966 tonf
Ph[i] := K_1*δx[i] - K_2*α
Ph = [11.9018; 11.9018; 11.9018; 11.9018] tonf
K_1 = 2392.38 tonf/m
K_2 = 3023.39 tonf
α = 0.000896604 rad
δx[1] = 0.00610796 m
K_1*δx[1] - K_2*α = 11.9018 tonf
Mt[i] := -K_3*δx[i] + K_4*α
Mt = [-11.6152; -11.6152; -11.6152; -11.6152] tonf*m
Pn = [611.052; 462.581; 279.847; 131.376] kN
Ph = [116.717; 116.717; 116.717; 116.717] kN
Mt = [-113.906; -113.906; -113.906; -113.906] kN*m
Pn = [62.31; 47.1701; 28.5365; 13.3966] tonf
Ph = [11.9018; 11.9018; 11.9018; 11.9018] tonf
Mt = [-11.6152; -11.6152; -11.6152; -11.6152] tonf*m
# 2. 말뚝 본체의 설계
# 【 검토 조건 】
m = 1 m
β = 0.395646 1/m
E = 210000 MPa
V := Pn[1] = 611.052 kN
H := Ph[1] = 116.717 kN
M_t := Mt[1] = -113.906 kN*m
V = 611.052 kN
H = 116.717 kN
M_t = -113.906 kN*m
ho := M_t/H = -0.975921 m
## 말 뚝 기 본 계 (고정)
# 【 말뚝 머리 변위 】
δ := H/(2*E*I*β^3) + M_t/(2*E*I*β^2) = 0.00610796 m
# 【 지표면 변위 】
f := δ = 0.00610796 m
# 【 말뚝 머리 경사각 】
α1 := H/(2*E*I*β^2) + M_t/(E*I*β) = 0.000896604 rad
# 【 말뚝 머리 휨모멘트 】
Mo := -M_t = 113.906 kN*m
# 【 지중부 최대 휨모멘트
# 발생 위치 】
Lm := 1/β*tan^-1(1/(1 + 2*β*ho)) = 3.40419 m
# 【 지중부 최대 휨모멘트  】
Mm := -H/(2*β)*sqrt((1 + 2*β*ho)^2 + 1)*e^(-β*Lm) = -39.3412 kN*m
# 【 제1부동점의 깊이  】
l := 1/β*tan^-1((1 + β*ho)/(β*ho)) = -2.55112 m
# 【 변형각이 0이 되는 깊이  】
L_0 := 1/β*tan^-1(-(1 + 2*β*ho)) = -0.566017 m
# 【 말뚝 각부의 변위량 】
# 배열 번호
z := 0 .. z_max
# 계산 심도
Z[z + 1] := z*DelLen/m
# 말뚝 심도별
# 변위량
Y[z + 1] := H/(2*E*I*β^3)*e^(-(β*Z[z + 1]*m))*((1 + β*ho)*cos(β*Z[z + 1]*m) + (-β*ho*sin(β*Z[z + 1]*m)))
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Z = [0; 1.26; 2.52; 3.78; 5.04; 6.3; 7.56; 8.82; 10.08; 11.34; 12.6; 13.86; 15.12; 16.38; 17.64; 18.9]
Y = [6.10796; 4.37438; 2.41382; 0.961538; 0.13533; -0.210385; -0.274416; -0.215178; -0.128344; -0.0575494; -0.01405; 0.00624284; 0.0118453; 0.0103356; 0.00665754; 0.0032901] mm
# 【 말뚝 각부의 모멘트 】
# 배열 번호
z := 0 .. z_max
# 계산 심도
Z[z + 1] := z*DelLen/m
M[z + 1] := -H/β*e^(-β*Z[z + 1]*m)*(β*ho*cos(β*(Z[z + 1]*m)) + (1 + β*ho)*sin(β*Z[z + 1]*m))
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Z = [0; 1.26; 2.52; 3.78; 5.04; 6.3; 7.56; 8.82; 10.08; 11.34; 12.6; 13.86; 15.12; 16.38; 17.64; 18.9]
M = [113.906; 8.17427; -33.3065; -38.5545; -28.8487; -16.5563; -7.02123; -1.38288; 1.11511; 1.70008; 1.40256; 0.869254; 0.409995; 0.116735; -0.0267198; -0.0715827] kN*m
# 【 말뚝 각부의 전단력 】
# 배열 번호
z := 0 .. z_max
# 계산 심도
Z[z + 1] := z*DelLen/m
S[z + 1] := -H*e^(-β*(Z[z + 1]*m))*(cos(β*(Z[z + 1]*m)) + (-(1 + 2*β*ho)*sin(β*(Z[z + 1]*m))))
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Z = [0; 1.26; 2.52; 3.78; 5.04; 6.3; 7.56; 8.82; 10.08; 11.34; 12.6; 13.86; 15.12; 16.38; 17.64; 18.9]
S = [-11.9018; -5.56238; -1.54365; 0.405283; 1.00201; 0.919616; 0.611523; 0.313186; 0.108536; 0.000250925; -0.0397791; -0.0425373; -0.0307102; -0.0170729; -0.00688568; -0.0010476] tonf
## 말 뚝 머 리  힌 지
# 【 말뚝 머리 변위 】
δ := H*m/(4*E*I*β^2) = 0.00196829 m
δ = 0.00196829 m
# 【 말뚝 머리 경사각 】
α := 0
α = 0 rad
# 【 말뚝 머리 휨모멘트 】
Mo := H/(2*β) = 15.041 tonf*m
Mo = 15.041 tonf*m
# 【 지중부 최대 휨모멘트 발생 위치 】
Lm := π/(2*β) = 3.97021 m
Lm = 3.97021 m
# 【 지중부 최대 휨모멘트  】
Mm := -H/(2*β)*e^(-π/2) = -3.12671 tonf*m
Mm = -3.12671 tonf*m
# 【 변형각이 0이 되는 깊이  】
L := π/β = 7.94042 m
L = 7.94042 m
# 【 말뚝 각부의 변위량 】
z := 0 .. z_max
Y[z + 1] := H/(4*E*I*β^3)*e^(-(β*(z*m)))*(cos(β*(z*m)) + sin(β*(z*m)))
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Y = [4.97487; 4.38141; 3.18886; 1.97616; 1.00994; 0.359109; -0.0115817; -0.17716; -0.214866; -0.186666; -0.134537; -0.0825503; -0.0415862; -0.0142531; 0.00114034; 0.00787717] mm
# 【 말뚝 각부의 모멘트 】
z := 0 .. z_max
M[z + 1] := -H/(2*β)*e^(-β*(z*m))*(sin(β*(z*m)) + cos(β*(z*m)))
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M = [-15.041; -13.2467; -9.64117; -5.9747; -3.05344; -1.08573; 0.0350159; 0.535622; 0.649624; 0.564363; 0.406757; 0.249581; 0.125731; 0.0430925; -0.00344768; -0.0238157] tonf*m
# 【 말뚝 각부의 전단력 】
z := 0 .. z_max
S[z + 1] := -H*e^(-β*(z*m))*cos(β*(z*m))
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S = [-11.9018; -7.39381; -3.79201; -1.36015; 0.0288178; 0.652305; 0.797408; 0.695094; 0.502201; 0.308913; 0.156188; 0.054042; -0.00364828; -0.0290279; -0.0344127; -0.0295997] tonf
## 말 뚝 머 리  힌  지
# 【 말뚝 머리 변위 】
δ := H*m/(2*E*I*β^2) = 0.00393657 m
δ = 0.00393657 m
# 【 말뚝 머리 경사각 】
α := H/(2*E*I*β^2) = 0.00393657
α = 0.00393657 rad
# 【 말뚝 머리 휨모멘트 】
Mo := 0
Mo = 0 tonf*m
# 【 지중부 최대 휨모멘트 발생 위치 】
Lm := π/(4*β) = 1.98511 m
Lm = 1.98511 m
# 【 지중부 최대 휨모멘트  】
Mm := -H/β*e^(-π/4)*sin(π/4) = -9.69832 tonf*m
Mm = -9.69832 tonf*m
# 【 변형각이 0이 되는 깊이  】
L := 3*π/(4*β) = 5.95532 m
L = 5.95532 m
# 【 말뚝 각부의 모멘트 】
m = 1 m
z := 0 .. z_max
M[z + 1] := -H/β*e^(-β*(z*m))*sin(β*(z*m))
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M = [0; -7.8054; -9.69799; -8.5116; -6.17972; -3.82016; -1.94543; -0.685616; 0.0299259; 0.347944; 0.418746; 0.362571; 0.260684; 0.159553; 0.0800833; 0.0271821] tonf*m
