tonf := 1000 kgf
ORIGIN := 1
# 변위법에 의한 말뚝기초의 설계
#
# (복합말뚝)
# 【 사용 기호 】
# H | 말뚝의 축직각방향력
# Mt | 말뚝 머리에 작용하는 모멘트
# 【 강관 말뚝 】
# D_p | 말뚝 직경
# t_p | 말뚝 두께
# Δt_p | 말뚝 부식 두께
# L_p | 말뚝 길이
# A_p | 말뚝 단면적
# I_p | 말뚝 단면2차 모멘트
# E_p | 말뚝의 탄성계수
# 【 PHC 말뚝 】
# D_phc | 말뚝 직경
# t_phc | 말뚝 두께
# Δt_phc | 말뚝 부식 두께
# L_phc | 말뚝 길이
# A_phc | 말뚝 단면적
# I_phc | 말뚝 단면2차 모멘트
# E_phc | 말뚝의 탄성계수
# 【 말뚝 길이 】
# L_p | 강관 말뚝 길이
# L_phc | PHC말뚝 길이
# L | 말뚝의 총길이
# CalNo | 말뚝 깊이별 계산 분할 갯수
# DelLen | 말뚝 깊이의 증분
z_max
# 【 말뚝 배치 제원 】
# P_n | 말뚝 열수
# x[i] | 말뚝 배치
# θ[i] | 말뚝 경사각
# n[i] | 말뚝 본수
# 【 지반 제원 】
N_s := 15  # 지반의 N치
# 【 수평방향 지반반력계수  】
# β | 기초의 특성치
α := 1.0  # 지반반력계수 추정에 따른 계수
# E_o | 지반 탄성계수
# B_H | 하중 작용방향에 직교하는 기초환산재하폭
# K_Ho | 수평지반반력계수
# K_H | 수평지반반력계수
# 【 축방향 스프링정수 】
# K_v.p | 강관의 축방향 스프링 정수
# K_v.phc | PHC말뚝의 축방향 스프링 정수
# K_v.comp | 합성말뚝의 축방향 스프링 정수
# K_v | 축방향 스프링 정수
# 【 축직각방향 스프링정수 】
# K_1 | 말뚝머리부를 말뚝 축직각방향으로 단위량 만큼 변위 시킬때 말뚝머리부에 작용시켜야 할 축직각방향력
K_2
# 말뚝머리부를 단위량 만크 회전시킬때
# 말뚝머리에 작용시켜야 할 축직각방향력
# K_3 | 말뚝머리부를 말뚝 축직각방향으로 단위량 만큼 변위 시킬때 말뚝머리부에 작용시켜야 할 휨모멘트
K_4
# 말뚝머리부를 단위량 만크 회전시킬때
# 말뚝머리에 작용시켜야 할 휨모멘트
# 1. 검토 조건
# 【 작용하중 】
# 연직력
V_o := 16333.417 kN*m
# 수평력
H_o := 5135.532 kN*m
# 모멘트
M_o := 7676.706 kN*m
# 【 tonf 단위 】
H_o = 523.679 tonf*m
V_o = 1665.55 tonf*m
M_o = 782.806 tonf*m
# 【 N 단위 】
H_o = 5135.53 kN*m
V_o = 16333.4 kN*m
M_o = 7676.71 kN*m
# 2. 사용 말뚝
# 2.1 강관
# 【 말뚝 제원  】 (강관)
# 말뚝 직경
D_p := 500 mm
# 말뚝 두께
t_p := 12 mm
# 말뚝 부식 두께
Δt_p := 2 mm
# 말뚝 길이
L_p := 3.5 m
# 【 말뚝 단면 특성  】 (강관)
# 말뚝 단면적
A_p := π*(D_p - (2*Δt_p))^2/4 - π*(D_p - 2*t_p)^2/4 = 0.0152681 m^2
# 말뚝 단면2차 모멘트
I_p := π*(D_p - 2*Δt_p)^4/64 - π*(D_p - 2*t_p)^4/64 = 45097.5 cm^4
# 【 말뚝 물리적 특성  】 (강관)
# 말뚝의 탄성계수
E_p := 210000 MPa = 2141404 kgf/cm^2
# 2.2 PHC
# 【 말뚝 제원 】( PHC)
D_phc := 500 mm
t_phc := 80 mm
Δt_phc := 0 mm
L_phc := 15.4 m
# 【 말뚝 단면 특성  】 (PHC)
A_phc := π*(D_phc - (2*Δt_phc))^2/4 + (-π*(D_phc - 2*t_phc)^2/4) = 0.105558 m^2
I_phc := π*(D_phc - 2*Δt_phc)^4/64 + (-π*(D_phc - 2*t_phc)^4/64) = 241199 cm^4
# 【 말뚝 물리적 특성  】 (PHC)
E_phc := 40000 MPa = 407886 kgf/cm^2
# 【 말뚝 길이 】
# 강관 말뚝 길이
L_p = 3.5 m
# PHC말뚝 길이
L_phc = 15.4 m
# 말뚝의 총길이
L := L_p + L_phc = 18.9 m
# 말뚝 깊이별 계산
# 분할 갯수
CalNo := 15
# 말둑 깊이의
# 증분
DelLen := L/CalNo = 1.26 m
z_max := trunc(L/m) = 18
z_max := CalNo = 15
# 3. 말뚝의 배치
# 【 말뚝 배치 제원 】
# 【 말뚝 열수 】
P_n := 4
# 【 말뚝 배치 】
x[1] := 2.1 m = 2.1 m
x[2] := 0.8 m = 0.8 m
x[3] := -0.8 m = -0.8 m
x[4] := -2.1 m = -2.1 m
# 【 말뚝 경사각 】
θ[1] := 0
θ[2] := 0
θ[3] := 0
θ[4] := 0
# 【 말뚝 본수 】
n[1] := 11
n[2] := 11
n[3] := 11
n[4] := 11
# 【 말뚝 배치 제원 】
x = [2.1; 0.8; -0.8; -2.1] m
θ = [0; 0; 0; 0]
n = [11; 11; 11; 11]
# 4. 말뚝 특성치 계산
# 【 말뚝 특성치  】
# K_H값을 구하는데 있어서 β값을 구하는 식 자체에K_H 항이 들어 있으므로 간단히 구할 수 없다. 따라서, β값을 가정하여 수평방향 지반반력계수(K_H)를 산정하고 β == nthroot(K_H*D/(4*E*i), 4)식에 대입하여 값을 산출한다.
# 가정한 β값과 계산식에 의한 β값의 오차가 1% 미만이면 채택하고, 그렇지 않으면 위의 과정을 반복하여 산정한다.
# 【 검토 조건 】
# 말뚝
# 직경
D := D_p = 0.5 m
# 말뚝
# 탄성계수
E := E_p = 210000 MPa
# 말뚝
# 단면2차모멘트
I := I_p = 0.000450975 m^4
# 지반의 N치
N_s := N_s
D = 50 cm
E = 2141404 kgf*cm^-2
I = 45097.5 cm^4
# 【 수평방향 지반반력계수  】
# 기초의 특성치
# 가정값
β := 0.5256 m^-1
# 【 지반 탄성계수 】
# 지반 탄성계수
E_o := 28*(kgf/cm^2)*N_s = 41.1879 MPa
# 【 수평방향 지반반력계수  】
# 지반반력계수
# 추정에 따른 계수
α = 1
# 수평지반반력계수
# 지름 300mm의 강체원판에 의한 평판재하시험의 값에 상당하는
# 수평방향 지반반력계수
K_Ho := (1/(30 cm))*α*E_o = 137293 kN/m^3
# 하중 작용방향에
# 직교하는
# 기초환산재하폭
B_H := sqrt(D/β) = 0.975343 m
# 수평지반반력계수
K_H := K_Ho*(B_H/(0.3 m))^(-3/4) = 56705 kN*m^-3
# 【  말둑 특성치 】
# 기초의 특성치
β := nthroot((K_H*D/(4*E*I)), 4) = 0.523046 m^-1
# 기초의 특성 깊이
1/β = 1.91188 m
α = 1
B_H = 0.975343 m
E_o = 420 kgf*cm^-2
K_Ho = 14 kgf*cm^-3
K_H = 5.7823 kgf*cm^-3
β = 0.523046 m^-1
# 【 수평방향 지반반력계수 검산  】
β1 := 1/1.903*m^-1
β1 := (((1/(30 cm))*α*E_o)*(sqrt(D/β1)/(30 cm))^(-3/4)*D/(4*E*I))^(1/4) = 0.523035 m^-1
β := 0.395646 m^-1
1/β1 = 1.91192 m
# 4. 말뚝 특성치 계산 (설계사 제안 방식 검토 )
# 【 수평방향 지반반력계수  】
# 기초의 특성치
# 가정값
β := 0.395654 m^-1
# 【 지반 탄성계수 】
# 지반 탄성계수
E_o := 1 MPa*N_s = 15 MPa
# 【 수평방향 지반반력계수  】
# 지반반력계수
# 추정에 따른 계수
α = 1
# 수평지반반력계수
# 지름 300mm의 강체원판에 의한 평판재하시험의 값에 상당하는
# 수평방향 지반반력계수
K_Ho := (1/(30 cm))*α*E_o = 50000 kN/m^3
# 하중 작용방향에
# 직교하는
# 기초환산재하폭
B_H := sqrt(D/β) = 1.12416 m
# 수평지반반력계수
K_H := K_Ho*(B_H/(0.3 m))^(-3/4) = 18564.8 kN*m^-3
# 【  말둑 특성치 】
# 기초의 특성치
β := nthroot((K_H*D/(4*E*I)), 4) = 0.395646 m^-1
# 기초의 특성 깊이
1/β = 2.52751 m
α = 1
B_H = 1.12416 m
E_o = 152.957 kgf*cm^-2
K_Ho = 5.09858 kgf*cm^-3
K_H = 1.89308 kgf*cm^-3
β = 0.395646 m^-1
# 【 수평방향 지반반력계수 검산  】
β1 := 1/2.528*m^-1
β1 := (((1/(30 cm))*α*E_o)*(sqrt(D/β1)/(30 cm))^(-3/4)*D/(4*E*I))^(1/4) = 0.395638 m^-1
β := 0.395646 m^-1
1/β1 = 2.52756 m
# 4. 말뚝 특성치 계산  (강관말뚝) ( 설계사 )
# 【 계산 조건  】
D := D_p = 0.5 m
E := E_p = 210000 MPa
I := I_p = 0.000450975 m^4
# 지반반력계수
# 추정에 따른 계수
α := 1.0
# 【 지반 탄성계수 】
E_o := 1.0 MPa*N_s = 15 MPa
# 【 수평방향 지반반력계수  】
β := ((α*E_o)^8*D^5/((0.3 m)^2*2^16*(E*I)^8))^(1/29) = 0.395646 1/m
β_p := β = 0.395646 1/m
# 4. 말뚝 특성치 계산  (PHC말뚝) ( 설계사 )
# 【 계산 조건  】
D := D_phc = 0.5 m
E := E_phc = 40000 MPa
I := I_phc = 0.00241199 m^4
# 지반반력계수
# 추정에 따른 계수
α := 1.0
# 【 지반 탄성계수 】
E_o := 1.0 MPa*N_s = 15 MPa
# 【 수평방향 지반반력계수  】
β := ((α*E_o)^8*D^5/((0.3 m)^2*2^16*(E*I)^8))^(1/29) = 0.393624 1/m
β_phc := β = 0.393624 1/m
## 말 뚝 기 본 계 (고정)
# 5. 말뚝 축방향 스프링정수 계산
# 【 검토 조건 】
A_p = 0.0152681 m^2
E_p = 210000 MPa
L_p = 3.5 m
# 【 강관의 축방향 스프링정수 】
a_p := 0.01*(L_p/D_p) + 0.36 = 0.43
K_v.p := a_p*A_p*E_p/L_p = 393918 kN/m
# 【 검토 조건 】
A_phc = 0.105558 m^2
E_phc = 40000 MPa
L_phc = 15.4 m
A_phc := 0.1085 m^2  # 확인 해 볼것
# 【 PHC말뚝의 축방향 스프링 정수】
a_phc := 0.01*(L_phc/D_phc) + 0.36 = 0.668
K_v.phc := a_phc*A_phc*E_phc/L_phc = 188255 kN/m
# 【 합성말뚝의 축방향 스프링 정수 】
K_v.comp := 1/(1/K_v.p + 1/K_v.phc) = 127380 kN/m
K_v := K_v.comp = 127380 kN/m
# 6. 말뚝 축직각방향 스프링정수 계산
# 【 검토 조건 】
E := E_p = 2141404 kgf/cm^2
I := I_p = 45097.5 cm^4
β := β_p = 0.395646 1/m
# 【 말뚝축직각방향 스프링정수 】
K_1 := 4*E*I*β^3 = 23461.2 kN/m
K_2 := 2*E*I*β^2 = 29649.3 kN
K_3 := 2*E*I*β^2 = 29649.3 kN
K_4 := 2*E*I*β = 74939 kN*m
# 【 말뚝축직각방향 스프링정수 】
K_1 = 23461.2 kN/m
K_2 = 29649.3 kN
K_3 = 29649.3 kN
K_4 = 74939 kN*m
# 7. 삼원 연립방정식의 계수 계산
# 【 삼원 연립방정식의 계수 계산 】
A_xx := sum((K_1*cos^2(θ[i]) + K_v*sin^2(θ[i]))*n[i], i = 1 .. P_n) = 1032294 kN/m
A_xy := sum(((K_v - K_1)*sin(θ[i])*cos(θ[i]))*n[i], i = 1 .. P_n) = 0 kN/m
A_xα := sum(((K_v - K_1)*x[i]*sin(θ[i])*cos(θ[i]) + (-K_2*cos(θ[i])))*n[i], i = 1 .. P_n)/m = -1304569 kN/m
A_yx := A_xy = 0 tonf/m
A_yy := sum((K_v*cos^2(θ[i]) + K_1*sin^2(θ[i]))*n[i], i = 1 .. P_n) = 5604699 kN/m
A_yα := sum(((K_v*cos^2(θ[i]) + K_1*sin^2(θ[i]))*x[i] + K_2*sin(θ[i]))*n[i]/m, i = 1 .. P_n) = 0 kN/m
A_αx := A_xα = -1304569 kN/m
A_αy := A_yα = 0 tonf/m
A_αα := sum(((K_v*cos^2(θ[i]) + K_1*sin^2(θ[i]))*x[i]^2 + (K_2 + K_3)*x[i]*sin(θ[i]) + K_4)*n[i]/m^2, i = 1 .. P_n) = 17449182 kN/m
# 【 삼원 연립방정식의 계수 계산 】
A_xx = 1032294 kN/m
A_xy = 0 kN/m
A_xα = -1304569 kN/m
A_yx = 0 kN/m
A_yy = 5604699 kN/m
A_yα = 0 kN/m
A_αx = -1304569 kN/m
A_αy = 0 kN/m
A_αα = 17449182 kN/m
# 8. 말뚝군 도심에서의 변위량
# 【 말뚝군 도심에서의 변위량 】
A := [A_xx, A_xy, A_xα; A_yx, A_yy, A_yα; A_αx, A_αy, A_αα]
A = [105265, 0, -133029; 0, 571520, 0; -133029, 0, 1779321] tonf/m
H_o = 523.679 tonf*m
C := [H_o; V_o; M_o]
V_o = 1665.55 tonf*m
M_o = 782.806 tonf*m
B := A^-1*C = [0.00610796; 0.00291424; 0.000896601] m^2
δ_x := B[1]/m = 0.00610796 m
δ_x = 6.10796 mm
δ_y := B[2]/m = 0.00291424 m
δ_y = 2.91424 mm
α := B[3]/m^2 = 0.000896601 rad
α = 0.0513715 deg
# 【 각 말뚝 두부 X 방향 변위량 】
δx[1] := δ_x*cos(θ[1]) - (δ_y + α*x[1])*sin(θ[1]) = 0.00610796 m
δx[2] := δ_x*cos(θ[2]) - (δ_y + α*x[2])*sin(θ[2]) = 0.00610796 m
δx[3] := δ_x*cos(θ[3]) - (δ_y + α*x[3])*sin(θ[3]) = 0.00610796 m
δx[4] := δ_x*cos(θ[4]) - (δ_y + α*x[4])*sin(θ[4]) = 0.00610796 m
i := 1 .. P_n
δx[i] := δ_x*cos(θ[i]) - (δ_y + α*x[i])*sin(θ[i])
δx = [6.10796; 6.10796; 6.10796; 6.10796] mm
δx = [0.00610796; 0.00610796; 0.00610796; 0.00610796] m
# 【 각 말뚝 두부 Y 방향 변위량 】
δy[1] := δ_x*sin(θ[1]) + (δ_y + α*x[1])*cos(θ[1]) = 0.0047971 m
δy[2] := δ_x*sin(θ[2]) + (δ_y + α*x[2])*cos(θ[2]) = 0.00363152 m
δy[3] := δ_x*sin(θ[3]) + (δ_y + α*x[3])*cos(θ[3]) = 0.00219696 m
δy[4] := δ_x*sin(θ[4]) + (δ_y + α*x[4])*cos(θ[4]) = 0.00103137 m
i := 1 .. P_n
δy[i] := δ_x*sin(θ[i]) + (δ_y + α*x[i])*cos(θ[i])
δy = [4.7971; 3.63152; 2.19696; 1.03137] mm
δy = [0.0047971; 0.00363152; 0.00219696; 0.00103137] m
# 9. 각 말뚝 반력 계산
# 【 각 말뚝 반력 계산 】
i := 1 .. P_n
Pn[i] := K_v*δy[i]
Pn = [62.31; 47.1701; 28.5365; 13.3966] tonf
K_v*δy[1] = 62.31 tonf
K_v*δy[2] = 47.1701 tonf
K_v*δy[3] = 28.5365 tonf
K_v*δy[4] = 13.3966 tonf
Ph[i] := K_1*δx[i] - K_2*α
Ph = [11.9018; 11.9018; 11.9018; 11.9018] tonf
K_1 = 2392.38 tonf/m
K_2 = 3023.39 tonf
α = 0.000896601 rad
δx[1] = 0.00610796 m
K_1*δx[1] - K_2*α = 11.9018 tonf
δx[2] = 0.00610796 m
K_1*δx[2] - K_2*α = 11.9018 tonf
δx[3] = 0.00610796 m
K_1*δx[3] - K_2*α = 11.9018 tonf
δx[4] = 0.00610796 m
K_1*δx[4] - K_2*α = 11.9018 tonf
Mt[i] := -K_3*δx[i] + K_4*α
Mt = [-11.6152; -11.6152; -11.6152; -11.6152] tonf*m
# 【 각 말뚝 반력 계산 】
Pn = [611.052; 462.581; 279.847; 131.376] kN
Ph = [116.717; 116.717; 116.717; 116.717] kN
Mt = [-113.906; -113.906; -113.906; -113.906] kN*m
Pn = [62.31; 47.1701; 28.5365; 13.3966] tonf
Ph = [11.9018; 11.9018; 11.9018; 11.9018] tonf
Mt = [-11.6152; -11.6152; -11.6152; -11.6152] tonf*m
# 10. 말뚝 본체의 설계
# 【 검토 조건 】
# 【 지반 특성치 】
m = 1 m
β := β_p = 0.395646 1/m
# 【 재료 물성치 】
# 탄성계수
E := E_p = 210000 MPa
I := I_p = 0.000450975 m^4
# 【 하중 조건 】
V := Pn[1] = 611.052 kN
H := Ph[1] = 116.717 kN
M_t := Mt[1] = -113.906 kN*m
ho := M_t/H = -0.975922 m
V = 62.31 tonf
H = 11.9018 tonf
M_t = -11.6152 tonf*m
# 【 말뚝 머리 고정인 경우  】
# 【 말뚝 머리 변위 】
δ_fix := (H/(2*E*I*β^3)) + (M_t/(2*E*I*β^2)) = 0.00610796 m
# 【 지표면 변위 】
f_fix := δ_fix = 0.00610796 m
# 【 말뚝 머리 경사각 】
α1_fix := (H/(2*E*I*β^2)) + (M_t/(E*I*β)) = 0.000896601 rad
# 【 말뚝 머리 휨모멘트 】
Mo_fix := -M_t = 113.906 kN*m
# 【 지중부 최대 휨모멘트  발생 위치 】
Lm_fix := (1/β)*(tan^-1(1/(1 + 2*β*ho))) = 3.40419 m
# 【 지중부 최대 휨모멘트  】
Mm_fix := (-H/(2*β))*sqrt((1 + 2*β*ho)^2 + 1)*(e^(-β*Lm_fix))
Mm_fix = -39.3412 kN*m
# 【 제1부동점의 깊이  】
l_fix := (1/β)*(tan^-1((1 + β*ho)/(β*ho))) = -2.55112 m
# 【 변형각이 0이 되는 깊이  】
L_fix := (1/β)*(tan^-1(-(1 + 2*β*ho))) = -0.566016 m
# 【 말뚝 머리 고정인 경우  】
# 【 말뚝 머리 변위 】
δ_fix = 0.610796 cm
# 【 지표면 변위 】
f_fix = 0.610796 cm
# 【 말뚝 머리 경사각 】
α1_fix = 0.000896601 rad
# 【 말뚝 머리 휨모멘트 】
Mo_fix = 113.906 kN*m
# 【 지중부 최대 휨모멘트  발생 위치 】
Lm_fix = 3.40419 m
# 【 지중부 최대 휨모멘트  】
Mm_fix = -39.3412 kN*m
# 【 제1부동점의 깊이  】
l_fix = -2.55112 m
# 【 변형각이 0이 되는 깊이  】
L_fix = -0.566016 m
β := β_p = 0.395646 1/m
E := E_p = 210000 MPa
I := I_p = 45097.5 cm^4
# 【 말뚝 각부의 변위량 】
H = 116.717 kN
# 배열 번호
z := 0 .. z_max
# 계산 심도
Z[z + 1] := z*DelLen/m
Y[z + 1] := H/(2*E*I*β^3)*e^(-(β*Z[z + 1]*m))*((1 + β*ho)*cos(β*Z[z + 1]*m) + (-β*ho*sin(β*Z[z + 1]*m)))
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Z = [0; 1.26; 2.52; 3.78; 5.04; 6.3; 7.56; 8.82; 10.08; 11.34; 12.6; 13.86; 15.12; 16.38; 17.64; 18.9]
Y = [6.10796; 4.37438; 2.41382; 0.961538; 0.13533; -0.210385; -0.274416; -0.215178; -0.128344; -0.0575495; -0.01405; 0.00624282; 0.0118452; 0.0103355; 0.00665754; 0.0032901] mm
# 【 말뚝 각부의 변위량 】
β := β_p = 0.395646 1/m
E := E_p
I := I_p
f(Z) := H/(2*E*I*β^3)*e^(-(β*Z))*((1 + β*ho)*cos(β*Z) + (-β*ho*sin(β*Z)))
Z := 0
f(Z) = 6.10796 mm
Z := 1.26 m
f(Z) = 4.37438 mm
Z := 2.52 m
f(Z) = 2.41382 mm
Z := 3.78 m
f(Z) = 0.961538 mm
Z := 5.04 m
f(Z) = 0.13533 mm
Z := 6.30 m
f(Z) = -0.210385 mm
Z := 7.56 m
f(Z) = -0.274416 mm
Z := 8.82 m
f(Z) = -0.215178 mm
Z := 10.08 m
f(Z) = -0.128344 mm
Z := 11.34 m
f(Z) = -0.0575495 mm
Z := 12.60 m
f(Z) = -0.01405 mm
Z := 13.86 m
f(Z) = 0.00624282 mm
Z := 15.12 m
f(Z) = 0.0118452 mm
Z := 16.38 m
f(Z) = 0.0103355 mm
Z := 17.64 m
f(Z) = 0.00665754 mm
Z := 18.9 m
f(Z) = 0.0032901 mm
# 【 말뚝 각부의 변위량 】
β := β_phc = 0.393624 1/m
E := E_phc
I := I_phc
f(Z) := H/(2*E*I*β^3)*e^(-(β*Z))*((1 + β*ho)*cos(β*Z) + (-β*ho*sin(β*Z)))
Z := 0
f(Z) = 6.108 mm
Z := 1.26 m
f(Z) = 4.37561 mm
Z := 2.52 m
f(Z) = 2.42199 mm
Z := 3.78 m
f(Z) = 0.97173 mm
Z := 5.04 m
f(Z) = 0.142709 mm
Z := 6.30 m
f(Z) = -0.207504 mm
Z := 7.56 m
f(Z) = -0.275205 mm
Z := 8.82 m
f(Z) = -0.217848 mm
Z := 10.08 m
f(Z) = -0.131299 mm
Z := 11.34 m
f(Z) = -0.0598576 mm
Z := 12.60 m
f(Z) = -0.0154268 mm
Z := 13.86 m
f(Z) = 0.00567339 mm
Z := 15.12 m
f(Z) = 0.0117986 mm
Z := 16.38 m
f(Z) = 0.0105347 mm
Z := 17.64 m
f(Z) = 0.00690929 mm
Z := 18.9 m
f(Z) = 0.00349441 mm
β := β_p = 0.395646 1/m
H = 116.717 kN
# 【 말뚝 각부의 모멘트 】
ho = -0.975922 m
# 배열 번호
z := 0 .. z_max
# 계산 심도
Z[z + 1] := z*DelLen/m
M[z + 1] := -H/β*e^(-β*Z[z + 1]*m)*(β*ho*cos(β*(Z[z + 1]*m)) + (1 + β*ho)*sin(β*Z[z + 1]*m))
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Z = [0; 1.26; 2.52; 3.78; 5.04; 6.3; 7.56; 8.82; 10.08; 11.34; 12.6; 13.86; 15.12; 16.38; 17.64; 18.9]
M = [113.906; 8.17434; -33.3064; -38.5544; -28.8487; -16.5563; -7.02123; -1.38288; 1.11511; 1.70008; 1.40256; 0.869254; 0.409995; 0.116736; -0.0267197; -0.0715827] kN*m
# 【 말뚝 각부의 모멘트 】
β := β_p = 0.395646 1/m
H = 116.717 kN
ho = -0.975922 m
f(Z) := -H/β*e^(-β*Z)*(β*ho*cos(β*Z) + (1 + β*ho)*sin(β*Z))
Z := 0 m
f(Z) = 113.906 kN*m
Z := 1.26 m
f(Z) = 8.17434 kN*m
Z := 2.52 m
f(Z) = -33.3064 kN*m
Z := 3.78 m
f(Z) = -38.5544 kN*m
Z := 5.04 m
f(Z) = -28.8487 kN*m
Z := 6.30 m
f(Z) = -16.5563 kN*m
Z := 7.56 m
f(Z) = -7.02123 kN*m
Z := 8.82 m
f(Z) = -1.38288 kN*m
Z := 10.08 m
f(Z) = 1.11511 kN*m
Z := 11.34 m
f(Z) = 1.70008 kN*m
Z := 12.60 m
f(Z) = 1.40256 kN*m
Z := 13.86 m
f(Z) = 0.869254 kN*m
Z := 15.12 m
f(Z) = 0.409995 kN*m
Z := 16.38 m
f(Z) = 0.116736 kN*m
Z := 17.64 m
f(Z) = -0.0267197 kN*m
Z := 18.9 m
f(Z) = -0.0715827 kN*m
# 【 말뚝 각부의 모멘트 】
β := β_phc = 0.393624 1/m
H = 116.717 kN
ho = -0.975922 m
f(Z) := -H/β*e^(-β*Z)*(β*ho*cos(β*Z) + (1 + β*ho)*sin(β*Z))
Z := 0
f(Z) = 113.906 kN*m
Z := 1.26 m
f(Z) = 8.0873 kN*m
Z := 2.52 m
f(Z) = -33.58 kN*m
Z := 3.78 m
f(Z) = -38.9705 kN*m
Z := 5.04 m
f(Z) = -29.2921 kN*m
Z := 6.30 m
f(Z) = -16.9255 kN*m
Z := 7.56 m
f(Z) = -7.26751 kN*m
Z := 8.82 m
f(Z) = -1.50806 kN*m
Z := 10.08 m
f(Z) = 1.07977 kN*m
Z := 11.34 m
f(Z) = 1.71594 kN*m
Z := 12.60 m
f(Z) = 1.43769 kN*m
Z := 13.86 m
f(Z) = 0.903696 kN*m
Z := 15.12 m
f(Z) = 0.434869 kN*m
Z := 16.38 m
f(Z) = 0.130692 kN*m
Z := 17.64 m
f(Z) = -0.0212765 kN*m
Z := 18.9 m
f(Z) = -0.0712599 kN*m
# 【 말뚝 각부의 모멘트 】
β_p = 0.395646 1/m
β_phc = 0.393624 1/m
L_p = 3.5 m
L_phc = 15.4 m
β := (β_p*L_p + β_phc*L_phc)/(L_p + L_phc) = 0.393999 1/m
H = 116.717 kN
ho = -0.975922 m
f(Z) := -H/β*e^(-β*Z)*(β*ho*cos(β*Z) + (1 + β*ho)*sin(β*Z))
Z := 0
f(Z) = 113.906 kN*m
Z := 1.26 m
f(Z) = 8.10349 kN*m
Z := 2.52 m
f(Z) = -33.5291 kN*m
Z := 3.78 m
f(Z) = -38.893 kN*m
Z := 5.04 m
f(Z) = -29.2095 kN*m
Z := 6.30 m
f(Z) = -16.8566 kN*m
Z := 7.56 m
f(Z) = -7.2214 kN*m
Z := 8.82 m
f(Z) = -1.4845 kN*m
Z := 10.08 m
f(Z) = 1.08654 kN*m
Z := 11.34 m
f(Z) = 1.71309 kN*m
Z := 12.60 m
f(Z) = 1.43117 kN*m
Z := 13.86 m
f(Z) = 0.897255 kN*m
Z := 15.12 m
f(Z) = 0.430189 kN*m
Z := 16.38 m
f(Z) = 0.128047 kN*m
Z := 17.64 m
f(Z) = -0.0223239 kN*m
Z := 18.9 m
f(Z) = -0.0713387 kN*m
β := β_p = 0.395646 1/m
H = 116.717 kN
# 【 말뚝 각부의 전단력 】
ho = -0.975922 m
β := β_p = 0.395646 1/m
# 배열 번호
z := 0 .. z_max
# 계산 심도
Z[z + 1] := z*DelLen/m
S[z + 1] := -H*e^(-β*(Z[z + 1]*m))*(cos(β*(Z[z + 1]*m)) + (-(1 + 2*β*ho)*sin(β*(Z[z + 1]*m))))
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Z = [0; 1.26; 2.52; 3.78; 5.04; 6.3; 7.56; 8.82; 10.08; 11.34; 12.6; 13.86; 15.12; 16.38; 17.64; 18.9]
S = [-116.717; -54.5483; -15.1381; 3.97446; 9.82636; 9.01835; 5.99699; 3.0713; 1.06437; 0.00246151; -0.3901; -0.417148; -0.301165; -0.167428; -0.0675255; -0.0102735] kN
## 말 뚝 머 리  힌 지
# 11. 말뚝 축방향 스프링정수 계산
# 【 검토 조건 】
A_p = 0.0152681 m^2
E_p = 210000 MPa
L_p = 3.5 m
# 【 강관의 축방향 스프링정수 】
a_p := 0.01*(L_p/D_p) + 0.36 = 0.43
K_v.p := a_p*A_p*E_p/L_p = 393918 kN/m
# 【 검토 조건 】
A_phc = 0.1085 m^2
E_phc = 40000 MPa
L_phc = 15.4 m
A_phc := 0.1085 m^2  # 확인 해 볼것
# 【 PHC말뚝의 축방향 스프링 정수】
a_phc := 0.01*(L_phc/D_phc) + 0.36 = 0.668
K_v.phc := a_phc*A_phc*E_phc/L_phc = 188255 kN/m
# 【 합성말뚝의 축방향 스프링 정수 】
K_v.comp := 1/(1/K_v.p + 1/K_v.phc) = 127380 kN/m
K_v := K_v.comp = 127380 kN/m
# 12. 말뚝 축직각방향 스프링정수 계산
# 【 검토 조건 】
E := E_p = 2141404 kgf/cm^2
I := I_p = 45097.5 cm^4
β := β_p = 0.395646 1/m
# 【 말뚝축직각방향 스프링정수 】
K_1 := 2*E*I*β^3 = 11730.6 kN/m
K_2 := 0 = 0 kN
K_3 := 0 = 0 kN
K_4 := 0 = 0 kN*m
# 【 말뚝축직각방향 스프링정수 】
K_1 = 11730.6 kN/m
K_2 = 0 kN
K_3 = 0 kN
K_4 = 0 kN*m
# 13. 삼원 연립방정식의 계수 계산
# 【 삼원 연립방정식의 계수 계산 】
A_xx := sum((K_1*cos^2(θ[i]) + K_v*sin^2(θ[i]))*n[i], i = 1 .. P_n) = 52632.3 tonf/m
A_xy := sum(((K_v - K_1)*sin(θ[i])*cos(θ[i]))*n[i], i = 1 .. P_n) = 0 tonf/m
A_xα := sum(((K_v - K_1)*x[i]*sin(θ[i])*cos(θ[i]) + (-K_2*cos(θ[i])))*n[i], i = 1 .. P_n)/m = 0 tonf/m
A_yx := A_xy = 0 tonf/m
A_yy := sum((K_v*cos^2(θ[i]) + K_1*sin^2(θ[i]))*n[i], i = 1 .. P_n) = 571520 tonf/m
A_yα := sum(((K_v*cos^2(θ[i]) + K_1*sin^2(θ[i]))*x[i] + K_2*sin(θ[i]))*n[i]/m, i = 1 .. P_n) = 0 tonf/m
A_αx := A_xα = 0 tonf/m
A_αy := A_yα = 0 tonf/m
A_αα := sum(((K_v*cos^2(θ[i]) + K_1*sin^2(θ[i]))*x[i]^2 + (K_2 + K_3)*x[i]*sin(θ[i]) + K_4)*n[i]/m^2, i = 1 .. P_n) = 1443089 tonf/m
# 【 삼원 연립방정식의 계수 계산 】
A_xx = 516147 kN/m
A_xy = 0 kN/m
A_xα = 0 kN/m
A_yx = 0 kN/m
A_yy = 5604699 kN/m
A_yα = 0 kN/m
A_αx = 0 kN/m
A_αy = 0 kN/m
A_αα = 14151864 kN/m
# 14. 말뚝군 도심에서의 변위량
# 【 말뚝군 도심에서의 변위량 】
A := [A_xx, A_xy, A_xα; A_yx, A_yy, A_yα; A_αx, A_αy, A_αα]
A = [52632.3, 0, 0; 0, 571520, 0; 0, 0, 1443089] tonf/m
H_o = 523.679 tonf*m
C := [H_o; V_o; M_o]
V_o = 1665.55 tonf*m
M_o = 782.806 tonf*m
B := A^-1*C = [0.00994975; 0.00291424; 0.000542452] m^2
δ_x := B[1]/m = 0.00994975 m
δ_x = 9.94975 mm
δ_y := B[2]/m = 0.00291424 m
δ_y = 2.91424 mm
α := B[3]/m^2 = 0.000542452 rad
α = 0.0310802 deg
# 【 각 말뚝 두부 X 방향 변위량 】
δx[1] := δ_x*cos(θ[1]) - (δ_y + α*x[1])*sin(θ[1]) = 0.00994975 m
δx[2] := δ_x*cos(θ[2]) - (δ_y + α*x[2])*sin(θ[2]) = 0.00994975 m
δx[3] := δ_x*cos(θ[3]) - (δ_y + α*x[3])*sin(θ[3]) = 0.00994975 m
δx[4] := δ_x*cos(θ[4]) - (δ_y + α*x[4])*sin(θ[4]) = 0.00994975 m
i := 1 .. P_n
δx[i] := δ_x*cos(θ[i]) - (δ_y + α*x[i])*sin(θ[i])
δx = [9.94975; 9.94975; 9.94975; 9.94975] mm
δx = [0.00994975; 0.00994975; 0.00994975; 0.00994975] m
# 【 각 말뚝 두부 Y 방향 변위량 】
δy[1] := δ_x*sin(θ[1]) + (δ_y + α*x[1])*cos(θ[1]) = 0.00405339 m
δy[2] := δ_x*sin(θ[2]) + (δ_y + α*x[2])*cos(θ[2]) = 0.0033482 m
δy[3] := δ_x*sin(θ[3]) + (δ_y + α*x[3])*cos(θ[3]) = 0.00248027 m
δy[4] := δ_x*sin(θ[4]) + (δ_y + α*x[4])*cos(θ[4]) = 0.00177509 m
i := 1 .. P_n
δy[i] := δ_x*sin(θ[i]) + (δ_y + α*x[i])*cos(θ[i])
δy = [4.05339; 3.3482; 2.48027; 1.77509] mm
δy = [0.00405339; 0.0033482; 0.00248027; 0.00177509] m
# 15. 각 말뚝 반력 계산
# 【 각 말뚝 반력 계산 】
i := 1 .. P_n
P_n = 4
Pn[i] := K_v*δy[i]
Pn = [52.6498; 43.4901; 32.2165; 23.0568] tonf
K_v*δy[1] = 52.6498 tonf
K_v*δy[2] = 43.4901 tonf
K_v*δy[3] = 32.2165 tonf
K_v*δy[4] = 23.0568 tonf
V_o = 16333.4 kN*m
V_o/(4*11) = 37.8533 tonf*m
Ph[i] := K_1*δx[i] - K_2*α
Ph = [11.9018; 11.9018; 11.9018; 11.9018] tonf
K_1 = 1196.19 tonf/m
K_2 = 0 tonf
α = 0.000542452 rad
δx[1] = 0.00994975 m
K_1*δx[1] - K_2*α = 11.9018 tonf
Mt[i] := -K_3*δx[i] + K_4*α
Mt = [0; 0; 0; 0] tonf*m
# 【 각 말뚝 반력 계산 】
Pn = [516.318; 426.492; 315.936; 226.11] kN
Ph = [116.717; 116.717; 116.717; 116.717] kN
Mt = [0; 0; 0; 0] kN*m
Pn = [52.6498; 43.4901; 32.2165; 23.0568] tonf
Ph = [11.9018; 11.9018; 11.9018; 11.9018] tonf
Mt = [0; 0; 0; 0] tonf*m
# 16. 말뚝 본체의 설계
# 【 검토 조건 】
# 【 지반 특성치 】
m = 1 m
β := β_p = 0.395646 1/m
# 【 재료 물성치 】
# 탄성계수
E := E_p = 210000 MPa
I := I_p = 0.000450975 m^4
# 【 하중 조건 】
V := Pn[1] = 516.318 kN
H := Ph[1] = 116.717 kN
M_t := Mt[1] = 0 kN*m
ho := M_t/H = 0 m
V = 516.318 kN
V_hinge := V = 516.318 kN
H = 116.717 kN
H_hinge := H = 116.717 kN
M_t = 0 kN*m
Mt_hinge := M_t = 0 kN*m
# 【 말뚝 머리 힌지인 경우  】
# 【 말뚝 머리 변위 】
δ_hinge := H/(2*E*I*β^3) = 0.00994975 m
# 【 지표면 변위 】
f_hinge := δ_hinge = 0.00994975 m
# 【 말뚝 머리 경사각 】
α1_hinge := H/(2*E*I*β^2) = 0.00393657 rad
# 【 말뚝 머리 휨모멘트 】
Mo_hinge := 0 kN*m
# 【 지중부 최대 휨모멘트
# 발생 위치 】
Lm_hinge := π/(4*β) = 1.98511 m
# 【 지중부 최대 휨모멘트  】
Mm_hinge := -H/β*e^(-π/4)*sin(π/4) = -95.1081 kN*m
# 【 제1부동점의 깊이  】
l_hinge := π/(2*β) = 3.97021 m
# 【 변형각이 0이 되는 깊이  】
L_hinge := 3*π/(4*β) = 5.95532 m
# 【 말뚝 머리 힌지인 경우  】
# 【 말뚝 머리 변위 】
δ_hinge = 9.94975 mm
# 【 지표면 변위 】
f_hinge = 9.94975 mm
# 【 말뚝 머리 경사각 】
α1_hinge = 0.00393657 rad
# 【 말뚝 머리 휨모멘트 】
Mo_hinge = 0 kN*m
# 【 지중부 최대 휨모멘트  발생 위치 】
Lm_hinge = 1.98511 m
# 【 지중부 최대 휨모멘트  】
Mm_hinge = -95.1081 kN*m
# 【 제1부동점의 깊이  】
l_hinge = 3.97021 m
# 【 변형각이 0이 되는 깊이  】
L_hinge = 5.95532 m
β := β_p = 0.395646 1/m
E := E_p = 210000 MPa
# 【 말뚝 각부의 변위량 】
I := I_p = 45097.5 cm^4
H = 116.717 kN
# 배열 번호
z := 0 .. z_max
# 계산 심도
Z[z + 1] := z*DelLen/m
Y[z + 1] := H/(2*E*I*β^3)*e^(-(β*(Z[z + 1]*m)))*cos(β*(Z[z + 1]*m))
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Z = [0; 1.26; 2.52; 3.78; 5.04; 6.3; 7.56; 8.82; 10.08; 11.34; 12.6; 13.86; 15.12; 16.38; 17.64; 18.9]
Y = [9.94975; 5.30824; 1.99274; 0.167663; -0.556371; -0.655517; -0.494156; -0.2854; -0.122194; -0.0250763; 0.0183297; 0.0288105; 0.0239779; 0.0149543; 0.00710914; 0.00206777] mm
# 【 말뚝 각부의 변위량 】
β := β_p = 0.395646 1/m
E := E_p = 210000 MPa
I := I_p = 45097.5 cm^4
H = 116.717 kN
f(Z) := H/(2*E*I*β^3)*e^(-(β*Z))*cos(β*Z)
ZDel := 1.26 m
Z := 0 m
f(Z) = 9.94975 mm
Z := Z + ZDel = 1.26 m
f(Z) = 5.30824 mm
Z := Z + ZDel = 2.52 m
f(Z) = 1.99274 mm
Z := Z + ZDel = 3.78 m
f(Z) = 0.167663 mm
Z := Z + ZDel = 5.04 m
f(Z) = -0.556371 mm
Z := Z + ZDel = 6.3 m
f(Z) = -0.655517 mm
Z := Z + ZDel = 7.56 m
f(Z) = -0.494156 mm
Z := Z + ZDel = 8.82 m
f(Z) = -0.2854 mm
Z := Z + ZDel = 10.08 m
f(Z) = -0.122194 mm
Z := Z + ZDel = 11.34 m
f(Z) = -0.0250763 mm
Z := Z + ZDel = 12.6 m
f(Z) = 0.0183297 mm
Z := Z + ZDel = 13.86 m
f(Z) = 0.0288105 mm
Z := Z + ZDel = 15.12 m
f(Z) = 0.0239779 mm
Z := Z + ZDel = 16.38 m
f(Z) = 0.0149543 mm
Z := Z + ZDel = 17.64 m
f(Z) = 0.00710914 mm
Z := Z + ZDel = 18.9 m
f(Z) = 0.00206777 mm
β := β_p = 0.395646 1/m
E := E_p = 210000 MPa
# 【 말뚝 각부의 모멘트 】
I := I_p = 45097.5 cm^4
H = 116.717 kN
# 배열 번호
z := 0 .. z_max
# 계산 심도
Z[z + 1] := z*DelLen/m
M[z + 1] := -H/β*e^(-(β*(Z[z + 1]*m)))*sin(β*(Z[z + 1]*m))
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Z = [0; 1.26; 2.52; 3.78; 5.04; 6.3; 7.56; 8.82; 10.08; 11.34; 12.6; 13.86; 15.12; 16.38; 17.64; 18.9]
M = [0; -85.6766; -91.4178; -65.9311; -36.6183; -14.7452; -2.22202; 3.06969; 4.09526; 3.23704; 1.94291; 0.878715; 0.220714; -0.0887201; -0.176103; -0.155168] kN*m
β := β_p = 0.395646 1/m
E := E_p = 210000 MPa
# 【 말뚝 각부의 전단력 】
I := I_p = 45097.5 cm^4
# 배열 번호
z := 0 .. z_max
H = 116.717 kN
# 계산 심도
Z[z + 1] := z*DelLen/m
S[z + 1] := -H*e^(-β*(Z[z + 1]*m))*(cos(β*(Z[z + 1]*m)) - sin(β*(Z[z + 1]*m)))
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Z = [0; 1.26; 2.52; 3.78; 5.04; 6.3; 7.56; 8.82; 10.08; 11.34; 12.6; 13.86; 15.12; 16.38; 17.64; 18.9]
S = [-116.717; -28.3713; 12.793; 24.1186; 21.0145; 13.5235; 6.67589; 2.13341; -0.186863; -0.98656; -0.983721; -0.685625; -0.3686; -0.140321; -0.0137203; 0.0371354] kN
# 17. 말뚝 본체 설계 결과 집계
# 【 고정  】 | 【 힌지  】
# 【 말뚝 머리 변위 】
δ_fix = 0.00610796 m
δ_hinge = 0.00994975 m
# 【 지표면 변위 】
f_fix = 0.00610796 m
f_hinge = 0.00994975 m
# 【 말뚝 머리 경사각 】
α1_fix = 0.000896601 rad
α1_hinge = 0.00393657 rad
# 【 제1부동점의 깊이  】
l_fix = -2.55112 m
l_hinge = 3.97021 m
# 【 변형각이 0이 되는 깊이 】
L_fix = -0.566016 m
L_hinge = 5.95532 m
# 18. 복합말뚝 이음부 위치 검토
# 【 말뚝 머리 휨모멘트 】
Mo_fix = 113.906 kN*m
Mo_hinge = 0 kN*m
# 【 지중부 최대 휨모멘트  】
Mm_fix = -39.3412 kN*m
Mm_hinge = -95.1081 kN*m
# 【 지중부 최대 휨모멘트  발생 위치 】
Lm_fix = 3.40419 m
Lm_hinge = 1.98511 m
# 【 설계 휨모멘트 】
Mmax := max(|Mo_fix|, |Mm_fix|, |Mm_hinge|) = 113.906 kN*m
Mmax/2 = 56.9531 kN*m
z := 0 .. 18.9
β := β_p = 0.395646 1/m
f(z) := (-H_hinge/β*e^(-(β*(z*m)))*sin(β*(z*m)))
g(z) := -Mmax/2
f(4.151) = -56.9458 kN*m
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f(z) := -H_hinge/β*e^(-(β*(z*m)))*sin(β*(z*m)) + Mmax/2
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z := 1
z := root(f(z), z, 2, 5)
z = 4.1507
z := z + 1 = 5.1507
