tonf := 1000 kgf
ORIGIN := 1
# 변위법에 의한 말뚝기초의 설계
#
# (복합말뚝)
# 【 사용 기호 】
# H | 말뚝의 축직각방향력
# Mt | 말뚝 머리에 작용하는 모멘트
# 【 강관 말뚝 】
# D_p | 말뚝 직경
# t_p | 말뚝 두께
# Δt_p | 말뚝 부식 두께
# L_p | 말뚝 길이
# A_p | 말뚝 단면적
# I_p | 말뚝 단면2차 모멘트
# E_p | 말뚝의 탄성계수
# 【 PHC 말뚝 】
# D_phc | 말뚝 직경
# t_phc | 말뚝 두께
# Δt_phc | 말뚝 부식 두께
# L_phc | 말뚝 길이
# A_phc | 말뚝 단면적
# I_phc | 말뚝 단면2차 모멘트
# E_phc | 말뚝의 탄성계수
# 【 말뚝 길이 】
# L_p | 강관 말뚝 길이
# L_phc | PHC말뚝 길이
# L | 말뚝의 총길이
# CalNo | 말뚝 깊이별 계산 분할 갯수
# DelLen | 말뚝 깊이의 증분
z_max
# 【 말뚝 배치 제원 】
# P_n | 말뚝 열수
# x[i] | 말뚝 배치
# θ[i] | 말뚝 경사각
# n[i] | 말뚝 본수
# 【 지반 제원 】
N_s := 15  # 지반의 N치
# 【 수평방향 지반반력계수  】
# β | 기초의 특성치
α := 1.0  # 지반반력계수 추정에 따른 계수
# E_o | 지반 탄성계수
# B_H | 하중 작용방향에 직교하는 기초환산재하폭
# K_Ho | 수평지반반력계수
# K_H | 수평지반반력계수
# 【 축방향 스프링정수 】
# K_v.p | 강관의 축방향 스프링 정수
# K_v.phc | PHC말뚝의 축방향 스프링 정수
# K_v.comp | 합성말뚝의 축방향 스프링 정수
# K_v | 축방향 스프링 정수
# 【 축직각방향 스프링정수 】
# K_1 | 말뚝머리부를 말뚝 축직각방향으로 단위량 만큼 변위 시킬때 말뚝머리부에 작용시켜야 할 축직각방향력
K_2
# 말뚝머리부를 단위량 만크 회전시킬때
# 말뚝머리에 작용시켜야 할 축직각방향력
# K_3 | 말뚝머리부를 말뚝 축직각방향으로 단위량 만큼 변위 시킬때 말뚝머리부에 작용시켜야 할 휨모멘트
K_4
# 말뚝머리부를 단위량 만크 회전시킬때
# 말뚝머리에 작용시켜야 할 휨모멘트
# 1. 검토 조건
# 【 작용하중 】
# 연직력
V_o := 16333.417 kN*m
# 수평력
H_o := 5135.532 kN*m
# 모멘트
M_o := 7676.706 kN*m
# 【 tonf 단위 】
H_o = 523.679 tonf*m
V_o = 1665.55 tonf*m
M_o = 782.806 tonf*m
# 【 N 단위 】
H_o = 5135.53 kN*m
V_o = 16333.4 kN*m
M_o = 7676.71 kN*m
# 2. 사용 말뚝
# 2.1 강관
# 【 말뚝 제원  】 (강관)
# 말뚝 직경
D_p := 500 mm
# 말뚝 두께
t_p := 12 mm
# 말뚝 부식 두께
Δt_p := 2 mm
# 말뚝 길이
L_p := 3.5 m
# 【 말뚝 단면 특성  】 (강관)
# 말뚝 단면적
A_p := π*(D_p - (2*Δt_p))^2/4 - π*(D_p - 2*t_p)^2/4 = 0.0152681 m^2
# 말뚝 단면2차 모멘트
I_p := π*(D_p - 2*Δt_p)^4/64 - π*(D_p - 2*t_p)^4/64 = 450975060 mm^4
# 【 말뚝 물리적 특성  】 (강관)
# 말뚝의 탄성계수
E_p := 210000 MPa = 2141404 kgf/cm^2
# 2.2 PHC
# 【 말뚝 제원 】( PHC)
D_phc := 500 mm
t_phc := 80 mm
Δt_phc := 0 mm
L_phc := 15.4 m
# 【 말뚝 단면 특성  】 (PHC)
A_phc := π*(D_phc - (2*Δt_phc))^2/4 + (-π*(D_phc - 2*t_phc)^2/4) = 0.105558 m^2
I_phc := π*(D_phc - 2*Δt_phc)^4/64 + (-π*(D_phc - 2*t_phc)^4/64) = 2.41199e9 mm^4
# 【 말뚝 물리적 특성  】 (PHC)
E_phc := 40000 MPa = 407886 kgf/cm^2
# 【 말뚝 길이 】
# 강관 말뚝 길이
L_p = 3.5 m
# PHC말뚝 길이
L_phc = 15.4 m
# 말뚝의 총길이
L := L_p + L_phc = 18.9 m
# 말뚝 깊이별 계산
# 분할 갯수
CalNo := 33
# 말둑 깊이의
# 증분
DelLen := L/CalNo = 0.572727 m
z_max := trunc(L/m) = 18
z_max := CalNo = 33
# 3. 말뚝의 배치
# 【 말뚝 배치 제원 】
# 【 말뚝 열수 】
P_n := 4
# 【 말뚝 배치 】
x[1] := 1.6 m/2 + 1.3 m = 2.1 m
x[2] := 1.6 m/2 = 0.8 m
x[3] := -0.8 m = -0.8 m
x[4] := -2.1 m = -2.1 m
# 【 말뚝 경사각 】
θ[1] := 0
θ[2] := 0
θ[3] := 0
θ[4] := 0
# 【 말뚝 본수 】
n[1] := 11
n[2] := 11
n[3] := 11
n[4] := 11
# 【 말뚝 배치 제원 】
x = [2.1; 0.8; -0.8; -2.1] m
θ = [0; 0; 0; 0]
n = [11; 11; 11; 11]
# 4. 말뚝 특성치 계산
# 【 말뚝 특성치  】
# K_H값을 구하는데 있어서 β값을 구하는 식 자체에K_H 항이 들어 있으므로 간단히 구할 수 없다. 따라서, β값을 가정하여 수평방향 지반반력계수(K_H)를 산정하고 β == nthroot(K_H*D/(4*E*i), 4)식에 대입하여 값을 산출한다.
# 가정한 β값과 계산식에 의한 β값의 오차가 1% 미만이면 채택하고, 그렇지 않으면 위의 과정을 반복하여 산정한다.
# 【 검토 조건 】
# 말뚝
# 직경
D := D_p = 0.5 m
# 말뚝
# 탄성계수
E := E_p = 210000 MPa
# 말뚝
# 단면2차모멘트
I := I_p = 0.000450975 m^4
# 지반의 N치
N_s := N_s
D = 50 cm
E = 2141404 kgf*cm^-2
I = 45097.5 cm^4
# 【 수평방향 지반반력계수  】
# 기초의 특성치
# 가정값
β := 0.5256 m^-1
# 【 지반 탄성계수 】
# 지반 탄성계수
E_o := 28*(kgf/cm^2)*N_s = 41.1879 MPa
# 【 수평방향 지반반력계수  】
# 지반반력계수
# 추정에 따른 계수
α = 1
# 수평지반반력계수
# 지름 300mm의 강체원판에 의한 평판재하시험의 값에 상당하는
# 수평방향 지반반력계수
K_Ho := (1/(30 cm))*α*E_o = 137293 kN/m^3
# 하중 작용방향에
# 직교하는
# 기초환산재하폭
B_H := sqrt(D/β) = 0.975343 m
# 수평지반반력계수
K_H := K_Ho*(B_H/(0.3 m))^(-3/4) = 56705 kN*m^-3
# 【  말둑 특성치 】
# 기초의 특성치
β := nthroot((K_H*D/(4*E*I)), 4) = 0.523046 m^-1
# 기초의 특성 깊이
1/β = 1.91188 m
α = 1
B_H = 0.975343 m
E_o = 420 kgf*cm^-2
K_Ho = 14 kgf*cm^-3
K_H = 5.7823 kgf*cm^-3
β = 0.523046 m^-1
# 【 수평방향 지반반력계수 검산  】
β1 := 1/1.903*m^-1
β1 := (((1/(30 cm))*α*E_o)*(sqrt(D/β1)/(30 cm))^(-3/4)*D/(4*E*I))^(1/4) = 0.523035 m^-1
β := 0.395646 m^-1
1/β1 = 1.91192 m
# 4. 말뚝 특성치 계산 (설계사 제안 방식 검토 )
# 【 수평방향 지반반력계수  】
# 기초의 특성치
# 가정값
β := 0.3951099 m^-1
# 【 지반 탄성계수 】
# 지반 탄성계수
E_o := 1 MPa*N_s = 15 MPa
# 【 수평방향 지반반력계수  】
# 지반반력계수
# 추정에 따른 계수
α = 1
# 수평지반반력계수
# 지름 300mm의 강체원판에 의한 평판재하시험의 값에 상당하는
# 수평방향 지반반력계수
K_Ho := (1/(30 cm))*α*E_o = 50000 kN/m^3
# 하중 작용방향에
# 직교하는
# 기초환산재하폭
B_H := sqrt((D - 2*Δt_p)/β) = 1.12042 m
# 수평지반반력계수
K_H := K_Ho*(B_H/(0.3 m))^(-3/4) = 18611.2 kN*m^-3
# 【  말둑 특성치 】
# 기초의 특성치
β := nthroot((K_H*(D - 2*Δt_p)/(4*E*I)), 4) = 0.395099 m^-1
# 기초의 특성 깊이
1/β = 2.53101 m
α = 1
B_H = 1.12042 m
E_o = 152.957 kgf*cm^-2
K_Ho = 5.09858 kgf*cm^-3
K_H = 1.89781 kgf*cm^-3
β = 0.395099 m^-1
# 【 수평방향 지반반력계수 검산  】
β1 := 1/2.528*m^-1
β1 := (((1/(30 cm))*α*E_o)*(sqrt((D - 2*Δt_p)/β1)/(30 cm))^(-3/4)*(D - 2*Δt_p)/(4*E*I))^(1/4) = 0.395142 m^-1
β1 = 0.395142 m^-1
1/β1 = 2.53073 m
# 4. 말뚝 특성치 계산  (강관말뚝) ( 설계사 )
# 【 계산 조건  】
D := D_p - 2*Δt_p = 0.496 m
E := E_p = 210000 MPa
I := I_p = 0.000450975 m^4
# 지반반력계수
# 추정에 따른 계수
α := 1.0
# 【 지반 탄성계수 】
E_o := 1.0 MPa*N_s = 15 MPa
# 【 수평방향 지반반력계수  】
β := ((α*E_o)^8*D^5/((0.3 m)^2*2^16*(E*I)^8))^(1/29) = 0.395098 1/m
β_p := β = 0.395098 1/m
# 4. 말뚝 특성치 계산  (PHC말뚝) ( 설계사 )
# 【 계산 조건  】
D := D_phc = 0.5 m
E := E_phc = 40000 MPa
I := I_phc = 0.00241199 m^4
# 지반반력계수
# 추정에 따른 계수
α := 1.0
# 【 지반 탄성계수 】
E_o := 1.0 MPa*N_s = 15 MPa
# 【 수평방향 지반반력계수  】
β := ((α*E_o)^8*D^5/((0.3 m)^2*2^16*(E*I)^8))^(1/29) = 0.393624 1/m
β_phc := β = 0.393624 1/m
## 말 뚝 기 본 계 (고정)
# 5. 말뚝 축방향 스프링정수 계산
# 【 검토 조건 】
A_p = 0.0152681 m^2
E_p = 210000 MPa
L_p = 3.5 m
# 【 강관의 축방향 스프링정수 】
a_p := 0.013*(L_p/D_p) + 0.53 = 0.621
K_v.p := a_p*A_p*E_p/L_p = 568891 kN/m
# 【 검토 조건 】
A_phc = 0.105558 m^2
E_phc = 40000 MPa
L_phc = 15.4 m
# 【 PHC말뚝의 축방향 스프링 정수】
a_phc := 0.01*(L_phc/D_phc) + 0.36 = 0.668
K_v.phc := a_phc*A_phc*E_phc/L_phc = 183149 kN/m
# 【 합성말뚝의 축방향 스프링 정수 】
K_v.comp := 1/(1/K_v.p + 1/K_v.phc) = 138546 kN/m
K_v := K_v.comp = 138546 kN/m
# 5. 말뚝 축방향 스프링정수 계산  ( 파일테크 방식)
# 【 검토 조건 】
A_p = 0.0152681 m^2
E_p = 210000 MPa
L_p = 3.5 m
A_phc = 0.105558 m^2
E_phc = 40000 MPa
L_phc = 15.4 m
# 【 합성 말뚝의 축방향 스프링정수 】
L := L_p + L_phc = 18.9 m
D := D_p - (2*Δt_p) = 0.496 m  # ; 강관의 부식을 고려한 두께 적용
a := 0.013*(L/D) + 0.53 = 1.02536
K_v.comp := a*(E_p*A_p)*(E_phc*A_phc)/((E_p*A_p*L_phc) + (E_phc*A_phc*L_p)) = 216372 kN/m
K_v := K_v.comp = 216372 kN/m
# 6. 말뚝 축직각방향 스프링정수 계산
# 【 검토 조건 】
E := E_p = 2141404 kgf/cm^2
I := I_p = 45097.5 cm^4
β := β_p = 0.395098 1/m
# 【 말뚝축직각방향 스프링정수 】
K_1 := 4*E*I*β^3 = 23364 kN/m
K_2 := 2*E*I*β^2 = 29567.3 kN
K_3 := 2*E*I*β^2 = 29567.3 kN
K_4 := 2*E*I*β = 74835.3 kN*m
# 【 말뚝축직각방향 스프링정수 】
K_1 = 23364 kN/m
K_2 = 29567.3 kN
K_3 = 29567.3 kN
K_4 = 74835.3 kN*m
# 7. 삼원 연립방정식의 계수 계산
# 【 삼원 연립방정식의 계수 계산 】
A_xx := sum((K_1*cos^2(θ[i]) + K_v*sin^2(θ[i]))*n[i], i = 1 .. P_n) = 1028014 kN/m
A_xy := sum(((K_v - K_1)*sin(θ[i])*cos(θ[i]))*n[i], i = 1 .. P_n) = 0 kN/m
A_xα := sum(((K_v - K_1)*x[i]*sin(θ[i])*cos(θ[i]) + (-K_2*cos(θ[i])))*n[i], i = 1 .. P_n)/m = -1300961 kN/m
A_yx := A_xy = 0 tonf/m
A_yy := sum((K_v*cos^2(θ[i]) + K_1*sin^2(θ[i]))*n[i], i = 1 .. P_n) = 9520349 kN/m
A_yα := sum(((K_v*cos^2(θ[i]) + K_1*sin^2(θ[i]))*x[i] + K_2*sin(θ[i]))*n[i]/m, i = 1 .. P_n) = 0 kN/m
A_αx := A_xα = -1300961 kN/m
A_αy := A_yα = 0 tonf/m
A_αα := sum(((K_v*cos^2(θ[i]) + K_1*sin^2(θ[i]))*x[i]^2 + (K_2 + K_3)*x[i]*sin(θ[i]) + K_4)*n[i]/m^2, i = 1 .. P_n) = 27331636 kN/m
# 【 삼원 연립방정식의 계수 계산 】
A_xx = 1028014 kN/m
A_xy = 0 kN/m
A_xα = -1300961 kN/m
A_yx = 0 kN/m
A_yy = 9520349 kN/m
A_yα = 0 kN/m
A_αx = -1300961 kN/m
A_αy = 0 kN/m
A_αα = 27331636 kN/m
# 8. 말뚝군 도심에서의 변위량
# 【 말뚝군 도심에서의 변위량 】
A := [A_xx, A_xy, A_xα; A_yx, A_yy, A_yα; A_αx, A_αy, A_αα]
A = [104828, 0, -132661; 0, 970805, 0; -132661, 0, 2787051] tonf/m
H_o = 523.679 tonf*m
C := [H_o; V_o; M_o]
V_o = 1665.55 tonf*m
M_o = 782.806 tonf*m
B := A^-1*C = [0.00569402; 0.00171563; 0.000551903] m^2
δ_x := B[1]/m = 0.00569402 m
δ_x = 5.69402 mm
δ_y := B[2]/m = 0.00171563 m
δ_y = 1.71563 mm
α := B[3]/m^2 = 0.000551903 rad
α = 0.0316217 deg
# 【 각 말뚝 두부 X 방향 변위량 】
δx[1] := δ_x*cos(θ[1]) - (δ_y + α*x[1])*sin(θ[1]) = 0.00569402 m
δx[2] := δ_x*cos(θ[2]) - (δ_y + α*x[2])*sin(θ[2]) = 0.00569402 m
δx[3] := δ_x*cos(θ[3]) - (δ_y + α*x[3])*sin(θ[3]) = 0.00569402 m
δx[4] := δ_x*cos(θ[4]) - (δ_y + α*x[4])*sin(θ[4]) = 0.00569402 m
i := 1 .. P_n
δx[i] := δ_x*cos(θ[i]) - (δ_y + α*x[i])*sin(θ[i])
δx = [5.69402; 5.69402; 5.69402; 5.69402] mm
δx = [0.00569402; 0.00569402; 0.00569402; 0.00569402] m
# 【 각 말뚝 두부 Y 방향 변위량 】
δy[1] := δ_x*sin(θ[1]) + (δ_y + α*x[1])*cos(θ[1]) = 0.00287463 m
δy[2] := δ_x*sin(θ[2]) + (δ_y + α*x[2])*cos(θ[2]) = 0.00215715 m
δy[3] := δ_x*sin(θ[3]) + (δ_y + α*x[3])*cos(θ[3]) = 0.00127411 m
δy[4] := δ_x*sin(θ[4]) + (δ_y + α*x[4])*cos(θ[4]) = 0.000556636 m
i := 1 .. P_n
δy[i] := δ_x*sin(θ[i]) + (δ_y + α*x[i])*cos(θ[i])
δy = [2.87463; 2.15715; 1.27411; 0.556636] mm
δy = [0.00287463; 0.00215715; 0.00127411; 0.000556636] m
# 9. 각 말뚝 반력 계산
# 【 각 말뚝 반력 계산 】
i := 1 .. P_n
Pn[i] := K_v*δy[i]
Pn = [63.4251; 47.5949; 28.1117; 12.2815] tonf
K_v*δy[1] = 63.4251 tonf
K_v*δy[2] = 47.5949 tonf
K_v*δy[3] = 28.1117 tonf
K_v*δy[4] = 12.2815 tonf
Ph[i] := K_1*δx[i] - K_2*α
Ph = [11.9018; 11.9018; 11.9018; 11.9018] tonf
K_1 = 2382.46 tonf/m
K_2 = 3015.02 tonf
α = 0.000551903 rad
δx[1] = 0.00569402 m
K_1*δx[1] - K_2*α = 11.9018 tonf
δx[2] = 0.00569402 m
K_1*δx[2] - K_2*α = 11.9018 tonf
δx[3] = 0.00569402 m
K_1*δx[3] - K_2*α = 11.9018 tonf
δx[4] = 0.00569402 m
K_1*δx[4] - K_2*α = 11.9018 tonf
Mt[i] := -K_3*δx[i] + K_4*α
Mt = [-12.956; -12.956; -12.956; -12.956] tonf*m
# 【 각 말뚝 반력 계산 】
Pn = [621.988; 466.747; 275.681; 120.44] kN
Ph = [116.717; 116.717; 116.717; 116.717] kN
Mt = [-127.055; -127.055; -127.055; -127.055] kN*m
Pn = [63.4251; 47.5949; 28.1117; 12.2815] tonf
Ph = [11.9018; 11.9018; 11.9018; 11.9018] tonf
Mt = [-12.956; -12.956; -12.956; -12.956] tonf*m
# 10. 말뚝 본체의 설계
# 【 검토 조건 】
# 【 지반 특성치 】
m = 1 m
β := β_p = 0.395098 1/m
# 【 재료 물성치 】
# 탄성계수
E := E_p = 210000 MPa
I := I_p = 0.000450975 m^4
# 【 하중 조건 】
V := Pn[1] = 621.988 kN
H := Ph[1] = 116.717 kN
M_t := Mt[1] = -127.055 kN*m
ho := M_t/H = -1.08858 m
V = 63.4251 tonf
H = 11.9018 tonf
M_t = -12.956 tonf*m
# 【 말뚝 머리 고정인 경우  】
# 【 말뚝 머리 변위 】
δ_fix := (H/(2*E*I*β^3)) + (M_t/(2*E*I*β^2)) = 0.00569402 m
# 【 지표면 변위 】
f_fix := δ_fix = 0.00569402 m
# 【 말뚝 머리 경사각 】
α1_fix := (H/(2*E*I*β^2)) + (M_t/(E*I*β)) = 0.000551903 rad
# 【 말뚝 머리 휨모멘트 】
Mo_fix := -M_t = 127.055 kN*m
# 【 지중부 최대 휨모멘트  발생 위치 】
Lm_fix := (1/β)*(tan^-1(1/(1 + 2*β*ho))) = 3.62413 m
# 【 지중부 최대 휨모멘트  】
Mm_fix := (-H/(2*β))*sqrt((1 + 2*β*ho)^2 + 1)*(e^(-β*Lm_fix))
Mm_fix = -35.6239 kN*m
# 【 제1부동점의 깊이  】
l_fix := (1/β)*(tan^-1((1 + β*ho)/(β*ho))) = -2.33944 m
# 【 변형각이 0이 되는 깊이  】
L_fix := (1/β)*(tan^-1(-(1 + 2*β*ho))) = -0.351585 m
# 【 말뚝 머리 고정인 경우  】
# 【 말뚝 머리 변위 】
δ_fix = 0.569402 cm
# 【 지표면 변위 】
f_fix = 0.569402 cm
# 【 말뚝 머리 경사각 】
α1_fix = 0.000551903 rad
# 【 말뚝 머리 휨모멘트 】
Mo_fix = 127.055 kN*m
# 【 지중부 최대 휨모멘트  발생 위치 】
Lm_fix = 3.62413 m
# 【 지중부 최대 휨모멘트  】
Mm_fix = -35.6239 kN*m
# 【 제1부동점의 깊이  】
l_fix = -2.33944 m
# 【 변형각이 0이 되는 깊이  】
L_fix = -0.351585 m
β := β_p = 0.395098 1/m
E := E_p = 210000 MPa
I := I_p = 45097.5 cm^4
# 【 말뚝 각부의 변위량 】
H = 116.717 kN
# 배열 번호
z := 0 .. z_max
# 계산 심도
Z[z + 1] := z*DelLen/m
Y[z + 1] := H/(2*E*I*β^3)*e^(-(β*Z[z + 1]*m))*((1 + β*ho)*cos(β*Z[z + 1]*m) + (-β*ho*sin(β*Z[z + 1]*m)))
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Z = [
    0; 0.572727; 1.14545; 1.71818; 2.29091; 2.86364; 3.43636; 4.00909; 4.58182; 5.15455
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]
Y = [
    5.69402; 5.19403; 4.45185; 3.61623; 2.78945; 2.03581; 1.39023; 0.866104; 0.46203; 0.167307
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] mm
# 【 말뚝 각부의 변위량 】
β := β_p = 0.395098 1/m
E := E_p
I := I_p
f(Z) := H/(2*E*I*β^3)*e^(-(β*Z))*((1 + β*ho)*cos(β*Z) + (-β*ho*sin(β*Z)))
ZDel := 0.575 m
Z := 0 m
f(Z) = 5.69402 mm
Z := Z + ZDel = 0.575 m
f(Z) = 5.19145 mm
Z := Z + ZDel = 1.15 m
f(Z) = 4.44542 mm
Z := Z + ZDel = 1.725 m
f(Z) = 3.60618 mm
Z := Z + ZDel = 2.3 m
f(Z) = 2.77679 mm
Z := Z + ZDel = 2.875 m
f(Z) = 2.02187 mm
Z := Z + ZDel = 3.45 m
f(Z) = 1.37632 mm
Z := Z + ZDel = 4.025 m
f(Z) = 0.853292 mm
Z := Z + ZDel = 4.6 m
f(Z) = 0.451067 mm
Z := Z + ZDel = 5.175 m
f(Z) = 0.158615 mm
Z := Z + ZDel = 5.75 m
f(Z) = -0.0400948 mm
Z := Z + ZDel = 6.325 m
f(Z) = -0.162948 mm
Z := Z + ZDel = 6.9 m
f(Z) = -0.22754 mm
Z := Z + ZDel = 7.475 m
f(Z) = -0.249832 mm
Z := Z + ZDel = 8.05 m
f(Z) = -0.243437 mm
Z := Z + ZDel = 8.625 m
f(Z) = -0.219355 mm
# 【 말뚝 각부의 변위량 】
β := β_phc = 0.393624 1/m
E := E_phc
I := I_phc
f(Z) := H/(2*E*I*β^3)*e^(-(β*Z))*((1 + β*ho)*cos(β*Z) + (-β*ho*sin(β*Z)))
ZDel := 0.575 m
Z := 0 m
f(Z) = 5.6682 mm
Z := Z + ZDel = 0.575 m
f(Z) = 5.16534 mm
Z := Z + ZDel = 1.15 m
f(Z) = 4.42353 mm
Z := Z + ZDel = 1.725 m
f(Z) = 3.59038 mm
Z := Z + ZDel = 2.3 m
f(Z) = 2.76721 mm
Z := Z + ZDel = 2.875 m
f(Z) = 2.01764 mm
Z := Z + ZDel = 3.45 m
f(Z) = 1.37613 mm
Z := Z + ZDel = 4.025 m
f(Z) = 0.855732 mm
Z := Z + ZDel = 4.6 m
f(Z) = 0.454882 mm
Z := Z + ZDel = 5.175 m
f(Z) = 0.162805 mm
Z := Z + ZDel = 5.75 m
f(Z) = -0.0362368 mm
Z := Z + ZDel = 6.325 m
f(Z) = -0.159853 mm
Z := Z + ZDel = 6.9 m
f(Z) = -0.225403 mm
Z := Z + ZDel = 7.475 m
f(Z) = -0.248673 mm
Z := Z + ZDel = 8.05 m
f(Z) = -0.243153 mm
Z := Z + ZDel = 8.625 m
f(Z) = -0.219777 mm
β := β_p = 0.395098 1/m
H = 116.717 kN
# 【 말뚝 각부의 모멘트 】
ho = -1.08858 m
# 배열 번호
z := 0 .. z_max
# 계산 심도
Z[z + 1] := z*DelLen/m
M[z + 1] := -H/β*e^(-β*Z[z + 1]*m)*(β*ho*cos(β*(Z[z + 1]*m)) + (1 + β*ho)*sin(β*Z[z + 1]*m))
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Z = [
    0; 0.572727; 1.14545; 1.71818; 2.29091; 2.86364; 3.43636; 4.00909; 4.58182; 5.15455
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]
M = [
    127.055; 68.6193; 25.8504; -3.4615; -21.821; -31.7154; -35.418; -34.8802; -31.6895; -27.0721
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] kN*m
# 【 말뚝 각부의 모멘트 】
β := β_p = 0.395098 1/m
H = 116.717 kN
ho = -1.08858 m
f(Z) := -H/β*e^(-β*Z)*(β*ho*cos(β*Z) + (1 + β*ho)*sin(β*Z))
ZDel := 0.576 m
Z := 0 m
f(Z) = 127.055 kN*m
Z := Z + ZDel = 0.576 m
f(Z) = 68.3323 kN*m
Z := Z + ZDel = 1.152 m
f(Z) = 25.4441 kN*m
Z := Z + ZDel = 1.728 m
f(Z) = -3.86123 kN*m
Z := Z + ZDel = 2.304 m
f(Z) = -22.1325 kN*m
Z := Z + ZDel = 2.88 m
f(Z) = -31.897 kN*m
Z := Z + ZDel = 3.456 m
f(Z) = -35.4596 kN*m
Z := Z + ZDel = 4.032 m
f(Z) = -34.7942 kN*m
Z := Z + ZDel = 4.608 m
f(Z) = -31.5015 kN*m
Z := Z + ZDel = 5.184 m
f(Z) = -26.814 kN*m
Z := Z + ZDel = 5.76 m
f(Z) = -21.6283 kN*m
Z := Z + ZDel = 6.336 m
f(Z) = -16.5544 kN*m
Z := Z + ZDel = 6.912 m
f(Z) = -11.97 kN*m
Z := Z + ZDel = 7.488 m
f(Z) = -8.0744 kN*m
Z := Z + ZDel = 8.064 m
f(Z) = -4.93708 kN*m
Z := Z + ZDel = 8.64 m
f(Z) = -2.53961 kN*m
# 【 말뚝 각부의 모멘트 】
β := β_phc = 0.393624 1/m
H = 116.717 kN
ho = -1.08858 m
f(Z) := -H/β*e^(-β*Z)*(β*ho*cos(β*Z) + (1 + β*ho)*sin(β*Z))
ZDel := 0.576 m
Z := 0 m
f(Z) = 127.055 kN*m
Z := Z + ZDel = 0.576 m
f(Z) = 68.3225 kN*m
Z := Z + ZDel = 1.152 m
f(Z) = 25.4028 kN*m
Z := Z + ZDel = 1.728 m
f(Z) = -3.95153 kN*m
Z := Z + ZDel = 2.304 m
f(Z) = -22.2802 kN*m
Z := Z + ZDel = 2.88 m
f(Z) = -32.1009 kN*m
Z := Z + ZDel = 3.456 m
f(Z) = -35.7103 kN*m
Z := Z + ZDel = 4.032 m
f(Z) = -35.0773 kN*m
Z := Z + ZDel = 4.608 m
f(Z) = -31.8002 kN*m
Z := Z + ZDel = 5.184 m
f(Z) = -27.1117 kN*m
Z := Z + ZDel = 5.76 m
f(Z) = -21.9106 kN*m
Z := Z + ZDel = 6.336 m
f(Z) = -16.8099 kN*m
Z := Z + ZDel = 6.912 m
f(Z) = -12.1912 kN*m
Z := Z + ZDel = 7.488 m
f(Z) = -8.25716 kN*m
Z := Z + ZDel = 8.064 m
f(Z) = -5.08066 kN*m
Z := Z + ZDel = 8.64 m
f(Z) = -2.64583 kN*m
β := β_p = 0.395098 1/m
H = 116.717 kN
# 【 말뚝 각부의 전단력 】
ho = -1.08858 m
β := β_p = 0.395098 1/m
# 배열 번호
z := 0 .. z_max
# 계산 심도
Z[z + 1] := z*DelLen/m
S[z + 1] := -H*e^(-β*(Z[z + 1]*m))*(cos(β*(Z[z + 1]*m)) + (-(1 + 2*β*ho)*sin(β*(Z[z + 1]*m))))
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Z = [
    0; 0.572727; 1.14545; 1.71818; 2.29091; 2.86364; 3.43636; 4.00909; 4.58182; 5.15455
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]
S = [
    -116.717; -87.788; -62.2198; -40.8771; -23.9649; -11.2516; -2.24705; 3.66327; 7.12302; 8.74166
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] kN
## 말 뚝 머 리  힌 지
# 11. 말뚝 축방향 스프링정수 계산
# 【 검토 조건 】
A_p = 0.0152681 m^2
E_p = 210000 MPa
L_p = 3.5 m
# 【 강관의 축방향 스프링정수 】
a_p := 0.01*(L_p/D_p) + 0.36 = 0.43
K_v.p := a_p*A_p*E_p/L_p = 393918 kN/m
# 【 검토 조건 】
A_phc = 0.105558 m^2
E_phc = 40000 MPa
L_phc = 15.4 m
# 【 PHC말뚝의 축방향 스프링 정수】
a_phc := 0.01*(L_phc/D_phc) + 0.36 = 0.668
K_v.phc := a_phc*A_phc*E_phc/L_phc = 183149 kN/m
# 【 합성말뚝의 축방향 스프링 정수 】
K_v.comp := 1/(1/K_v.p + 1/K_v.phc) = 125021 kN/m
K_v := K_v.comp = 125021 kN/m
# 11. 말뚝 축방향 스프링정수 계산  ( 파일테크 방식)
# 【 검토 조건 】
A_p = 0.0152681 m^2
E_p = 210000 MPa
L_p = 3.5 m
A_phc = 0.105558 m^2
E_phc = 40000 MPa
L_phc = 15.4 m
# 【 합성 말뚝의 축방향 스프링정수 】
L := L_p + L_phc = 18.9 m
D := D_p - (2*Δt_p) = 0.496 m  # ; 강관의 부식을 고려한 두께 적용
a := 0.013*(L/D) + 0.53 = 1.02536
K_v.comp := a*(E_p*A_p)*(E_phc*A_phc)/((E_p*A_p*L_phc) + (E_phc*A_phc*L_p)) = 216372 kN/m
K_v := K_v.comp = 216372 kN/m
# 12. 말뚝 축직각방향 스프링정수 계산
# 【 검토 조건 】
E := E_p = 2141404 kgf/cm^2
I := I_p = 45097.5 cm^4
β := β_p = 0.395098 1/m
# 【 말뚝축직각방향 스프링정수 】
K_1 := 2*E*I*β^3 = 11682 kN/m
K_2 := 0 = 0 kN
K_3 := 0 = 0 kN
K_4 := 0 = 0 kN*m
# 【 말뚝축직각방향 스프링정수 】
K_1 = 11682 kN/m
K_2 = 0 kN
K_3 = 0 kN
K_4 = 0 kN*m
# 13. 삼원 연립방정식의 계수 계산
# 【 삼원 연립방정식의 계수 계산 】
A_xx := sum((K_1*cos^2(θ[i]) + K_v*sin^2(θ[i]))*n[i], i = 1 .. P_n) = 514007 kN/m
A_xy := sum(((K_v - K_1)*sin(θ[i])*cos(θ[i]))*n[i], i = 1 .. P_n) = 0 kN/m
A_xα := sum(((K_v - K_1)*x[i]*sin(θ[i])*cos(θ[i]) + (-K_2*cos(θ[i])))*n[i], i = 1 .. P_n)/m = 0 kN/m
A_yx := A_xy = 0 tonf/m
A_yy := sum((K_v*cos^2(θ[i]) + K_1*sin^2(θ[i]))*n[i], i = 1 .. P_n) = 9520349 kN/m
A_yα := sum(((K_v*cos^2(θ[i]) + K_1*sin^2(θ[i]))*x[i] + K_2*sin(θ[i]))*n[i]/m, i = 1 .. P_n) = 0 kN/m
A_αx := A_xα = 0 kN/m
A_αy := A_yα = 0 kN/m
A_αα := sum(((K_v*cos^2(θ[i]) + K_1*sin^2(θ[i]))*x[i]^2 + (K_2 + K_3)*x[i]*sin(θ[i]) + K_4)*n[i]/m^2, i = 1 .. P_n) = 24038881 kN/m
# 【 삼원 연립방정식의 계수 계산 】
A_xx = 514007 kN/m
A_xy = 0 kN/m
A_xα = 0 kN/m
A_yx = 0 kN/m
A_yy = 9520349 kN/m
A_yα = 0 kN/m
A_αx = 0 kN/m
A_αy = 0 kN/m
A_αα = 24038881 kN/m
# 14. 말뚝군 도심에서의 변위량
# 【 말뚝군 도심에서의 변위량 】
A := [A_xx, A_xy, A_xα; A_yx, A_yy, A_yα; A_αx, A_αy, A_αα]
A = [514007, 0, 0; 0, 9520349, 0; 0, 0, 24038881] kN/m
H_o = 523.679 tonf*m
C := [H_o; V_o; M_o]
V_o = 1665.55 tonf*m
M_o = 782.806 tonf*m
B := A^-1*C = [0.00999117; 0.00171563; 0.000319345] m^2
δ_x := B[1]/m = 0.00999117 m
δ_x = 9.99117 mm
δ_y := B[2]/m = 0.00171563 m
δ_y = 1.71563 mm
α := B[3]/m^2 = 0.000319345 rad
α = 0.0182971 deg
# 【 각 말뚝 두부 X 방향 변위량 】
δx[1] := δ_x*cos(θ[1]) - (δ_y + α*x[1])*sin(θ[1]) = 0.00999117 m
δx[2] := δ_x*cos(θ[2]) - (δ_y + α*x[2])*sin(θ[2]) = 0.00999117 m
δx[3] := δ_x*cos(θ[3]) - (δ_y + α*x[3])*sin(θ[3]) = 0.00999117 m
δx[4] := δ_x*cos(θ[4]) - (δ_y + α*x[4])*sin(θ[4]) = 0.00999117 m
i := 1 .. P_n
δx[i] := δ_x*cos(θ[i]) - (δ_y + α*x[i])*sin(θ[i])
δx = [9.99117; 9.99117; 9.99117; 9.99117] mm
δx = [0.00999117; 0.00999117; 0.00999117; 0.00999117] m
# 【 각 말뚝 두부 Y 방향 변위량 】
δy[1] := δ_x*sin(θ[1]) + (δ_y + α*x[1])*cos(θ[1]) = 0.00238626 m
δy[2] := δ_x*sin(θ[2]) + (δ_y + α*x[2])*cos(θ[2]) = 0.00197111 m
δy[3] := δ_x*sin(θ[3]) + (δ_y + α*x[3])*cos(θ[3]) = 0.00146016 m
δy[4] := δ_x*sin(θ[4]) + (δ_y + α*x[4])*cos(θ[4]) = 0.00104501 m
i := 1 .. P_n
δy[i] := δ_x*sin(θ[i]) + (δ_y + α*x[i])*cos(θ[i])
δy = [2.38626; 1.97111; 1.46016; 1.04501] mm
δy = [0.00238626; 0.00197111; 0.00146016; 0.00104501] m
# 15. 각 말뚝 반력 계산
# 【 각 말뚝 반력 계산 】
i := 1 .. P_n
P_n = 4
Pn[i] := K_v*δy[i]
Pn = [52.6498; 43.4901; 32.2165; 23.0568] tonf
K_v*δy[1] = 52.6498 tonf
K_v*δy[2] = 43.4901 tonf
K_v*δy[3] = 32.2165 tonf
K_v*δy[4] = 23.0568 tonf
V_o = 16333.4 kN*m
V_o/(4*11) = 37.8533 tonf*m
Ph[i] := K_1*δx[i] - K_2*α
Ph = [11.9018; 11.9018; 11.9018; 11.9018] tonf
K_1 = 1191.23 tonf/m
K_2 = 0 tonf
α = 0.000319345 rad
δx[1] = 0.00999117 m
K_1*δx[1] - K_2*α = 11.9018 tonf
Mt[i] := -K_3*δx[i] + K_4*α
Mt = [0; 0; 0; 0] tonf*m
# 【 각 말뚝 반력 계산 】
Pn = [516.318; 426.492; 315.936; 226.11] kN
Ph = [116.717; 116.717; 116.717; 116.717] kN
Mt = [0; 0; 0; 0] kN*m
Pn = [52.6498; 43.4901; 32.2165; 23.0568] tonf
Ph = [11.9018; 11.9018; 11.9018; 11.9018] tonf
Mt = [0; 0; 0; 0] tonf*m
# 16. 말뚝 본체의 설계
# 【 검토 조건 】
# 【 지반 특성치 】
m = 1 m
β := β_p = 0.395098 1/m
# 【 재료 물성치 】
# 탄성계수
E := E_p = 210000 MPa
I := I_p = 0.000450975 m^4
# 【 하중 조건 】
V := Pn[1] = 516.318 kN
H := Ph[1] = 116.717 kN
M_t := Mt[1] = 0 kN*m
ho := M_t/H = 0 m
V = 516.318 kN
V_hinge := V = 516.318 kN
H = 116.717 kN
H_hinge := H = 116.717 kN
M_t = 0 kN*m
Mt_hinge := M_t = 0 kN*m
# 【 말뚝 머리 힌지인 경우  】
# 【 말뚝 머리 변위 】
δ_hinge := H/(2*E*I*β^3) = 0.00999117 m
# 【 지표면 변위 】
f_hinge := δ_hinge = 0.00999117 m
# 【 말뚝 머리 경사각 】
α1_hinge := H/(2*E*I*β^2) = 0.00394749 rad
# 【 말뚝 머리 휨모멘트 】
Mo_hinge := 0 kN*m
# 【 지중부 최대 휨모멘트
# 발생 위치 】
Lm_hinge := π/(4*β) = 1.98786 m
# 【 지중부 최대 휨모멘트  】
Mm_hinge := -H/β*e^(-π/4)*sin(π/4) = -95.2399 kN*m
# 【 제1부동점의 깊이  】
l_hinge := π/(2*β) = 3.97571 m
# 【 변형각이 0이 되는 깊이  】
L_hinge := 3*π/(4*β) = 5.96357 m
# 【 말뚝 머리 힌지인 경우  】
# 【 말뚝 머리 변위 】
δ_hinge = 9.99117 mm
# 【 지표면 변위 】
f_hinge = 9.99117 mm
# 【 말뚝 머리 경사각 】
α1_hinge = 0.00394749 rad
# 【 말뚝 머리 휨모멘트 】
Mo_hinge = 0 kN*m
# 【 지중부 최대 휨모멘트  발생 위치 】
Lm_hinge = 1.98786 m
# 【 지중부 최대 휨모멘트  】
Mm_hinge = -95.2399 kN*m
# 【 제1부동점의 깊이  】
l_hinge = 3.97571 m
# 【 변형각이 0이 되는 깊이  】
L_hinge = 5.96357 m
β := β_p = 0.395098 1/m
E := E_p = 210000 MPa
# 【 말뚝 각부의 변위량 】
I := I_p = 45097.5 cm^4
H = 116.717 kN
# 배열 번호
z := 0 .. z_max
# 계산 심도
Z[z + 1] := z*DelLen/m
Y[z + 1] := H/(2*E*I*β^3)*e^(-(β*(Z[z + 1]*m)))*cos(β*(Z[z + 1]*m))
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Z = [
    0; 0.572727; 1.14545; 1.71818; 2.29091; 2.86364; 3.43636; 4.00909; 4.58182; 5.15455
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]
Y = [
    9.99117; 7.76475; 5.71461; 3.94403; 2.49583; 1.37095; 0.543572; -0.0270306; -0.387723; -0.585455
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] mm
# 【 말뚝 각부의 변위량 】
β := β_p = 0.395098 1/m
E := E_p = 210000 MPa
I := I_p = 45097.5 cm^4
H = 116.717 kN
f(Z) := H/(2*E*I*β^3)*e^(-(β*Z))*cos(β*Z)
ZDel := 1.26 m
Z := 0 m
f(Z) = 9.99117 mm
Z := Z + ZDel = 1.26 m
f(Z) = 5.33602 mm
Z := Z + ZDel = 2.52 m
f(Z) = 2.00807 mm
Z := Z + ZDel = 3.78 m
f(Z) = 0.173341 mm
Z := Z + ZDel = 5.04 m
f(Z) = -0.556797 mm
Z := Z + ZDel = 6.3 m
f(Z) = -0.658788 mm
Z := Z + ZDel = 7.56 m
f(Z) = -0.497955 mm
Z := Z + ZDel = 8.82 m
f(Z) = -0.288477 mm
Z := Z + ZDel = 10.08 m
f(Z) = -0.124149 mm
Z := Z + ZDel = 11.34 m
f(Z) = -0.026022 mm
Z := Z + ZDel = 12.6 m
f(Z) = 0.0180759 mm
Z := Z + ZDel = 13.86 m
f(Z) = 0.0289224 mm
Z := Z + ZDel = 15.12 m
f(Z) = 0.0242146 mm
Z := Z + ZDel = 16.38 m
f(Z) = 0.0151784 mm
Z := Z + ZDel = 17.64 m
f(Z) = 0.00726585 mm
Z := Z + ZDel = 18.9 m
f(Z) = 0.00215281 mm
β := β_p = 0.395098 1/m
E := E_p = 210000 MPa
# 【 말뚝 각부의 모멘트 】
I := I_p = 45097.5 cm^4
H = 116.717 kN
# 배열 번호
z := 0 .. z_max
# 계산 심도
Z[z + 1] := z*DelLen/m
M[z + 1] := -H/β*e^(-(β*(Z[z + 1]*m)))*sin(β*(Z[z + 1]*m))
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Z = [
    0; 0.572727; 1.14545; 1.71818; 2.29091; 2.86364; 3.43636; 4.00909; 4.58182; 5.15455
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]
M = [
    0; -52.856; -82.1553; -94.0798; -93.9802; -86.2414; -74.2762; -60.6003; -46.9532; -34.4391
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] kN*m
# 【 말뚝 각부의 모멘트 】
β := β_p = 0.395098 1/m
H = 116.717 kN
ho = 0 m
f(Z) := -H/β*e^(-(β*Z))*sin(β*Z)
ZDel := 0.576 m
Z := 0 m
f(Z) = 0 kN*m
Z := Z + ZDel = 0.576 m
f(Z) = -53.0841 kN*m
Z := Z + ZDel = 1.152 m
f(Z) = -82.3787 kN*m
Z := Z + ZDel = 1.728 m
f(Z) = -94.1655 kN*m
Z := Z + ZDel = 2.304 m
f(Z) = -93.8738 kN*m
Z := Z + ZDel = 2.88 m
f(Z) = -85.9442 kN*m
Z := Z + ZDel = 3.456 m
f(Z) = -73.8237 kN*m
Z := Z + ZDel = 4.032 m
f(Z) = -60.0446 kN*m
Z := Z + ZDel = 4.608 m
f(Z) = -46.3502 kN*m
Z := Z + ZDel = 5.184 m
f(Z) = -33.8392 kN*m
Z := Z + ZDel = 5.76 m
f(Z) = -23.1111 kN*m
Z := Z + ZDel = 6.336 m
f(Z) = -14.3991 kN*m
Z := Z + ZDel = 6.912 m
f(Z) = -7.6847 kN*m
Z := Z + ZDel = 7.488 m
f(Z) = -2.79142 kN*m
Z := Z + ZDel = 8.064 m
f(Z) = 0.542921 kN*m
Z := Z + ZDel = 8.64 m
f(Z) = 2.61327 kN*m
β := β_p = 0.395098 1/m
E := E_p = 210000 MPa
# 【 말뚝 각부의 전단력 】
I := I_p = 45097.5 cm^4
# 배열 번호
z := 0 .. z_max
H = 116.717 kN
# 계산 심도
Z[z + 1] := z*DelLen/m
S[z + 1] := -H*e^(-β*(Z[z + 1]*m))*(cos(β*(Z[z + 1]*m)) - sin(β*(Z[z + 1]*m)))
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Z = [
    0; 0.572727; 1.14545; 1.71818; 2.29091; 2.86364; 3.43636; 4.00909; 4.58182; 5.15455
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]
S = [
    -116.717; -69.8244; -34.2986; -8.90327; 7.97513; 18.0584; 22.9964; 24.2588; 23.0805; 20.4461
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] kN
# 17. 말뚝 본체 설계 결과 집계
# 【 고정  】 | 【 힌지  】
# 【 말뚝 머리 변위 】
δ_fix = 0.00569402 m
δ_hinge = 0.00999117 m
# 【 지표면 변위 】
f_fix = 0.00569402 m
f_hinge = 0.00999117 m
# 【 말뚝 머리 경사각 】
α1_fix = 0.000551903 rad
α1_hinge = 0.00394749 rad
# 【 제1부동점의 깊이  】
l_fix = -2.33944 m
l_hinge = 3.97571 m
# 【 변형각이 0이 되는 깊이 】
L_fix = -0.351585 m
L_hinge = 5.96357 m
# 18. 복합말뚝 이음부 위치 검토
# 【 말뚝 머리 휨모멘트 】
Mo_fix = 127.055 kN*m
Mo_hinge = 0 kN*m
# 【 지중부 최대 휨모멘트  】
Mm_fix = -35.6239 kN*m
Mm_hinge = -95.2399 kN*m
# 【 지중부 최대 휨모멘트  발생 위치 】
Lm_fix = 3.62413 m
Lm_hinge = 1.98786 m
# 【 설계 휨모멘트 】
Mmax := max(|Mo_fix|, |Mm_fix|, |Mm_hinge|) = 127.055 kN*m
Mmax/2 = 63.5275 kN*m
z := 0 .. 18.9
β := β_p = 0.395098 1/m
f(z) := (-H_hinge/β*e^(-(β*(z*m)))*sin(β*(z*m)))
g(z) := -Mmax/2
f(4.151) = -57.1637 kN*m
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f(z) := -H_hinge/β*e^(-(β*(z*m)))*sin(β*(z*m)) + Mmax/2
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z := 1
z := root(f(z), z, 2, 5)
z = 3.88841
z := z + 1 = 4.88841
