# 단 주 식  표 지 판
#
# 구 조 계 산 서
tonf := 1000 kgf
# 1. 설계 조건
# 가. 하중
# (1) 사하중
# 표지판 단위 면적당 중량은 알루미늄판을 사용하는 것으로 가정하고
#
# 부속자재를 포함하여 20kgf로 한다
W_d := 20*kgf/m^2
# (2) 풍하중
P == 1/16*V^2*C
# P | 유효 투영 면적당 풍하중 (kgf/m^2)
# V | 설계 풍속
# ───────────────────────────
# 단주식 , 복주식
V1 := 40*m/sec
# 편지, 현수, 문형
V2 := 50*m/sec
# ───────────────────────────
# C | 저항 계수
# ───────────────────────────
# 지주
C1 := 0.7
# 표지판
C2 := 1.2
# ───────────────────────────
# 나. 허용응력
# 구조물의 허용응력은
#
# 풍하중에 대해서는 단기응력을 고려하고
#
# 단기응력은 장기허용응력의 1.5배로 한다
# 재질 | SPS400
단위 := kgf/cm^2
# ───────────────────────────────────
# 인장 | 압축 | 휨 | 전단
# ───────────────────────────────────
# 두께 40mm 이하 | 1600 | 1600 | 1600 | 900
# ───────────────────────────────────
# 두께 40mm 초과 | 1400 | 1400 | 1400 | 800
# ───────────────────────────────────
# 2 구조 계산
# 가. 개요도
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# 나. 설계 조건
# (1) 풍하중
P1 := 120*kgf/m^2  # 표지판
P2 := 70*kgf/m^2  # 지주
# (2) 사용 부재의 규격
# 표지판
Sign_B := 1900 mm
# 표지판 폭
Sign_B = 1.9 m
Sign_H := 1000 mm
# 표지판 높이
Sign_H = 1 m
# 지주
Post_D := 114.3 mm  # 지주 직경
Post_t := 3.5 mm  # 지주 두께
Post_H := 2.0 m  # 지주 높이
# (3) 허용응력
f_ba := 1.5*1600*kgf/cm^2 = 2400 kgf/cm^2
# 다. 하중의 산정
# 1) 사하중
# 사하중은 무시한다
# 2) 풍하중
V := 40*m/sec
# 설계 풍속
# ( 단주식 )
# (1) 표지판
C_D := 1.2 kgf*sec^2*m^-4
# 저항 계수
# ( 표지판 )
P_o := 1/16*V^2*C_D = 120 kgf/m^2
# 단위 면적당
# 풍하중 강도
A := Sign_B*Sign_H = 1.9 m^2
# 풍하중 재하 면적
# ( 표지판 면적 )
P1 := P_o*A = 228 kgf  # 작용 풍하중
# (2) 지주
C_D := 0.7 kgf*sec^2*m^-4
# 저항 계수
# ( 지주 )
P_o := 1/16*V^2*C_D = 70 kgf/m^2
# 단위 면적당
# 풍하중 강도
A := Post_D*Post_H = 0.2286 m^2
# 풍하중 재하 면적
# ( 표지판 면적 )
P2 := P_o*A = 16.002 kgf  # 작용 풍하중
# 라. 지주 응력 검토
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# 지주 지표면에서의 휨모멘트
h1 := Post_H + Sign_H/2 = 2.5 m
h2 := Post_H/2 = 1 m
P1 = 0.228 tonf
P2 = 0.016002 tonf
M := (P1*h1) + (P2*h2) = 586.002 kgf*m
# 4) 지주 단면 검토
# 【 검토 조건 】
# 지주 직경
Post_D = 114.3 mm
# 지주 단면 두께
Post_t = 3.5 mm
# 【 지주 단면 특성 】
# 지주
# 단면계수
Z := (π*Post_D^4/64 - π*(Post_D - 2*Post_t)^4/64)/(Post_D/2) = 32.7464 cm^3
# 【 지주 응력 검토 】
# 지주
# 작용 휨응력
σ_b := M/Z = 1789.51 kgf/cm^2
f_ba = 2400 kgf/cm^2
Bending_Stress_check :=
    "O.K" if σ_b < f_ba
    "N.G" otherwise
    = "O.K"
