# Worksheet setting: ORIGIN = 1
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# PROBLEM-SOLVING TUTORIAL
#
# 4.2 Solving Equations: Exercises
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# Introduction
#
# In this exercise section you will practice solving equations with the methods you learned in the Tutorial to solve complex problems involving more than one equation. As you go through each exercise, we will also point out how the symbolic equal sign = allows you the flexibility to work up to the final answer, rather than try to “define the relevant equation(s)” all in one step.
#
# Let's start out with a review of Symbolics ⇒ Solve .
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# Question 1
#
# Two balls of putty collide head-on (see Figure 1a. for details). If the two balls stick together completely (an “inelastic” collision), then what is the final velocity?
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# We have assigned variables to the information contained in Figure 1a. We chose velocities going to the right to be positive and those going to the left to be negative:
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# Mass of ball one:
m1 := 45 gm
# Mass of ball two:
m2 := 60 gm
# Information Given
# Initial velocity of ball one:
v1_i := 6 mph
# Initial velocity of ball two:
v2_i := -4 mph
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# Most students feel pressure to write down v_f = on the first step. Instead of focusing on the answer, start with the basic physical concepts and laws. As you go along, any equations you are considering can be jotted down with the symbolic equal sign =, since it allows for the use of variables that have not yet been defined.
# Identify Principles
# Once you have the correct equation(s), the Symbolics⇒Solve command can be used to solve for the variable you want.
#
# Our current problem appears to involve momentum (mass and velocity), which should bring to mind the principle of momentum conservation.
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# Now that we have a starting place, we can ask a few more questions and see where the problem leads.
#
# Is momentum conserved even though the balls stick together? Yes; unless an external force acts on the system (the two balls), then momentum is always conserved. What does it mean for momentum to be conserved?
# Propose Methods
Ptotal_initial == Ptotal_final
# Since we know the initial momentum of each ball, let's put that into the equation:
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P1_i + P2_i == Ptotal_final
m1*v1_i + m2*v2_i == Ptotal_final
# What is the total momentum after the collision? Since the two balls have completely stuck together, there is just one big ball with mass (m1 + m2) at some velocity v_f :
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m1*v1_i + m2*v2_i == (m1 + m2)*v_f
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# We can solve this equation for the final velocity v_f with the Symbolics⇒Solve command on the Math tab.
# Solve Problem
# Notice the difference in our approach to the problem: Start small and work up to the solution. If you can write down the general principles (like energy or momentum conservation, Newton's force law, etc.), you are halfway towards a solution instead of being halfway through your textbook looking for “the equation.”
#
# Remember, using the symbolic equal sign = is a great way to rough out these problems because you can use undefined variables and still manipulate the equations.
#
# Speaking of manipulating equations, let's solve for the final velocity v_f .
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# We have written our last equation in the space to the right. Solve the equation for the final velocity v_f using the Symbolics⇒Solve command on the Math tab.
#
# Then reassign the result to the final velocity v_f . Use the pop-up for help.
#
# Display the answer and replace the units to decide if the answer is reasonable.
#
# Also, include a text region that explains why you think the final velocity is headed left or right.
m1*v1_i + m2*v2_i == (m1 + m2)*v_f
# Solve for Variable
v_f := -(m1*v1_i + m2*v2_i)/(-m1 - m2)
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v_f = 0.285714 mph
# Reassigning variables to symbolic help
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# Since we defined positive velocities to be going to the right, then a positive answer means that the mass is headed to the right.
# State Conclusions
# Let's try another problem using the same approach:  Start by writing down a general principle that you think applies (in symbolic form), then deal with the specific details of the problem.
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# Question 2
#
# A skier pushes off from the top of a 20 m high ski jump ramp, giving herself an initial speed of 5 mph.  After traveling down the slope, she launches off the lip of the jump, which is 3 m high.  Assuming there is no friction, what is her speed just as she leaves the jump?
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# We have assigned variables to the information contained in the question.
# Information Given
# Initial and final height of the skier:
h_i := 20*m
h_f := 3*m
# Initial speed of the skier:
v_i := 5*mph
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# There are two distinct principles in mechanics:  forces and conservation of energy.  Since there is no mention of forces or acceleration, let's think about energy.  What does it mean for energy to be conserved?
# Identify Principles
E_initial == E_final
# What are the specific types of energy involved in our problem?  The skier has energy due to her height (gravitational potential energy U ) and her speed (kinetic energy KE ).  So our conservation of energy equation becomes:
(U_i + KE_i) == (U_f + KE_f)
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# Now you will need to put in the way that U depends on height and KE depends on speed. Do you remember the expressions?  Use the icon to the left for review if necessary.
# Propose Methods
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# Write the energy equation again, but use the explicit forms for the potential and kinetic energies.  Use literal subscripts to distinguish between initial and final states.
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m*g*h_i + 1/2*m*v_i^2 == m*g*h_f + 1/2*m*v_f^2
# Work and Energy
# Worried about the mass?
#
# Remember, the symbolic equal sign lets you use any variables in an equation, so just use m for mass.
# Once you have the full equation for the conservation of energy, you can solve for the skier's speed v_f as she leaves the jump.
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# Move or copy the equation into your worksheet window.  Use the Solve command to find the skier's speed when she jumps.
# Propose Methods
m*g*h_i + 1/2*m*v_i^2 == m*g*h_f + 1/2*m*v_f^2
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# Since the speed is squared in the formula for KE, you should get two roots for the speed.  Notice that the mass cancels out!
#
# Choose the positive root and use the definition symbol to reassign that expression to the speed of the skier.  Note:  If any variables become highlighted, you will need to make them consistent with our original definitions from above.
# Why does everything move down?
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[-sqrt(2*g*h_i + v_i^2 - 2*g*h_f); sqrt(2*g*h_i + v_i^2 - 2*g*h_f)]
# Derivation Format
v_f := sqrt(2*g*h_i + v_i^2 - 2*g*h_f)
v_f = 41.1513 mph
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# Display your answer and decide whether the answer is reasonable.
#
# The speed is positive (moving to the right) and seems reasonable considering that the drop h_i = 65.6168 ft is six stories up!
# Analyze Results
# In many problems, you will want to jot down equations, edit them and solve for certain variables before you are ready to define an answer using the definition symbol.  The comparison symbolic equal sign  allows you to write down any equation(s) you think of during the initial stages of solving a problem. The freedom to sketch out your ideas may help you think more creatively, which is needed when you are starting a tough problem.
#
# The next problem emphasizes the use of Mathcad's solve block. If you want more practice with the skills we used for the last two exercises, there is another exercise in Section 4.4: Supplemental Exercises . Use the hyperlink if you want additional practice now, otherwise there will be another hyperlink at the end of this section.
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# Question 3
#
# Two blocks, initially at rest, are connected over a frictionless pulley by a rope (see figure for details).  What is the resulting acceleration and the tension on the rope?
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# Mass of block one:
m1 := 10 kg
# Mass of block two:
m2 := 35 kg
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# Since we need to find two variables, there must be two equations. Here is another helpful hint for approaching these complicated problems:
#
# Before you worry about the details, just look at the situation and describe what you think will happen (roughly).
# Why two equations
# For example: Which way will the masses go?
#
# Well, the heavier mass will go down, pulling the lighter mass upwards.
#
# By testing your intuition before the problem starts, you know what to expect for the answer.  Also, you may stumble across some important physics without trying hard.
# In the current problem, we have decided on a direction to choose for the acceleration of each mass.  The vector sum of the forces on m1 results in an upward acceleration and the sum of forces on m2 results in a downward acceleration.
# In general:
sum(Forces, sum) == M*A
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T - m1*g == m1*a
T - m2*g == m2*(-a)
# (Notice that we took up to be positive and down to be negative).
#
# Remember, try to test your intuition before you bother with the detailed physics.  Now that we have the relevant equations, you need to guess the answers for the solve block.
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# Define guesses for the tension T and acceleration a.  The units are different for each quantity!  Use the icon for help.
#
# Note: Since the directions have been taken into account through the equations, both quantities should be positive.
# Guesses:
T := 1*N
# Units
a := 1*g
# Now you have to write the solve block.  Remember, Given a set of equations, Find( ) the unknown variables.  You can copy the equations from above.
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# Write a solve block for the tension T and acceleration a in the space below.
solve block
    # constraints
    T - m1*g == m1*a
    T - m2*g == m2*(-a)
    # solver
    sol := Find(T, a) = [152.548 kg*m/s^2; 5.44814 m/s^2]
end solve block
T := sol[1] = 152.548 N
a := sol[2] = 0.555556 g
# Solve Blocks
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# The solve block is a powerful tool for solving systems of equations. We have looked at systems of two equations, but Mathcad's solve block can solve up to 50 simultaneous equations! The solve block can also be used to get approximate solutions when an exact answer cannot be found.
# FAQs about Solve Blocks
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