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# PROBLEM-SOLVING TUTORIAL
#
# 4.4 Solving Equations: Supplemental Exercises
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# Introduction
#
# In this supplemental section there is an exercise to provide more practice with the skills you learned about in the Tutorial and the first half of the exercises in this section.
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# Question 1
#
# A student, standing on top a building that is 15 m high, throws a ball with an initial speed of 5 mph at an angle of 35 degrees (with respect to horizontal).
#
# How far horizontally away from the building does the ball land?
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# We have assigned variables to the information contained in the question.
# Height of building:
h := 15 m
# Information Given
# Initial speed of ball:
v_o := 5 mph
# Direction of throw:
θ := 35 deg
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# Remember, motion in two dimensions can be broken down into motion in the vertical (y) and horizontal (x) directions.  The speed in the y direction determines how long the ball stays in the air and the speed in the x direction determines how far the ball travels in that time.
# Propose methods
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# Define v_xo and v_yo to be the components of the initial velocity. Hint:  You may want to define one variable, then make a copy and edit it to get the second definition.
v_xo := v_o*cos(θ)
v_yo := v_o*sin(θ)
# Components of vectors
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# We have already displayed the values at right, so you can check whether your definitions seem to be correct (which component should be larger?)
v_xo = 4.09576 mph
v_yo = 2.86788 mph
# Analyze results
# The rest of the problem is to find the time the ball is in the air and use that time to compute the distance traveled in the x direction.
#
# Since you may not recall the expression for the height y of a particle in a gravitational field as a function of time t, we have written it below with the symbolic equals sign.
y == y_o + v_yo*t - 1/2*g*t^2
# How long does the ball take to reach the ground ?
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# Move the equation into your worksheet window and solve for the time t using the Symbolics⇒ Solve command on the Math tab.
#
# Since time is squared, you will have to choose between the two roots. Click on the outermost operation in the expression you want to highlight, then copy.
# Solve Problem
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y == y_o + v_yo*t - 1/2*g*t^2
# Why does everything move down?
[1/g*(v_yo + sqrt(v_yo^2 - 2*g*y + 2*g*y_o)); 1/g*(v_yo - sqrt(v_yo^2 - 2*g*y + 2*g*y_o))]
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y := 0 m
y_o := h
# Derivation format
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t := 1/g*(v_yo + sqrt(v_yo^2 - 2*g*y + 2*g*y_o))
# Values for y_o and y ?
t = 1.88465 s
# Redefine the result to be time t .
#
# Note: You will see an error because the variables y and y_o have not been defined. The initial height y_ois the height of the building h . From the original equation, you can see that y is the final height (after the time t has elapsed).
#
# Define the initial and final heights (y_o and y respectively), then locate them above the definition for the time. Use the icon in the margin for help.
#
# Display the value for the time t and judge whether it seems reasonable. If the time is negative, then you choose the wrong root (you can edit the definition).
#
# During the time t the ball is in the air, it is traveling in the x direction at the velocity v_xo.
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# Define an equation for the distance d traveled in the x direction during the time t.
#
# Display your answer and decide whether it seems reasonable.
d := v_xo*t
d = 11.3213 ft
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# In many problems, you will want to jot down equations, edit them and solve for certain variables before you are ready to calculate an answer using the definition symbol.  The symbolic equals sign = lets you write down anything you want, so you can rough out a problem before you need to think about the calculation.
# Save your changes!
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