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# PROBLEM-SOLVING TUTORIAL
#
# 4.5 Solving Equations: Supplemental Problems
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# Introduction
#
# In this supplemental section there is another problem that uses the symbolic equal sign and commands that you learned about in the Tutorial and the Exercises.
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# Question
#
# A block with some mass M sits on a board.  If the coefficient of static friction μ_s is 0.36, then at what angle θ does the block just begin to slide?
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# Hints
#
# This problem is not easy.  Remember, you should not expect to write down θ= ? on the first step.  Mathcad can solve for that variable when needed. In fact, forget about getting the equations at first and describe for yourself what will happen in everyday terms, then try to explain that in physical terms.  Ask yourself, “why does the block stay still and why does it begin to move?”
#
# As you start to identify the various forces involved in the problem, you can jot them down with the symbolic equals sign =.  Then you can use the Symbolics ⇒ Solve command to find the solution.
# Problem Space
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# Question
#
# A block with some mass M sits on a board.  If the coefficient of static friction μ_s is 0.36, then at what angle θ does the block just begin to slide?
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# Solution
#
# We are given in the problem that
# Coefficient of static friction:
μ_s := 0.36
# The two forces acting on the block and the normal force are:
# Component of weight along board:
F_g == M*g*sin(θ)
# Friction force:
F_f == μ_s*F_N
# Normal force:
F_N == M*g*cos(θ)
# Just at the point where the block begins to move on the board, we have:
F_g == F_f
# Using cut and paste we find
M*g*sin(θ) == μ_s*F_N
M*g*sin(θ) == μ_s*M*g*cos(θ)
# Now using the symbolic Variable ⇒ Solve command for the angle θ, we find the angle just at the point the block begins to move is:
M*g*sin(θ) == μ_s*M*g*cos(θ)
# has solution(s)
atan(μ_s)
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# Therefore
θ := atan(μ_s)
θ = 19.7989 deg
# State Conclusions
# So at 19.8 degrees the block will start to slide.
#
# Now you are ready to move on to Chapter 5: Graphs, where you will learn how graphs can help you understand more about each problem you encounter.
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