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# PROBLEM-SOLVING TUTORIAL
#
# 5.1 Graphing: Tutorial
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# Introduction
#
# Graphing is one of the most powerful tools in a student's tool kit. You can use graphs to visualize solutions, test ideas, and even solve complicated problems.
#
# Many people comprehend visual information much more readily than written text. One of the best ways to understand a problem is to graph the equation involved against a variable of interest. With Mathcad, you can read values right off the graph and solve problem at a glance, literally!
#
# In this Tutorial, you will learn how to graph a function in the context of an example.
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# Question 1
#
# A penguin attempts to fly off the edge of a 15 ft high iceberg by jumping with an initial vertical velocity v_y of 4 mph upward. Since it is a flightless waterfowl, the penguin's subsequent fall into the ocean is governed by the equation for the height of a freely falling body affected by gravity. Don't worry if the equation looks messy, it's just an example and doesn't bother the penguins.
# - g stands for gravity, which is defined by Mathcad so you don't even need to look it up.
# - t stands for time
# - v stands for velocity or speed
y_o := 15 ft  # height of the iceberg
v_y := 4 mph  # initial vertical velocity
y == y_0 + v_y*t - 1/2*g*t^2
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# (Disclaimer: No animals were harmed in this example. Any dangerous stunts were simulated. Please do not try this at home.)
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# Paper vs. Mathcad
#
# Let's make a graph of the penguin's height y versus time t.
#
# We will need to find the height at various times; then, we can plot points for each pair of values. On paper, you would have to calculate each pair of values individually:
# At t := 0*sec,  y := y_o + v_y*t - 1/2*g*t^2 gives a value y = 15 ft.
# At t := 0.5*sec,  y := y_o + v_y*t - 1/2*g*t^2 gives a value y = 13.9116 ft.
# At t := 1*sec,  y := y_o + v_y*t - 1/2*g*t^2 gives a value y = 4.77964 ft
# On paper this is a lot of work!
#
# Fortunately, there is a much simpler way to do these calculations using Mathcad. Mathcad has a method for specifying multiple times (t := 1 s, 2 s .. 10 s). Then we can define a function y(t) that will calculate the corresponding height y for each time t. Once you have the times and the function, graphing is very easy.
#
# Note: With simple expressions you do not need to define range variables to graph an expression. You can just type in the expression, and press the graph button.
#
# Range Variables
#
# The whole process starts by defining the range of times over which you want to plot.
#
# We would like to specify a range of times t from 0 to 10 seconds. The way to get a range of numbers is with the comma ( , ) or with two periods if using the default +1 increment.
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# In the space to the right type the following:
#
# t : 0  s , 1 s → → 10 * sec
t := 0 s, 1 s .. 10 s
# Now, when we display what t equals (by typing t=), we get a whole list of times.
t = [0; 1; 2; 3; 4; 5; 6; 7; 8; 9; 10] s
# Smaller Divisions
#
# We choose for the first example a step of 1 (integer steps) . You can define smaller or larger steps by following the first number with the second number that you want in the sequence. The rest of the sequence is incremented by the step size between your first two entries.
# For example:
t := 1 s, 1.5 s .. 3 s
# which is written like
#
# t : 1 * s , 1.5 * s → →  3 * s
t = [1; 1.5; 2; 2.5; 3] s
# By specifying the steps, you can divide any range into literally thousands of numbers. The number of steps in the range will translate into the number of points on the graph. Generally, smaller increments result in more points more closely spaced, which produces a smoother graph.
# The Penguin
#
# In our example, the penguin will hit the water in less than 1.3 seconds, so a stepsize of one will only give two relevant times ( 0,1s ). For a more accurate graph, we will use 0.1 second steps to get plenty of points to  plot.
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# In the space at right, define a range of times from 0 to 1.3 seconds in 0.1 second steps.
# t : 0*s , 0.1*s → →  1.3 * sec
t := 0 s, 0.1 s .. 1.3 s
# Note: You have to put units on every number when defining a range . . . even zero.
#
# Now that you have learned how to specify a range of times, we need to tell Mathcad the expression that we are interested in graphing.
# Specifying a Function to Graph
#
# In order to use the times that we just defined, the expression that we graph must be defined as a function y(t)and NOT just a new variable y .
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y(t) := y_o + v_y*t - 1/2*g*t^2  # instead of
# The variable definition y will not work because Mathcad expects a variable (like y) to be assigned only one number, not the multiple heights that the range of times will create.
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# You have seen built-in functions in Mathcad before ( for example tan(θ) ). A function takes an argument and transforms it in some way mathematically to give you back an answer. By defining a new function y(t), you are teaching Mathcad a new mathematical routine to perform so this is called user-defined functions.
# User-defined functions
# Our function y(t) should be defined to compute the height of an object (or penguin) in free fall at any time t . Here is the definition below:
y(t) := y_o + v_y*t - 1/2*g*t^2
# Since we have already defined t as a range of times, Mathcad will use the function's definition to compute the corresponding height for each and every time in the range. We now have two sets of numbers: t and y(t). We are ready to plot a graph!
#
# Note: The variable name you use as an argument when we define a function is just an example that shows Mathcad what to do with any value, variable, or list we put in later as an argument.
#
# In this case, or example, we defined the function y(t) by using the variable t. Even though we are interested in evaluating y(t) at the times t, we could have defined the same function y with any variable, like the time variable as shown below:
y(time) := y_o + v_y*time - 1/2*g*time^2
# Likewise, you do not have to redefine y(time) to graph y(t), y(1.3*sec) y(S), etc. The point is that the variable name used when a function is defined (for example, t or time ) does not have to be the same as any argument you plan on using later. The variable name in the function's definition is just a “dummy variable” that shows Mathcad what to do with anything that we put in later as an argument.
#
# Having made that subject clear (or more confusing!), we are ready to graph our function.
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# An Empty Graph
#
# Below is a picture of an empty graph. You get an empty graph by choosing Plots Tab ⇒  Insert Plot ⇒ XY Plot
# Creating a Graph
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# There is 1 placeholder (grey squares) along each axis. To complete a graph, you only have to fill in the placeholders on each axis.
#
# The range variable (t) goes in the placeholder on the horizontal axis, while the function (y(t)) goes in the placeholder on the vertical axis .
#
# Let's put everything together and take a look at the penguin's plummet into the ocean.
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# Graphing
# [plot: y(t) vs t]
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# Place the crosshair on some empty space. Choose Insert Plot ⇒ X-Y Plot from the Plots tab.
# Creating a Graph
# Graphs appear to the lower right of the crosshair. Try moving from one placeholder to the next with the ← and → arrows or by clicking on the placeholders.
#
# Put the time variable t in the placeholder of the horizontal axis. Move to the vertical axis and type the function name y(t) in the placeholder.
#
# Press [Enter] to graph the function. Voila!
# There are still a few more things to learn that will make this graph complete.
#
# Remember, the penguin jumped off a 15 ft iceberg. If you look again, the graph shows the initial height to be around 5 !
#
# The reason is because Mathcad automatically graphs using SI units and 15*ft = 4.572 m. As we have seen before, Mathcad is still “thinking” in SI units. Unlike before, there are no placeholders in which to insert new units.
# [plot: y(t) vs t]
# Changing Units in a Graph
#
# To display a graph in different units, we click inside the parenthese specifying the units and replace with desired units.
# [plot: y(t) (ft) vs t]
# Having the values in the correct units on the axes helps when you are analyzing your work and drawing conclusions based on the graph. Also, graphing without units is necessary when you graph multiple functions with different units on the same graph. Let's try that now.
#
# Graphing Multiple Functions
#
# Along with the height, let's include a graph of the penguin's velocity during its unsuccessful venture. We will use the same range of times t that we did for the height calculations. We have defined a new function v(t) to compute the velocity: v(t) := v_y - g*t
#
# Along with the height, let's include a graph of the penguin's velocity during its unsuccessful venture. We will use the same range of times t that we did for the height calculations.
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# To graph another function/trace, click anywhere on the first function/trace and Shift + Enter. In the empty placeholder that appears in the paranthesis, put the function for the velocity v(t) and specify units of mph
# [plot: y(t) (ft), v(t) (mph) vs t]
# Notice that the velocity starts a little above zero (v_y = 4 mph) and becomes negative (indicating a downward direction) in a straight line (the function v(t) is said to be “linear” in t). What would the acceleration look like if we plotted that?
#
# In addition to putting several functions on the same graph, you can also use different arguments for each function (graphing y(t) and v(x) for example). We will use this feature in Chapter 7 on data analysis.
# Other Types of Graphs
#
# There are a lot of neat things that can be done with graphing in Mathcad. We will try to point out the more practical features.
#
# Some examples of different graphs you can make with Mathcad are pictured below:
V1 := [
    2.9985*10^8;
    2.9974*10^8;
    2.9990*10^8;
    3.0007*10^8;
    2.9993*10^8;
    2.9984*10^8;
    2.9985*10^8;
    2.9984*10^8;
    2.9984*10^8;
    2.9984*10^8
] m/s
V2 := [
    1.07957*10^9;
    1.07968*10^9;
    1.07946*10^9;
    1.07953*10^9;
    1.07942*10^9;
    1.07946*10^9;
    1.07982*10^9;
    1.07993*10^9;
    1.07993*10^9;
    1.07957*10^9
] km/hr
j := 0 .. 5
bins[j] := min(V1) + j*0.0005*10^8*m/s
clear(x, y)
H1 := histogram(bins, V1)
H2 := histogram(bins, V2)
# [polar plot: θ, cos(θ) + 1]
# [3D plot: x^3 + y^2]
# [plot: H1[:, 1], -H2[:, 1] vs H1[:, 0] (m/s), H2[:, 0] (m/s)]
# You now know that graphing functions with Mathcad is easy. The exercises in the next section provide more examples of how graphs can be incorporated in solving problems and you will learn how to format your graphs as well.
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