# Worksheet setting: ORIGIN = 1
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# PROBLEM-SOLVING TUTORIAL
#
# 7.2 Advanced Problem Solving: Exercises
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# Introduction
#
# The exercise in this section provides additional practice with all the problem solving techniques that were in the Tutorial:
#
# i.  What if ? analysis.
# ii.  Graphs of solutions and families of curves.
# iii. Limiting cases.
#
# The exercise that follows involves more difficult physics than we have covered in previous sections, and you will notice that the depth of our analysis increases as well. Remember, the point of these new skills is to get more out of each problem.
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# Question 1
#
# A football is throw with an initial velocity of 14 m/sec at an angle of 30 degrees (with respect to the ground).
#
# a) Find the distance the football travels before hitting the ground.
#
# b) What angle gives the maximum distance?
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# Defining Variables
#
# In order to avoid confusion during our discussion, we have assigned variables to the information given in the question.
# Initial velocity of the football:
v_o := 14*m/s
# Angle with respect to ground:
θ := 30*deg
# Solution
#
# Since the football was thrown at an angle, the initial velocity v_o will have a vertical and a horizontal component (v_yo and v_xo respectively). Decomposing a vector into its components involves using the sin(θ) and cos(θ) functions. As in the Tutorial, you can decide what function to use with each component by considering the limiting cases for the angle. We have redisplayed the definition of the angle below:
# Angle with respect to ground:
θ := 30*deg
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v_yo := v_o*sin(θ)
# Define the vertical and horizontal components of the initial velocity.
#
# Double-check your definitions by making sure they have the correct behavior when the football is thrown horizontally (θ = 0 deg).
#
# The values of v_yo and v_xo will be displayed at right when you define the components of the initial velocity.
v_xo := v_o*cos(θ)
v_yo = 7 m/s
v_xo = 12.1244 m/s
# We redefine the angle (θ := 30*deg), just in case you did not above.
#
# The position of the football is a vector equation as well:
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# Decomposing this equation into components gives two equations that describe the vertical and horizontal position.
# Vertical position (height):
y == v_yo*t - 1/2*g*t^2
# Horizontal position (distance):
x == v_xo*t
# Instead of deriving an exact solution for the distance, let's graph the trajectory of the football and read the answer from the graph. We will also be able to find the angle that gives the maximum distance just by experimenting with the graph.
#
# In the past, we have always graphed the height as a function of time. For the actual trajectory, you will have to graph the height against the horizontal distance, but both are ultimately functions of time t .
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# Copy and edit the two symbolic equations for the position of the football so that they are both defined as functions of time t .
#
# Note: If any variables are shown to be undefined, then make their names consistent with your definitions above.
#
# Define a range of times t . You can always come back and adjust the size and steps of the range.
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y(t) := v_yo*t - 1/2*g*t^2
x(t) := v_xo*t
# X-Y Axes section
t := 0*s, 0.001*s .. 1.5*s
# Graph the height y(t) against the position x(t) in the open space. Change the axes style from “boxed” to “crossed” in the X-Y Axes section of the Format dialog box. Notice that the "crossed" axes style shows where the ground is without a marker.
# [plot: y(t) vs x(t)]
# Trajectory of the Football
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# Use the X-Y Trace dialog box to read off the distance where the football hits the ground.
#
# Hint: You may need to decrease the step size (which increases the number of points plotted) if you want a precise answer.
# Your answer:
range := 17.3*m
# Trace dialog box
range = 56.7585 ft
range = 18.9195 yd
# With the first part worked out in Mathcad, you could easily see what happens to the trajectory when you change the angle at which the football was thrown. We will take that idea one step further by graphing a family of trajectories and comparing them.
#
# Family of Curves
#
# To compare trajectories with different angles θ, you will have to change the functions to include both time t and angle θ as arguments. There is a slight complication in making this change, so will use the horizontal position as an example for you:
# The original function:
x(t) := v_xo*t
# Including the angle θ as an argument
x(t, θ) := v_xo*t
# The way that the distance x(t) depends on the angle θ is hidden in the definition of the initial horizontal velocity v_xo . When defining a function, Mathcad needs the dependence to be explicitly shown in the formula; as follows:
# Substituting the definition of v_xo
x(t, θ) := v_o*cos(θ)*t
# If you recall, we ran into the same problem in the Tutorial.  Mathcad needs to see the variable in the definition of a function. Now it's your turn with the vertical position.
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# Copy and edit your original function for the vertical position to include the angle θ as an argument.
#
# Also replace v_yo with its definition in terms of θ.
y(t, θ) := v_o*sin(θ)*t - 1/2*g*t^2
# By choosing several different angles (θ_1,θ_2...), we get have several different trajectories.
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θ_1 := 85*deg
# Define three angles θ_1,θ_2,θ_3 whose trajectories you are interested in seeing. Try to imagine the trajectory you would expect for each value (imagine the limiting cases).
θ_2 := 45*deg
θ_3 := 10*deg
# We are ready to graph... almost. You have graphed multiple functions before, but always against a single range variable on the horizontal axis. We now want to plot several functions for height against several functions for distance. Here is how that is done:
#
# You can list the functions for distances along the horizontal axis by separating each with a comma (just like putting several functions along the vertical axis).
#
# Note: You have to make sure to pair together each set of functions in the proper order. The first item listed along the vertical axis is plotted against the first item listed along the horizontal axis. There is a picture below that shows what is plotted against what.
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# Now you are ready to make your graph.
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# Graph three trajectories in the space below, using the angles θ_1,θ_2,θ_3 .
#
# Note: Copy the range of times and three angle variables directly above your graph so you can change them and watch the results. Remember, copy and edit as much as possible to save time (e.g. copy your old graph).
t := 0*s, 0.01*s .. 2*v_o/g
θ_1 := 85*deg
θ_2 := 45*deg
θ_3 := 20*deg
# [plot: y(t, θ_1), y(t, θ_2), y(t, θ_3) vs x(t, θ_1), x(t, θ_2), x(t, θ_3)]
# We are not interested in the trajectories after the football hits the ground. You can edit the axis limits to confine the y-axis above zero and limit the x-axis as well, "zooming in" on the part of the graph that is important.
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# Click on the lower limit on the y-axis, hit the backspace key, and change the limit to zero. Modify the upper limit on the x-axis so that the graph stops after the furthest distance.
#
# Note: You only need to backspace once to delete the default numbers.
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# By changing the definitions of your angle variables, you will be able to find the angle that gives the maximum range for the football. Why doesn't the football go further for angles that are greater or lesser than this angle? (test out the limiting cases in this situation).
# Save your changes!
