# Worksheet setting: ORIGIN = 1
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# PROBLEM-SOLVING TUTORIAL
#
# 7.3 Advanced Problem Solving: Problems
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# Introduction
#
# This section provides an opportunity to apply the new problem-solving skills you have learned. Specifically, you will study limiting cases (to test whether your solutions are reasonable), graph part of a solution, and plot a family of curves. All of these will enhance your understanding of the concepts involved.
#
# The problem in this section is slightly different than other problems you have seen in this tutorial. The first two parts have been done for you, but you have to judge whether the answers are reasonable.
#
# Background
#
# You are in charge of designing the infamous “6th turn” of a new luge track. Preliminary work (shown below) has been done by engineers working under you. Your job is to check their work and make sure the answer seems reasonable.
#
# Velocity upon entering the 6th turn: The start of the track is 20 meters above the 6th turn. What is the maximum velocity that a sled could have upon entering the turn?
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# Preliminary Work
#
# The following information is known:
# Height of track:
h := 20*m
# The maximum velocity that a sled could have going into the turn can be found using the principle of energy conservation. Neglecting friction makes the problem easier and gives a upper limit on velocities that a sled could have entering the 6th turn.
# Conservation of energy states,
E_final == E_initial
# In specific, the initial energy is gravitational potential energy and the final energy is kinetic energy,
1/2*m*v^2 == m*g*h
# Using Symbolics ⇒ Solve on the Math tab and solving for the velocity, we find two roots:
[sqrt(2)*sqrt(g)*sqrt(h); -sqrt(2)*sqrt(g)*sqrt(h)]
# Selecting the positive root and simplifying the expression, we find that
v := sqrt(2*g*h)
v = 19.8057 m/s
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# Question 1
#
# Does the answer seem reasonable? Explain your reasoning below. Feel free to convert the units on the initial height and the maximum velocity.
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# Problem Space
#
# For a track with an initial height of
h = 20 m
# or
h = 65.6168 ft
# the final velocity is
v := sqrt(2*g*h)
# or
v = 44.3041 mph
# This seems reasonable; it is about as fast as a car on a highway.
# More Background
#
# Another team of engineers has been working on the proper tilt for the 6th turn that will accommodate the speed calculated above without relying on friction. The team is divided over the correct answer, so your job is to check their work and decide whether their answer is correct.
#
# The 6th turn has a radius of curvature of 30 m, which means that the turn can be imagined as part of a circle with that radius.
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# Recall that a centripetal force is required to keep objects (and sleds) in circular motion. Instead of relying on friction, the turn can be tilted at an angle (a “banked” turn) to make sure the sleds make it through the turn.
#
# Banking Angle: What banking angle must the 6th turn be to accommodate the speed v calculated above without relying on friction?
# Preliminary Work
#
# The following information is known:
# Radius of curvature:
r := 30*m
# Referring to the free-body diagram at right, we can see that the upward and inward components of the normal force N are:
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# Upward:
N*sin(θ) == mass*g
# Inward:
N*cos(θ) == mass*v^2/r
# Note: The team of engineers are unsure whether the two equations above are correct (they may have used the wrong trigonometric functions).
#
# Given the two equations above, the solution proceeds by eliminating the normal force N and then solving for the banking angle θ.
#
# Solving these two equations for the Normal force N, we find that:
# Upward:
N == mass*g/sin(θ)
# Inward:
N == mass*v^2/(r*cos(θ))
# Equating these two expressions for the normal force (eliminating N),
mass*g/sin(θ) == mass*v^2/(r*cos(θ))
# and then solving for the banking angle θ, we find that:
θ := atan(g*r/v^2)
θ = 36.8699 deg
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# Question 2
#
# By considering the limiting cases of the angle for the two components of the normal force that the engineers are questioning (see the Note above), decide whether their answer is correct. If the equations do not have the behavior you would expect, then rework their solution in the Preliminary Work section above using the correct equations and find the corrected formula for the banking angle (following their method). Explain your reasoning.
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# Problem Space
#
# We are given the following information to verify:
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# Referring to the free-body diagram at right, we can see that the upward and inward components of the normal force N are:
# Upward:
N*sin(θ) == mass*g
# Inward:
N*cos(θ) == mass*v^2/r
# Consider first the inward component that is a response to the circular motion of the cart. The component should vanish as the velocity goes to zero and increase with increasing velocity; the proposed formula agrees with these limits. The fact that the velocity enters to the second power is consistent with dimensional analysis. The upward component of the normal force is just a response to the weight of the object.
#
# The upward component of the normal force should approach the weight, mass*g, as the track becomes horizontal (the angle θ goes to zero). Likewise, the inward component must go to zero as the track becomes horizontal. Thus, we switch the sin(θ) and cos(θ) functions in each equation. The correct formulas are:
# Upward:
N*cos(θ) == mass*g
# Inward:
N*sin(θ) == mass*v^2/r
# We now correct the derivation for the formula for the banking angle, following the methods used above. Given the two equations above, the solution proceeds by eliminating the normal force N and then solving for the banking angle θ.
# Solving these two equations for the Normal force N, we find that:
# Upward:
N == mass*g/cos(θ)
# Inward:
N == mass*v^2/(r*sin(θ))
# Equating these two expressions for the normal force (eliminating N),
mass*g/cos(θ) == mass*v^2/(r*sin(θ))
# and then solving for the banking angle θ, we find that:
θ := atan(v^2/(g*r))
θ = 53.1301 deg
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# Question 3
#
# You are now faced with the task of fully understanding the implications of the preliminary work that has been done.
#
# a) Make a graph of the angle for the banked turn as a function of velocity.
#
# b) Discuss the following limiting cases:
#
# i. What happens when the turn is not banked?
#
# ii. What happens as the radius of curvature gets very small?
#
# Remember, you are still learning so take your time and refer back to the Tutorial or Exercises if necessary. The links below are provided for a review of graphing.
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# Problem Space
#
# a)We define a function for the banking angle in terms of velocity and a range of speeds. A plot follows
θ(v) := atan(v^2/(g*r))
v := 0*mph, 1*mph .. 80*mph
# [plot: θ(v) (deg) vs v (mph)]
# Banking Angle versus Speed
# b)  i.  What happens when the turn is not banked?
#
# In this case, θ = 0°. As the banking angle decreases, the centripetal force decreases. If the velocity does not decrease, the sled keeps going in a straight line (up and off the curve).
#
# ii. What happens as the radius of curvature gets very small?
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# Increasing the radius of curvature means that the turn is “tightened” and a larger centripetal force is required to keep the sled in the turn. Therefore, the angle of the embankment must increase as well. There is a singularity when the radius goes to zero, but that is not a physical curve anyway.
# Have you saved  changes?
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# Question 4
#
# a) To fully understand the tradeoffs in changing the radius of the turn, graph the banking angle as a function of increasing turn radius and then plot a family of curves at three different velocities.
#
# b) Discuss what must happen to the design as the velocity increases.
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# Problem Space
#
# We define a function for the banking angle in terms of velocity and radius of curvature. We also define a range of radii and three representative speeds. A plot follows.
# Banking angle function:
θ(v, r) := atan(v^2/(g*r))
# Range of radii:
r := 1 m, 2 m .. 300 m
# Velocities:
v_1 := 10 mph
v_2 := 60 mph
v_3 := 150 mph
# [plot: θ(v_1, r) (deg), θ(v_2, r) (deg), θ(v_3, r) (deg) vs r (ft)]
# Banking Angle vs. Radius of the Curve
# --- 10 mph
# --- 60 mph
# --- 100 mph
# For a given curvature (fixed r), the banking angle increases with increasing velocity. For example, with a 100 ft radius of curvature (see marker on graph), the required banking angle is 4° for 10 mph, 67° for 60 mph, and 86° for 100 mph.
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