# Worksheet setting: ORIGIN = 1
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# PROBLEM-SOLVING TUTORIAL
#
# 7.4 Advanced Problem Solving: Supplemental Exercise
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# Introduction
#
# In this supplemental section there is an exercise to provide more practice with the skills you learned about in the Tutorial and the Exercise sections of Chapter 7. The exercise that follows is more difficult, but we can use the same methods as before to investigate the problem completely.
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# Question
#
# A 5 kg block is attached by a rope to a 2 kg ball that hangs off the edge of the table. The rope is kept from rubbing against the table edge by a frictionless pulley. When the block is sliding, the coefficient of kinetic friction μ_k between the block and the table is 0.30.
#
# Assuming that the block is in motion, find the acceleration of the objects.
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# Note: The rope has negligible weight and does not stretch or run slack, so that its only function is to connect the two objects.
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# Defining Variables
#
# Again, we have assigned variables to the information given in the question.
# Mass of the block (on the table):
m_blk := 5*kg
# Mass of the ball (hanging):
m_ball := 2*kg
# Coefficient of kinetic friction:
μ_k := .3
# Solution
#
# Before you write down any equations, let's think about what is happening. The ball wants to free fall, but the friction acting on the block is slowing everything down. You can test this reasoning by considering some limiting cases:
#
# What if the ball was not connected to the block?
# What if the friction between the table and the block increased dramatically?
#
# There seems to be a “tug-of-war” between the force of gravity on the ball and the frictional force on the block. Looking at limiting cases is a good way to test your understanding of the problem.
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# In fact, we have already identified the two important forces in the problem:
#
# The force of gravity is pulling down on the ball and a frictional force is pulling back on the block.
# Let's write down the specific equations for each of these forces. Use the icon in the margin for a review of the physics.
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# Write down the two equations (using the symbolic equal sign):
#
# 1. The force of gravity F_g acting on the ball.
#
# 2. The force of friction F_f  acting on the block.
F_g == m_ball*g
F_f == μ_k*m_blk*g
# Our “tug-of-war” is caused by the force of gravity F_g and the frictional force F_g pulling in opposite directions. The resulting total force is responsible for the acceleration of both the block and the ball (remember they are connected).
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# Edit the general form of Newton's force law to reflect our situation.
#
# Hint: You must decide on a sign convention (±) for the upward and downward directions. Use the icon in the margin for help.
#
# Once you are finished, use the Symbolics ⇒ Solve command on the Math tab to solve for the acceleration a. Express the answer in terms of the acceleration due to gravity g.
F_total == M_total*a
F_total == (m_ball + m_blk)*a
μ_k*m_blk*g - m_ball*g == (m_ball + m_blk)*a
a := -(μ_k*m_blk*g - m_ball*g)/(-m_ball - m_blk)
a = -0.0714286 g
# You should always double-check your answers. Considering limiting cases can also help you judge whether your answer seems reasonable. For example, we decided earlier that if the ball was not tied to the block, it would freely fall (a =±1*g). The sign of your answer (±) will depend on the convention you chose above.
#
# Since the block “slows the ball down,” we would expect the magnitude of your answer to always be less than the acceleration due to gravity g . If the absolute value of your answer is greater than 1*g, then you made a mistake (you probably did not take the difference of the two forces).
# Limiting Cases
#
# To test our theory further, we can simulate cutting the rope by changing the mass of the block to zero. Without the block, we would expect the acceleration to be that of the ball in free fall (±g). We have repeated the definition for the mass of the block below:
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# Mass of the block (on the table):
m_blk := 0*kg
a := -(μ_k*m_blk*g - m_ball*g)/(-m_ball - m_blk)
a = -1 g
# Then change the definition of the block's mass m_blk so that it has zero mass.
# Again, your answer should become the acceleration due to gravity (either g or -g ) when the block is gone. When you work out your own problems, always double-check that your answer behaves correctly with these type of “limiting cases.”
#
# Graphing the Solution
#
# We have not explored other cases that are equally interesting. For example, does the acceleration decrease as the frictional force increases? What happens as we vary the mass of the ball?
#
# To investigate the last question, let's make a graph of our solution as a function of the mass of the ball m_ball . As we discussed in the Tutorial, you will need to change the answer into a function and define a range of masses for the ball.
# Redefining the mass of the block (from zero):
m_blk := 5*kg
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# Copy the equation for the acceleration into your Worksheet window. Edit the acceleration to make it a function of the mass of the ball m_ball
a(m_ball) := -(μ_k*m_blk*g - m_ball*g)/(-m_ball - m_blk)
# Then redefine m_ball as a range variable over a sensible spread of masses. Note: Remember the units!
m_ball := 0*kg, 0.1*kg .. 40*kg
# Graph the acceleration against the mass of the ball. Include a marker at the acceleration due to gravity ±g (again, the sign ± will depend on the convention you chose above).
# [plot: a(m_ball) vs m_ball]
# Acceleration of the Block and Ball
# Does the graph make sense? Again, you can check the graph by looking for the correct behavior in limiting cases. As the mass of the hanging ball becomes much larger than the block's mass, the acceleration should approach that due to gravity (the free fall behavior of the ball is said to “dominate” the function). The marker you put at the acceleration due to gravity is the asymptotic limit of the function, meaning that the function approaches this value in a limiting case.
#
# What should happen as the mass of the ball approaches zero?
#
# The total acceleration decreases as the mass of the ball decreases. When the weight of the ball is not enough to drag the block across the table, the acceleration goes to zero.
#
# Below that point, our graph seems to say that the block is accelerating the ball back up onto the table, which does not make physical sense. The frictional force only opposes motion, it does not cause motion. The reason is that our equation assumes that the block is in motion. When the block should not be moving our equation no longer is valid.
#
# Having now completely investigated two difficult exercises, you should be ready to do the problems (actually it is only one problem) in the next section on your own.
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