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# PROBLEM-SOLVING TUTORIAL
#
# 6.1 Data Analysis: Tutorial
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# Introduction
#
# In this chapter we cover some tools that are used in all areas of science: the tools of data analysis. Since you may not be familiar with the concepts, we will teach some of the basics of data analysis as we introduce those features in Mathcad. Once you see how easy Mathcad can summarize and display the results of an experiment, you will realize that analyzing data without a computer is just unnecessary punishment. In this Tutorial, we cover the statistics that are used to describe a set of data.
#
# After having done an experiment, you must be able to describe your results. When reporting the value of a quantity, such as speed for example, you must also give an estimate of the error associated with the quantity. For example, two scientists do separate experiments to determine the maximum flying speed of the South African swallow:
# Madame Curie | Einstein
# 14.5 mph ± 0.2 mph | 14.5 mph ± 10 mph
# Although the reported values of the speeds are the same, Madame Curie is much more confident of her result than than Einstein since her reported error in the speed is much less than Einstein's. Notice that the speed reported by Einstein could be anywhere from 24.5*mph to 4.5*mph !
#
# In this chapter, you will learn how Mathcad can be used to summarize your data and estimate the error in your experimental results.
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# Experiment
#
# Say we want to know the acceleration due to gravity g. There are many different ways to measure the value, but let's not bother with the details. Whatever the method, let's imagine that we have measured 5 values for g.
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# Ultimately, the question will be: What value do you report and what is the error associated with the value? Mathcad can help summarize the data, but we first have to get the numbers into Mathcad.
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# Entering Data
#
# Data is entered into a table in Mathcad. As an example, a table of time values is shown belo
time := [0.62; 0.03; 13.89; 62.91; 9.38; 14.06] s
# With the data labeled this way, we can ask Mathcad for the value of a specific number in the list by referring to the index. For example:
time[1] = 0.03 s
# or
time[5] = 14.06 s
# When you use a range variable as an index, the steps must always be whole numbers. The variable n is most commonly used for an index, but i,j, and k are also conventional indices.
#
# A table of data uses an index as a numerical subscript (for example: time[i] ). These subscripts are not the literal subscripts used to name variables (x_o or E_total). Instead of being part of the name, numerical subscripts actually give Mathcad information (the order of the data points). The numerical subscript is entered by typing the left square bracket ( [ ). There is also a slight difference in appearance:
# Literal subscript: | type t [ctrl+-] n | t_n
# Numerical subscript: | type t  [  n | t[n]
# For practice, let's enter the accelerations due to gravity into a table. To avoid confusion with the predefined g, use the variable G. There is a trick for including units after the data entry, so you will just enter the numbers and leave the units for later.
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[a; □]
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# In the open space, type:
#
# G  :
#
# After the equal sign, insert a matrix with Ctrl + M. Type in the other numbers (no units), separating each value with Shift + Enter.
G := [9.45; 10.04; 9.93; 9.26; 9.53]
# If you succeeded in entering the data, then the list will be displayed to the right, when you type G[n = You have defined the variable G to be a list of n values. There are two ways of referring to tables:
#
# 1. Using G[n] refers to the individual numbers in sequence (G[1], G[2] .. G[n]).
# 2. Using G refers to the whole list, all at once.
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# Type G[2] =
G[2] = 9.93
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# Type G =
G = [9.45; 10.04; 9.93; 9.26; 9.53]
# The distinction between a variable for a list (G) and one with a numerical subscript (G[n]) is important and will become more clear as we proceed.
#
# Here's the clever trick for giving a table of data the proper units after entering just the numbers:
# Trick:
G := G*m/s^2  # The result:
G = [9.45; 10.04; 9.93; 9.26; 9.53] m/s^2
# Notice that we redefined the whole list (G) to be the same variable, but with units of acceleration. Instead of having to type in the units over and over as you enter data, you can redefine the list to include the units afterward.
# The Mean
#
# Notice that our values for the acceleration due to gravity are all different. How would you report a result for g?
#
# Picking the value that is closest to the accepted value for g would be biased. A better way would be to calculate the mean or average of your data. If the reason for the variation in the data is due to random errors, then calculating the mean will help to average out the fluctuations in the data and provide the best estimate of the true value of the quantity being measured.
#
# How do you calculate the mean of our 5 accelerations?
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(9.45 + 10.04 + 9.93 + 9.26 + 9.53)/5 = 9.642
# True, you can add up all the values and divide by the number of values. Mathcad has a built-in function
# mean(  ) for taking the mean of a list of numbers:
mean(G) = 9.642 m/s^2
# Notice that we dropped the subscript! There is no such thing as an average for each number individually (G[n]). The argument of the mean(  ) function is the list as a whole (G).
# Here is a graph of your data with a marker at the mean value:
n := 1, 2 .. 5
# [plot: 0 vs G[n]]
# Data for the Acceleration due to Gravity
# We will discuss how to graph data in Section 6.2, where we will discuss two sets of data that are related. In the graph above, we have simply graphed an arbitrary number (zero) against each of the data values G[n] .
# Standard Deviation
#
# We now have a way of choosing a value of a measured quantity to report (the mean), but what is the error in the mean? We will answer that question below, but first we must discuss a concept known as the standard deviation. Let's look at two sets of experimental data acquired by two different students:
# Joe Science | Joe Thumbs
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# Notice that Joe Science has very consistent results, while Joe Thumbs' values vary all over the place. Now look at their mean values:
# Joe Science | Joe Thumbs
(9.82 + 9.80 + 9.83 + 9.79)/4 = 9.81
(5.72 + 0.89 + 18.73 + 13.9)/4 = 9.81
# Even though both students would report the same mean, Joe Science's' results are more reliable than Joe Thumbs because on average Joe Science's' values are closer to the mean that he calculates. You can see the difference on the graphs below (notice the difference in scale between the two graphs).
# [plot: 0 vs 9.82, 9.8, 9.83, 9.79]
# [plot: 0 vs 0.89, 5.72, 13.9, 18.73]
# This example shows that simply concentrating on the mean can be deceiving. To evaluate the reliability of the result, we must also have a way to express the amount of variation in the data. Are the values tightly grouped around the mean value or broadly spread out? This variation will ultimately be related to the error in the mean.
#
# Let's calculate how far each student's values are away from their mean value: 9.81
# Joe Science | Joe Thumbs
9.81 - 9.82 = -0.01
9.81 - 5.72 = 4.09
9.81 - 9.80 = 0.01
9.81 - 0.89 = 8.92
9.81 - 9.83 = -0.02
9.81 - 18.73 = -8.92
9.81 - 9.79 = 0.02
9.81 - 13.9 = -4.09
# You can see that Joe Thumbs always measured values further from the mean than did Joe Science. Assuming that the variations in data points are mostly due to mistakes made during the experiment, we will refers to the variations as error in the data. Joe Thumbs likely used a very sloppy lab technique or very imprecise equipment in collecting his data.
#
# We must first calculate the average amount of error in each data point, which is called the standard deviation (standard meaning average). Unfortunately, we cannot simply take the mean of the deviations or the positive and negative deviations will just cancel one another and we will get zero.
#
# To avoid this problem the standard deviation uses the squares of each deviation so that the numbers are all positive (for example,  (-0.02)^2 = 0.0004) and then takes the average. The square root of this average value is then calculated to make up for having squared each value individually. The general formula for the standard deviation is written in “summation notation” as
Standard_deviation == sqrt(1/N*sum((x[n] - mean(x))^2, n = 0 .. N))
# where N is the total number of data points and x[n] refers to each data point individually, while mean(x) is the average value of the whole data set x .
#
# Mathcad has a function stdev(  ) that calculates the standard deviation for a set of data. The standard deviation is an estimate of the random errors that occurred during the measurements (assuming that the physical thing we are measuring does not vary!).
#
# Use the stdev(  ) function to calculate the standard deviation for your set of data G. As with the mean, you must use the data set as a whole (G not G[n]).
stdev(G) = 0.295527 m/s^2
# What does that number say about your set of data?
# Error in the Mean
#
# Knowing the standard deviation associated with a data set, we can calculate the error in the mean, as follows. We define the error in the mean with the following user-defined function:
errmean(data, N) := stdev(data)/sqrt(N)
# In this equation N is the number of data points (for example, and data refers to a particular list of data points.
#
# Important: It is the error in the mean that is reported as the error associated with the value of your measured quantity. In words, the error in the mean is the average error in each data point (the standard deviation) divided by the square root of the number of data points.
# For example, in Joe Science's experiment the standard deviation associated with his data set is 0.02*m*s^-2. Therefore, since N == 5, the error in the mean of g is
0.02*m*s^-2/sqrt(5) = 0.00894427 m/s^2
# Therefore Joe Science's value of g is g = 9.81 ± 0.009 m*s^-1. Joe Thumbs' data has a standard deviation of "6.94m"*sec^-1. Consequently, his error in the mean is
6.94*m*s^-2/sqrt(5) = 3.10366 m/s^2
# As expected, this value is much larger than Joe Science's error. Joe Thumbs would report his value of g as g = 9.8 ± 3.1 m*s^-1.
#
# Use the user-defined function errmean(□, □) to calculate the error in the mean for your set of data G.
errmean(G, 5) = 0.132164 m/s^2
# Fractional Error
#
# To get an impression of whether the standard deviation associated with a set of data is “big” or “small,” you must compare the deviation to the mean value. For example, making errors of a few meters is still very accurate when you are talking about the size of the earth, but is very poor when discussing the size of an atom.
#
# The ratio of the standard deviation to the mean value is defined as the fractional error. Below, we have calculated the mean, standard deviation, and fractional error for the data sets taken by the two students.
# Joe Science | Joe Thumbs
# mean: | 9.81*m*s^-2 | 9.81*m*s^-2
# standard deviation: | 0.02*m*s^-2 | 6.94*m*s^-2
# fractional error:
0.02/9.81 = 0.203874*1%
6.94/9.81 = 70.7441*1%
# Notice that the fractional error immediately gives you a feeling for how large or small the standard deviation is in comparison to the mean value. While both students found the same mean acceleration, you can see from the fractional error that the second student is “all thumbs.”
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# Compute fractional error for your data set G (the ratio of the stdev(G) to the mean(G) value).
#
# Hint: Just use the functions in the expression.
#
# Insert the % in the units placeholder.
stdev(G)/mean(G) = 3.06499*1%
# Practice
#
# To become more familiar with these new ideas, we have created a way for you to conduct multiple experiments and observe the mean, error in the mean, and fractional error. The 10 data points below (called data ) are actually the result of a random number generator. To get new values, just click on the equation below, and press [F9].
# Then keeping your cursor on the data points, scroll down until you can see the graph and values below it.
data := ((9.81 + rnorm(10, 0, rnd(1)))*m/s^2)
# Index for data:
k := 1 .. 9
# Press [F9] repeatedly to see how different data numbers affect the mean, error in the mean, and fractional error listed below the graph.
data[k] = [7.99343; 9.98352; 9.29138; 8.80136; 9.89341; 10.4591; 10.0676; 9.81954; 9.16621] m/s^2
# [plot: 0, γ vs data[k], mean(data), mean(data) - stdev(data), mean(data) + stdev(data)]
# Mean | Fractional Error
mean(data) = 9.28426 m*s^-2
stdev(data)/mean(data) = 10.0634*1%
# Error in the Mean
stdev(data)/sqrt(10) = 0.295456 m*s^-2
# This global variable definition creates a line (from  to ) for the standard deviations on the last graph:ƒ
γ ≡ -1 .. 1
# The mean, standard deviation, and the related quantities fractional error and error in the mean are known as descriptive statistics that are used to summarize a set of data. The underlying assumption is that you are repeatedly making the same measurement of a relatively stable physical quantity. If that is the case, then these statistics are invaluable for describing a set of data.
#
# The exercises in the next section introduces you to the analysis of two sets of data that are related in some way (for example, the velocity of an object and its position). You will also learn how to graph data so that you can understand the relationship and propose a theoretical explanation.
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