# Worksheet setting: ORIGIN = 1
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# PROBLEM-SOLVING TUTORIAL
#
# 6.2 Data Analysis: Exercises
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# Introduction
#
# In the Data Analysis Tutorial we learned how to report the results of an experiment, but we did not bother with the details of getting the data values. For example, to determine the acceleration due to gravity, we would have to make some more feasible measurements; such as the position and time of a falling body.
#
# In this section, we will deal with the more complicated problem of analyzing two sets of data points that are related in some way. We will graph the data sets to look at the relationship, try out a theoretical model, and then summarize our results (as before).
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# Experiment
#
# A race car driver accelerates her car from 0 to 100 mph in 6 seconds. Her pit crew uses a radar gun to measure her velocity 15 successive times during the acceleration.
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# We want to determine the average acceleration with the following analysis:
#
# a) Plot the velocity versus time data.
# b) Decide on a function as a theoretical model for the relationship between the velocity and the time.
# c) Determine the average acceleration by fitting the model function to the data.
# To enter data, use the Insert Matrix command from the Matrices/Table menu, and set the number of rows and columns. To add another row, just type a comma and the next value.
# Index for the data:
n := 1 .. 14
# We have typed the time and velocity values into the lists, t and v respectively, shown at right. In doing so, we also defined a range variable nto use as an index for the 15 data points.
#
# Lists of times and velocities:
v := [0.06; 7.25; 14.78; 22.17; 29.74; 36.82; 43.64; 52.34; 60.99; 68.32; 75.57; 83.09; 87.41; 100.5; 103.8] mph
t := [0.01; 0.43; 0.86; 1.30; 1.73; 2.20; 2.59; 3.10; 3.48; 3.88; 4.33; 5.06; 5.19; 5.58; 6.3] s
# Instead of staring at the numbers in tables, you will find the data much easier to understand by plotting the points on a graph.
#
# Graphically Assessing Data
#
# Graphs are an excellent tool for understanding data. Instead of plunging headfirst into calculations, you can get a lot of information by looking at a graph first.
#
# What information are we interested in obtaining?
#
# The main goal is to devise (or test) a theory that explains your data and can be used to predict the outcome of future experiments.
#
# A graph allows you to see whether two data sets are related in some way or if the points are just scattered at random. If you think a pattern exists, then the shape of the data may also suggest what function could be used to model the data. The three graphs below are examples.
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# The data in the center and right-hand graphs seem to be related, while the data in the graph to the left does not have any discernible pattern. What functions would you pick to model the behavior of the data that does seem to be related?
#
# The data in the central graph appears to have a linear (straight line) relationship, which means we can draw a straight line through the data. You may remember the general formula for a straight line:
# General linear equation:
y(x) == m*x + b
# Where:
# m is the slope of the line.
# b  is the intercept (where the line crosses the vertical axis).
#
# The data in the right-hand graph must be modeled by a more complicated function (in this case a damped sine function). Data that can be best fit by curves other than a straight line are lumped together and called nonlinear data. Nonlinear behavior is more difficult to analyze than straight lines.
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# We will concentrate on linear fits in this chapter. While Mathcad can also be used to analysis nonlinear relations, the techniques are more complicated mathematically.
#
# Graphing Data
#
# Graphing data is only slightly different than graphing a function. In both cases Mathcad uses two values to plot each point. With data, the vectors need to have the same number of points, i.e. rows.
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# Create a graph and insert the data into the empty placeholders.
#
# Put time t on the horizontal axis and velocity v on the vertical axis. Add the appropriate units.
# [plot: v (mph) vs t]
# Velocity vs. Time Data
# Mathcad will automatically draw a line through the points. You can choose a Symbol for the data points (the default is none) in the Style section of the Plots tab. The icon in the margin discusses formatting curves in more detail. Here is an example of what can be done with the same graph.
# [plot: v (mph) vs t]
# Velocity vs. Time Data
# Our graph suggests that for this set of data the velocity has a linear relationship to the time. Remember the general equation for a straight line:
y(x) == m*x + b  # or rather, in our case:
v(t) == m*t + b
# Where:
#
# m is the slope of the line.
# b is the intercept (where the line crosses the vertical axis).
# Can you devise a theory that explains how velocity depends on time? So far, we are fairly sure that velocity is a linear function of time, but we still need to know the slope and intercept of the line to understand the behavior exactly.
#
# In our problem, what physical quantities correspond to the slope m and intercept b of the line?
v(t) == m*t + b
# Think about what the slope and intercept mean in this physical situation. Use the icon in the margin to check if you have interpreted the equation correctly.
# Linear Regression
#
# Finding the slope and intercept of data that falls along a straight line is a process called linear regression. The problem is that there are multiple values for the slope and intercept that seem to make the line “fit” the data. Which slope and intercept give the best fit to the data?
#
# To understand the dilemma, we have plotted a line on the same graph as our data.
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# By adjusting the values of the slope slp and intercept int, try to fit the line to the data. Once you get a reasonably good fit, adjust the variables slightly and notice that there is a range of possible slopes and intercepts that seem to work.
slp := 4 m/s^2
int := 0 m/s
# Equation for the line:
line(x) := slp*x + int
# [plot: v (mph), line(t) (mph) vs t]
# Velocity vs. Time Data
# Mathcad essentially uses the same method that you just did to find the slope and intercept, adjusting the slope and intercept until the line comes very close to as many points as possible. The icon in the margin explains the process in more detail.
#
# Mathcad has the built-in functions, slope(x,y) and intercept(x,y), which take two data sets (x,y) as arguments and calculates the best slope and intercept for the linear fit to the data.
# Equation for line:
y(x) == m*x + b
# where:
m == slope(x, y)
# and
b == intercept(x, y)
# Note: The order (x,y) in the functions is very important, so you must decide what variables corresponds to x and y in your data. Also, you must refer to the entire lists, using no subscripts (t rather than t[n] ).
#
# In our problem, the slope of the line is the acceleration of the car a and the intercept is the initial velocity v_o. We can define both variables to be the results of the slope( ) and intercept( ) functions.
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v_o := intercept(t, v)
# Define the variables a and v_o in terms of the slope( ) and intercept( ) functions, respectively. Remember, the order of the arguments is very important.
#
# Display the two values and decide whether they seem reasonable.
v_o = 0.179387 mph
a := slope(t, v)
a = 7.61045 m/s^2
# Let's review what we have done:
#
# From the theory about the velocity of uniformly accelerated objects, we chose a linear relationship to model our experimental data:
v == v_o + a*t
# Using linear regression, we have determined estimates for the acceleration a and the initial velocity v_o . With these values, we can plot a straight line that should match our data.
# Graphing Data and Functions Together
#
# Plotting the data and our model function together on the same graph will allow you to see how well the model predicts the data points. First, we must define a function for our straight line model based on the values of a and v_o:
#
# Definition of model function based on values found from linear regression:
vel(time) := a*time + v_o
# Note: The variable reserved for the velocity data v could not be used as the function's name (we chose to use vel ).
#
# Reminder: The variable name you chose as the argument (time) just shows Mathcad what to do with any variable, list, or value we put in later as an argument.
#
# In our case we are interested in the velocities predicted by our model at the same times t[n] that the velocity data was taken. Even though we used time in the definition, we can evaluate the function at the time data t[n] to get the predicted velocities vel(t[n]).
# The variable name used when a function is defined (e.g. time) does not have to be the same as any argument you plan on using (e.g. t[n] ). The variable name in the function's definition is simply a dummy variable that shows Mathcad what to do with anything that we put in later as an argument.
#
# You are now ready to make the graph and see how well our model predicts the data.
#
# Plot both the velocity data and the model function against the time data. Divide by the appropriate units to convert the values. Use the Styles section of the Plots tab to choose a Symbol for the data points.
#
# Hint: You must use an index on the data variables, even when you are evaluating the function at the time data vel(t[n]) .
# Data Points and Fitted Line
# [plot: v (mph), vel(t) (mph) vs t]
# How well does our linear model, with our best estimates for the slope and intercept, fit the data? There are mathematical ways to quantify how well our function predicts the data points, but these are beyond the scope of our brief introduction.
# Estimating Error
#
# From our data analysis we have a value for the acceleration of the car a . In the Tutorial we said that every reported value has some amount of error.
#
# What is the error in our value for the acceleration a?
#
# With only one value, we cannot calculate an error since we do not have a set of values from which to calculate a standard deviation and from that an error in the mean. Our experiment must be repeated several times before we will see a spread in accelerations due to error. The process of conducting experiments again to verify your results is called replication. For practice let's see how that would work.
#
# In the space below, we defined lists of times and velocities from four different experiments, conducted exactly like the one you analyzed:
# Experiment 1 | Experiment 2
v1 := [0.10; 7.61; 16.04; 24.54; 32.21; 39.96; 48.58; 55.89; 65.37; 67.04; 74.19; 84.61; 86.92; 103.3; 104.6]
t2 := [0.00; 0.43; 0.88; 1.31; 1.75; 2.22; 2.60; 3.12; 3.59; 4.08; 4.62; 4.98; 5.25; 5.73; 6.24]
t1 := [0.01; 0.42; 0.87; 1.29; 1.77; 2.19; 2.59; 3.13; 3.65; 3.88; 4.34; 4.97; 5.73; 6.08; 6.12]
v2 := [0.06; 7.54; 16.16; 23.46; 30.06; 36.75; 46.41; 51.02; 61.76; 68.12; 73.88; 87.83; 97.01; 98.82; 112.3]
# Experiment 3 | Experiment 4
t3 := [0.02; 0.42; 0.86; 1.32; 1.73; 2.19; 2.71; 3.04; 3.68; 4.00; 4.32; 5.03; 5.73; 5.82; 6.46]
v3 := [0.07; 7.4; 15.36; 22.55; 31.13; 39.29; 48.91; 50.48; 59.64; 73.60; 79.94; 80.17; 96.39; 104; 105]
t4 := [0.00; 0.41; 0.87; 1.32; 1.71; 2.21; 2.61; 3.05; 3.61; 3.91; 4.38; 5.10; 5.68; 6.15; 6.75]
v4 := [0.09; 7.44; 14.96; 24.30; 29.72; 40.83; 46.4; 56.75; 61.09; 70.71; 73.41; 87.35; 98.48; 97.18; 108.8]
# Note: The way we have entered the data and will work with it below is cumbersome. There are ways of reading data into Mathcad from text files and matrix methods for working with the data that make graphing and calculations much easier.
#
# Using the index n, we have plotted the data from the four experiments.
# [plot: v1, v2, v3, v4 vs t1, t2, t3, t4]
# Data points from 4 separate experiments
# From the graph, you can see the linear relationship:
V(T) == Accel*T + V_o
# Using the slope( ) function, we can calculate an acceleration for each of the four experiments and put those in a list called Accel .
Accel := [slope(t1, v1); slope(t2, v2); slope(t3, v3); slope(t4, v4)]
# We redefine Accel to have the appropriate units:
Accel := Accel*mph/s
# This produces these values for the acceleration. Because we have several values of the acceleration we can determine the mean and standard deviation and the related quantities the error in the mean and the fractional error.
Accel = [7.3012; 7.84919; 7.51238; 7.27157] m/s^2
# These 4 values for the acceleration of the car are shown on the graph below.
k := 1, 2 .. 4
# [plot: 0 vs Accel[k]]
# Data for the Acceleration of the Car
# Calculate the mean, standard deviation, error in the mean, and fractional error for the four accelerations. Remember to use the variable name Accel without an index in the mean(□) and stdev(□) functions. Compare the standard deviation to the mean by computing the fractional error.
mean(Accel) = 7.48359 m/s^2
stdev(Accel) = 0.230604 m/s^2
stdev(Accel)/sqrt(4) = 0.115302 m/s^2
stdev(Accel)/mean(Accel) = 3.08146*1%
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# You now know how to summarize multiple measurements with the mean, standard deviation, error in the mean, and fractional error, and how to use linear regression to fit a theoretical model to data and find the slope and intercept of the relationship. Equipped with these new tools, you are ready to tackle the problem in the next section.
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