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# PROBLEM-SOLVING TUTORIAL
#
# 6.3 Data Analysis: Problems
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# Introduction
#
# This section contains two closely related problems that deal with data analysis. You will need to use descriptive statistics, graph data, and use linear regression to fit a straight line to the data.
#
# If you have difficulties in figuring out how to proceed with the problems, refer back to the Tutorial and Exercises and use the worked examples as a guide.
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# Question 1:  What planet is this?
#
# You have woken up in a cave on an unknown planet in our solar system  (read Life, the Universe and Everything for reference). Wanting to know the specific planet on which you are stranded, you decide to do an experiment to measure the acceleration due to gravity and thereby deduce the planet by its gravitational pull.
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# You begin by flicking small rocks off the edge of 3 foot high table in your cave. Each rock goes a certain distance away from the table edge before hitting the ground. You measure this distance for 10 rocks, while trying to give each rock the same initial velocity each time.
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# Part of your notebook with these distances is pictured to the right.
# a) Enter the pictured data into a table. Summarize the data and report a value for the average distance. Make sure to include the error in the mean as part of your reported value.
#
# b) Graph the height off the ground at impact (0*m) against the data. Display the data as points instead of a line. Place a marker at the average range you reported in part (a). Change the lower axis limit on the x-axis to be 0*m (the table edge).
#
# c) Was the experiment very precise? Numerically justify your answer. What would you guess to be the main source of error?
# Hint: Refer to the worked example in the Tutorial: Section 6.1.
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# Problem Space
#
# a) Entering the pictured data into a table. Summarize the data and report a value for the average distance. Make sure to include the error in the mean as part of your reported value.
#
# The data is input using an assignment statement:
range := [4.78; 5.2; 4.84; 5.7; 5.37; 4.79; 5.38; 4.2; 5.26; 4.58] m
# The average distance (mean) and estimated error (standard deviation) are calculated at right using built-in Mathcad functions.
avg := mean(range)
avg = 5.01 m
sd := stdev(range)
sd = 0.425723 m
# The error in the mean is given as
stdev(range)/sqrt(10) = 0.134625 m
# Therefore the value for the distance is 5.01 ± 0.13*m.
# b) Graph the height off the ground at impact (0*m) against the data. Display the data as points instead of a line. Place a marker at the average range you reported in part (a). Change the lower axis limit on the x-axis to be 0*m (the table edge).
# [plot: 0*range vs range]
# DISTANCE ROCKS TRAVELS (horizontal)
# c) Was the experiment very precise? Justify your answer. What would you guess to be the main source of error?
#
# The fractional error (standard deviation divided by the mean) calculated at right is fairly small, indicating reasonable precision in the experiment.
# Fractional error:
sd/avg = 0.0849746
# The primary source of error is most likely in inconsistency in the force used to flick the rocks off of the table.
# Background for the Second Question
#
# Flicking rocks around has started you thinking. You know that the rock's height y in time is given by the following equation:
y == y_o + v_yo*t - 1/2*a*t^2
# In your case, y_o is the height of the table and a is the acceleration due to gravity on the planet.
# In a moment of brilliant insight, you recognized that the initial horizontal velocity v_xo , in terms of the horizontal distance d the rock traveled, is given by
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# Initial velocity:
v_xo(d) == sqrt(a/(2*y_o))*d
# According to this theoretical model, the initial velocities v_xoshould be linearly related to the distance d reached by the rock (flick harder, the rock goes farther). The slope of that linear relationship is the square root term. You can see this by comparing the general equation for a line to our theoretical model.
# General equation for a line:
y(x) == slope*x + intercept
# Theoretical model:
v_xo(d) == sqrt(a/(2*y_o))*d + 0
# So the slope == sqrt(a/(2*y_o)) and the intercept should be zero.
# Ah ha! By measuring the distances given by different initial velocities, you can use linear regression to find the slope (the intercept should be zero). Then you can solve for the acceleration due to gravity a on your unknown planet (you know the height of the table y_o from the first question).
slope == sqrt(a/(2*y_o))  # solving for a gives,
a == 2*y_o*(slope^2)
# Once you know the acceleration on your planet a , you can compare that value with the acceleration due to gravity on the planets in our solar system given in your copy of the Hitchhikers' Guide to the Galaxy and deduce which planet is your new home.
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# Question 2
#
# After several botched attempts, you manage to measure 20 different distances and initial velocities. To the right, we have entered the distances into d and the initial velocities into v_xo.
v_xo := [0.00; 0.33; 0.63; 1.04; 1.33; 1.51; 2.03; 2.19; 3.01; 2.98; 3.52; 3.24; 3.57; 4.38; 5.05; 4.77; 5.52; 5.62; 6.00; 6.24]
d := [0.00; 0.15; 0.30; 0.46; 0.61; 0.76; 0.91; 1.07; 1.22; 1.37; 1.52; 1.68; 1.83; 1.98; 2.13; 2.29; 2.44; 2.59; 2.74; 2.90]
# Index:
i := 0 .. 19
# Carry out the following analysis to find the acceleration due to gravity:
#
# a) Graph the initial horizontal velocity data v_xo against the distance traveled d. Does the relationship between the data support the prediction of the linear theoretical model?
#
# b) Determine the slope and then find the acceleration due to gravity on your planet.
#
# c) Plot both the model function, using the acceleration you found in part (b), and the initial velocity data against the distance data. Comment on the quality of the fit.
#
# d) The pop-up in the margin has a table of the acceleration due to gravity on various planets in our solar system. Use the table to determine the planet that you are on.
d := d*m
v_xo := v_xo*m/s
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# Problem Space
#
# a) Graph the initial horizontal velocity data v_xo against the distance traveled d . Does the relationship between the data support the prediction of the linear theoretical model?
# [plot: v_xo vs d]
# Initial velocity vs. distance traveled
# The relation appears to be approximately linear.
#
# b) Determine the slope and then find the acceleration due to gravity on your planet.
# We are given in the problem that:
# Initial height:
y_o := 3*ft
# Using the built-in Mathcad function, we find the slope is:
slp := slope(d, v_xo)
slp = 2.18019 1/s
# From the background section, we know that the slope is related to the acceleration through the equation:
a := 2*y_o*slp^2
slope == sqrt(a/(2*y_o))
a = 8.69266 m/s^2
# The linear model function is then
vel(d) := d*sqrt(a/(2*y_o))
# c) Plot both the model function, using the acceleration you found in part (b), and the initial velocity data against the distance data. Comment on the quality of the fit.
# [plot: v_xo, vel(d) vs d]
# Initial velocity versus distance
# □□□ Data
# ----  Linear model function
# The linear function appears to fit the data well.
# Planet (or Body)  Acceleration due to gravity*
#
# Mercury ..........................  0.37g or 3.63 m*s^-2
# Venus ............................  0.88g or 8.62 m*s^-2
# Earth ..............................  1g or 9.81 m*s^-2
# Mars ..............................  0.38g or 3.72 m*s^-2
# Jupiter ...........................  2.64g or 25.87 m*s^-2
# Saturn ............................  1.15g or 11.27  m*s^-2
# Uranus ...........................  1.17g or 11.47 m*s^-2
# Neptune ........................  1.18g or 11.56 m*s^-2
# Pluto ..............................  0.25g or 2.45 m*s^-2
# Moon .............................  0.17g or 1.67 m*s^-2
# Sun ...............................  27.96g or 247 m*s^-2
# The acceleration determined from a linear fit to the data, a = 8.69266 m*s^-2 is closest to that of the planet Venus, based on a comparison with the table on the left.
# The skills covered in this chapter are essential for analyzing experimental data, whether the experiment is done in a physics laboratory class or is part of real-world scientific research. As we have mentioned before, Mathcad allows you to deal with larger data sets than possible before and to tackle experiments which are simply beyond your capabilities using a pencil and calculator.
#
# That is the end... almost! The project in the final chapter will bring together all the features of Mathcad and the problem-solving skills you have learned throughout this Electronic Book.
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